# OpenSim document version 30000
InverseKinematicsTool:
  results_directory: Y:\Projects\Grace\RUN_FATIGUE\Data\Session1\ProcessedData\NI\230627\dynamicElaborations\NI\RE_Pre_11TP_1\results_folder\InverseKinematics
  input_directory: Y:\Projects\Grace\RUN_FATIGUE\Data\Session1\ProcessedData\NI\230627\dynamicElaborations\NI\RE_Pre_11TP_1
  model_file: Y:\Projects\Grace\RUN_FATIGUE\Data\Session1\ProcessedData\NI\230627\staticElaborations\NI\model.osim
  constraint_weight: Inf
  accuracy: 1e-5
  marker_file: Y:\Projects\Grace\RUN_FATIGUE\Data\Session1\ProcessedData\NI\230627\dynamicElaborations\NI\RE_Pre_11TP_1\RE_Pre_11TP_1.trc
  time_range: 91.2475 94.8485
  report_errors: true
  output_motion_file: RE_Pre_11TP_1_sp2_IK.mot
  report_marker_locations: false
  IKTaskSet:
    IKMarkerTask R_ACROMION: apply=true weight=0.5
    IKMarkerTask L_ACROMION: apply=true weight=0.5
    IKMarkerTask R_ASIS: apply=true weight=20
    IKMarkerTask L_ASIS: apply=true weight=20
    IKMarkerTask R_LAT_FEM_EPI: apply=true weight=1
    IKMarkerTask R_MED_FEM_EPI: apply=true weight=0.4
    IKMarkerTask R_MED_MAL: apply=true weight=2
    IKMarkerTask R_CALC: apply=true weight=10
    IKMarkerTask R_5TH: apply=true weight=5
    IKMarkerTask R_1ST: apply=true weight=10
    IKMarkerTask L_LAT_FEM_EPI: apply=true weight=0.7
    IKMarkerTask L_MED_FEM_EPI: apply=true weight=0.4
    IKMarkerTask L_LAT_MAL: apply=true weight=2
    IKMarkerTask R_LAT_MAL: apply=true weight=2
    IKMarkerTask L_CALC: apply=true weight=10
    IKMarkerTask L_1ST: apply=true weight=10
    IKMarkerTask R_PSIS: apply=true weight=20
    IKMarkerTask L_PSIS: apply=true weight=20
    IKMarkerTask R_GTROC: apply=false weight=0.2
    IKMarkerTask L_GTROC: apply=false weight=0.2
    IKMarkerTask R_TH1: apply=true weight=0.4
    IKMarkerTask R_TH2: apply=true weight=0.4
    IKMarkerTask R_TH4: apply=true weight=0.4
    IKMarkerTask R_TH3: apply=true weight=0.4
    IKMarkerTask R_SH1: apply=true weight=1
    IKMarkerTask R_SH2: apply=true weight=1
    IKMarkerTask R_SH3: apply=true weight=1
    IKMarkerTask R_SH4: apply=true weight=1
    IKMarkerTask L_TH4: apply=true weight=0.4
    IKMarkerTask L_TH1: apply=true weight=0.4
    IKMarkerTask L_TH2: apply=true weight=0.4
    IKMarkerTask L_TH3: apply=true weight=0.4
    IKMarkerTask L_SH1: apply=true weight=1
    IKMarkerTask L_SH2: apply=true weight=1
    IKMarkerTask L_SH4: apply=true weight=1
    IKMarkerTask L_SH3: apply=true weight=1
    IKMarkerTask R_DORSAL: apply=true weight=0.4
    IKMarkerTask L_DORSAL: apply=true weight=0.4
    IKMarkerTask C7: apply=true weight=0.6
    IKMarkerTask ST_NOTCH: apply=true weight=0.6
    IKMarkerTask L_5TH: apply=true weight=2
    IKMarkerTask L_MED_MAL: apply=true weight=2
    IKMarkerTask S1: apply=true weight=6
    IKMarkerTask S4: apply=true weight=6
    IKMarkerTask S3: apply=true weight=6
    IKMarkerTask S2: apply=true weight=6
