# OpenSim document version 40500
MocoStudy RE_Post_01TP_2_timepoint3_S1_track:
  write_solution: false
  MocoProblem problem:
    MocoPhase phases:
      ModelProcessor model:
        model: Model NI:
          gravity: 0 -9.80665 0
          length_units: meters
          force_units: N
          credits:
            Rajagopal et al. (2016), Lai et al. (2017), Uhlrich et al. (2022) Notes: P. van den Bos changed the fiber-damping from 0.01 to default of 0.1 as suggested in M. Millard (2013) "Flexing Computational Muscle: Modeling and Simulation of Musculotendon Dynamics".
          publications:
            Rajagopal, A., Dembia, C.L., DeMers, M.S., Delp, D.D., Hicks, J.L., Delp, S.L. (2016) Full-body musculoskeletal model for muscle-driven simulation of human gait. IEEE Transactions on Biomedical Engineering.
          Bhargava2004SmoothedMuscleMetabolics metabolic_cost_Bhargava2004: use_smoothing=true
            muscle_parameters:
              Bhargava2004SmoothedMuscleMetabolics_MuscleParameters addbrev_r: socket_muscle=/forceset/addbrev_r
                  use_provided_muscle_mass=false
              Bhargava2004SmoothedMuscleMetabolics_MuscleParameters addlong_r: socket_muscle=/forceset/addlong_r
                  use_provided_muscle_mass=false
              Bhargava2004SmoothedMuscleMetabolics_MuscleParameters addmagDist_r: socket_muscle=/forceset/addmagDist_r
                  use_provided_muscle_mass=false
              Bhargava2004SmoothedMuscleMetabolics_MuscleParameters addmagIsch_r: socket_muscle=/forceset/addmagIsch_r
                  use_provided_muscle_mass=false
              Bhargava2004SmoothedMuscleMetabolics_MuscleParameters addmagMid_r: socket_muscle=/forceset/addmagMid_r
                  use_provided_muscle_mass=false
              Bhargava2004SmoothedMuscleMetabolics_MuscleParameters addmagProx_r: socket_muscle=/forceset/addmagProx_r
                  use_provided_muscle_mass=false
              Bhargava2004SmoothedMuscleMetabolics_MuscleParameters bflh_r: socket_muscle=/forceset/bflh_r
                  use_provided_muscle_mass=false
              Bhargava2004SmoothedMuscleMetabolics_MuscleParameters bfsh_r: socket_muscle=/forceset/bfsh_r
                  use_provided_muscle_mass=false
              Bhargava2004SmoothedMuscleMetabolics_MuscleParameters edl_r: socket_muscle=/forceset/edl_r
                  use_provided_muscle_mass=false
              Bhargava2004SmoothedMuscleMetabolics_MuscleParameters ehl_r: socket_muscle=/forceset/ehl_r
                  use_provided_muscle_mass=false
              Bhargava2004SmoothedMuscleMetabolics_MuscleParameters fdl_r: socket_muscle=/forceset/fdl_r
                  use_provided_muscle_mass=false
              Bhargava2004SmoothedMuscleMetabolics_MuscleParameters fhl_r: socket_muscle=/forceset/fhl_r
                  use_provided_muscle_mass=false
              Bhargava2004SmoothedMuscleMetabolics_MuscleParameters gaslat_r: socket_muscle=/forceset/gaslat_r
                  use_provided_muscle_mass=false
              Bhargava2004SmoothedMuscleMetabolics_MuscleParameters gasmed_r: socket_muscle=/forceset/gasmed_r
                  use_provided_muscle_mass=false
              Bhargava2004SmoothedMuscleMetabolics_MuscleParameters glmax1_r: socket_muscle=/forceset/glmax1_r
                  use_provided_muscle_mass=false
              Bhargava2004SmoothedMuscleMetabolics_MuscleParameters glmax2_r: socket_muscle=/forceset/glmax2_r
                  use_provided_muscle_mass=false
              Bhargava2004SmoothedMuscleMetabolics_MuscleParameters glmax3_r: socket_muscle=/forceset/glmax3_r
                  use_provided_muscle_mass=false
              Bhargava2004SmoothedMuscleMetabolics_MuscleParameters glmed1_r: socket_muscle=/forceset/glmed1_r
                  use_provided_muscle_mass=false
              Bhargava2004SmoothedMuscleMetabolics_MuscleParameters glmed2_r: socket_muscle=/forceset/glmed2_r
                  use_provided_muscle_mass=false
              Bhargava2004SmoothedMuscleMetabolics_MuscleParameters glmed3_r: socket_muscle=/forceset/glmed3_r
                  use_provided_muscle_mass=false
              Bhargava2004SmoothedMuscleMetabolics_MuscleParameters glmin1_r: socket_muscle=/forceset/glmin1_r
                  use_provided_muscle_mass=false
              Bhargava2004SmoothedMuscleMetabolics_MuscleParameters glmin2_r: socket_muscle=/forceset/glmin2_r
                  use_provided_muscle_mass=false
              Bhargava2004SmoothedMuscleMetabolics_MuscleParameters glmin3_r: socket_muscle=/forceset/glmin3_r
                  use_provided_muscle_mass=false
              Bhargava2004SmoothedMuscleMetabolics_MuscleParameters grac_r: socket_muscle=/forceset/grac_r
                  use_provided_muscle_mass=false
              Bhargava2004SmoothedMuscleMetabolics_MuscleParameters iliacus_r: socket_muscle=/forceset/iliacus_r
                  use_provided_muscle_mass=false
              Bhargava2004SmoothedMuscleMetabolics_MuscleParameters perbrev_r: socket_muscle=/forceset/perbrev_r
                  use_provided_muscle_mass=false
              Bhargava2004SmoothedMuscleMetabolics_MuscleParameters perlong_r: socket_muscle=/forceset/perlong_r
                  use_provided_muscle_mass=false
              Bhargava2004SmoothedMuscleMetabolics_MuscleParameters piri_r: socket_muscle=/forceset/piri_r
                  use_provided_muscle_mass=false
              Bhargava2004SmoothedMuscleMetabolics_MuscleParameters psoas_r: socket_muscle=/forceset/psoas_r
                  use_provided_muscle_mass=false
              Bhargava2004SmoothedMuscleMetabolics_MuscleParameters recfem_r: socket_muscle=/forceset/recfem_r
                  use_provided_muscle_mass=false
              Bhargava2004SmoothedMuscleMetabolics_MuscleParameters sart_r: socket_muscle=/forceset/sart_r
                  use_provided_muscle_mass=false
              Bhargava2004SmoothedMuscleMetabolics_MuscleParameters semimem_r: socket_muscle=/forceset/semimem_r
                  use_provided_muscle_mass=false
              Bhargava2004SmoothedMuscleMetabolics_MuscleParameters semiten_r: socket_muscle=/forceset/semiten_r
                  use_provided_muscle_mass=false
              Bhargava2004SmoothedMuscleMetabolics_MuscleParameters soleus_r: socket_muscle=/forceset/soleus_r
                  use_provided_muscle_mass=false
              Bhargava2004SmoothedMuscleMetabolics_MuscleParameters tfl_r: socket_muscle=/forceset/tfl_r
                  use_provided_muscle_mass=false
              Bhargava2004SmoothedMuscleMetabolics_MuscleParameters tibant_r: socket_muscle=/forceset/tibant_r
                  use_provided_muscle_mass=false
              Bhargava2004SmoothedMuscleMetabolics_MuscleParameters tibpost_r: socket_muscle=/forceset/tibpost_r
                  use_provided_muscle_mass=false
              Bhargava2004SmoothedMuscleMetabolics_MuscleParameters vasint_r: socket_muscle=/forceset/vasint_r
                  use_provided_muscle_mass=false
              Bhargava2004SmoothedMuscleMetabolics_MuscleParameters vaslat_r: socket_muscle=/forceset/vaslat_r
                  use_provided_muscle_mass=false
              Bhargava2004SmoothedMuscleMetabolics_MuscleParameters vasmed_r: socket_muscle=/forceset/vasmed_r
                  use_provided_muscle_mass=false
              Bhargava2004SmoothedMuscleMetabolics_MuscleParameters addbrev_l: socket_muscle=/forceset/addbrev_l
                  use_provided_muscle_mass=false
              Bhargava2004SmoothedMuscleMetabolics_MuscleParameters addlong_l: socket_muscle=/forceset/addlong_l
                  use_provided_muscle_mass=false
              Bhargava2004SmoothedMuscleMetabolics_MuscleParameters addmagDist_l: socket_muscle=/forceset/addmagDist_l
                  use_provided_muscle_mass=false
              Bhargava2004SmoothedMuscleMetabolics_MuscleParameters addmagIsch_l: socket_muscle=/forceset/addmagIsch_l
                  use_provided_muscle_mass=false
              Bhargava2004SmoothedMuscleMetabolics_MuscleParameters addmagMid_l: socket_muscle=/forceset/addmagMid_l
                  use_provided_muscle_mass=false
              Bhargava2004SmoothedMuscleMetabolics_MuscleParameters addmagProx_l: socket_muscle=/forceset/addmagProx_l
                  use_provided_muscle_mass=false
              Bhargava2004SmoothedMuscleMetabolics_MuscleParameters bflh_l: socket_muscle=/forceset/bflh_l
                  use_provided_muscle_mass=false
              Bhargava2004SmoothedMuscleMetabolics_MuscleParameters bfsh_l: socket_muscle=/forceset/bfsh_l
                  use_provided_muscle_mass=false
              Bhargava2004SmoothedMuscleMetabolics_MuscleParameters edl_l: socket_muscle=/forceset/edl_l
                  use_provided_muscle_mass=false
              Bhargava2004SmoothedMuscleMetabolics_MuscleParameters ehl_l: socket_muscle=/forceset/ehl_l
                  use_provided_muscle_mass=false
              Bhargava2004SmoothedMuscleMetabolics_MuscleParameters fdl_l: socket_muscle=/forceset/fdl_l
                  use_provided_muscle_mass=false
              Bhargava2004SmoothedMuscleMetabolics_MuscleParameters fhl_l: socket_muscle=/forceset/fhl_l
                  use_provided_muscle_mass=false
              Bhargava2004SmoothedMuscleMetabolics_MuscleParameters gaslat_l: socket_muscle=/forceset/gaslat_l
                  use_provided_muscle_mass=false
              Bhargava2004SmoothedMuscleMetabolics_MuscleParameters gasmed_l: socket_muscle=/forceset/gasmed_l
                  use_provided_muscle_mass=false
              Bhargava2004SmoothedMuscleMetabolics_MuscleParameters glmax1_l: socket_muscle=/forceset/glmax1_l
                  use_provided_muscle_mass=false
              Bhargava2004SmoothedMuscleMetabolics_MuscleParameters glmax2_l: socket_muscle=/forceset/glmax2_l
                  use_provided_muscle_mass=false
              Bhargava2004SmoothedMuscleMetabolics_MuscleParameters glmax3_l: socket_muscle=/forceset/glmax3_l
                  use_provided_muscle_mass=false
              Bhargava2004SmoothedMuscleMetabolics_MuscleParameters glmed1_l: socket_muscle=/forceset/glmed1_l
                  use_provided_muscle_mass=false
              Bhargava2004SmoothedMuscleMetabolics_MuscleParameters glmed2_l: socket_muscle=/forceset/glmed2_l
                  use_provided_muscle_mass=false
              Bhargava2004SmoothedMuscleMetabolics_MuscleParameters glmed3_l: socket_muscle=/forceset/glmed3_l
                  use_provided_muscle_mass=false
              Bhargava2004SmoothedMuscleMetabolics_MuscleParameters glmin1_l: socket_muscle=/forceset/glmin1_l
                  use_provided_muscle_mass=false
              Bhargava2004SmoothedMuscleMetabolics_MuscleParameters glmin2_l: socket_muscle=/forceset/glmin2_l
                  use_provided_muscle_mass=false
              Bhargava2004SmoothedMuscleMetabolics_MuscleParameters glmin3_l: socket_muscle=/forceset/glmin3_l
                  use_provided_muscle_mass=false
              Bhargava2004SmoothedMuscleMetabolics_MuscleParameters grac_l: socket_muscle=/forceset/grac_l
                  use_provided_muscle_mass=false
              Bhargava2004SmoothedMuscleMetabolics_MuscleParameters iliacus_l: socket_muscle=/forceset/iliacus_l
                  use_provided_muscle_mass=false
              Bhargava2004SmoothedMuscleMetabolics_MuscleParameters perbrev_l: socket_muscle=/forceset/perbrev_l
                  use_provided_muscle_mass=false
              Bhargava2004SmoothedMuscleMetabolics_MuscleParameters perlong_l: socket_muscle=/forceset/perlong_l
                  use_provided_muscle_mass=false
              Bhargava2004SmoothedMuscleMetabolics_MuscleParameters piri_l: socket_muscle=/forceset/piri_l
                  use_provided_muscle_mass=false
              Bhargava2004SmoothedMuscleMetabolics_MuscleParameters psoas_l: socket_muscle=/forceset/psoas_l
                  use_provided_muscle_mass=false
              Bhargava2004SmoothedMuscleMetabolics_MuscleParameters recfem_l: socket_muscle=/forceset/recfem_l
                  use_provided_muscle_mass=false
              Bhargava2004SmoothedMuscleMetabolics_MuscleParameters sart_l: socket_muscle=/forceset/sart_l
                  use_provided_muscle_mass=false
              Bhargava2004SmoothedMuscleMetabolics_MuscleParameters semimem_l: socket_muscle=/forceset/semimem_l
                  use_provided_muscle_mass=false
              Bhargava2004SmoothedMuscleMetabolics_MuscleParameters semiten_l: socket_muscle=/forceset/semiten_l
                  use_provided_muscle_mass=false
              Bhargava2004SmoothedMuscleMetabolics_MuscleParameters soleus_l: socket_muscle=/forceset/soleus_l
                  use_provided_muscle_mass=false
              Bhargava2004SmoothedMuscleMetabolics_MuscleParameters tfl_l: socket_muscle=/forceset/tfl_l
                  use_provided_muscle_mass=false
              Bhargava2004SmoothedMuscleMetabolics_MuscleParameters tibant_l: socket_muscle=/forceset/tibant_l
                  use_provided_muscle_mass=false
              Bhargava2004SmoothedMuscleMetabolics_MuscleParameters tibpost_l: socket_muscle=/forceset/tibpost_l
                  use_provided_muscle_mass=false
              Bhargava2004SmoothedMuscleMetabolics_MuscleParameters vasint_l: socket_muscle=/forceset/vasint_l
                  use_provided_muscle_mass=false
              Bhargava2004SmoothedMuscleMetabolics_MuscleParameters vaslat_l: socket_muscle=/forceset/vaslat_l
                  use_provided_muscle_mass=false
              Bhargava2004SmoothedMuscleMetabolics_MuscleParameters vasmed_l: socket_muscle=/forceset/vasmed_l
                  use_provided_muscle_mass=false
          Ground
          BodySet:
            Body pelvis: mass=12.59515 [kg] mass_center=(-0.06398916 0 0)
                inertia=(0.1317352 0.1317352 0.05543826 0 0 0) meshes=(r_pelvis.vtp l_pelvis.vtp sacrum.vtp)
              PhysicalOffsetFrame pelvis_imu_offset: socket_parent=..
                  translation=(-0.1436124 0.03214814 -0.001035643) [meters]
                  orientation=(-1.73798 0.1704723 0.05085138) [radians]
              WrapCylinder Gmax1_at_pelvis_r: xyz_body_rotation=(-0.6 0.45 0)
                  translation=(-0.06969116 -0.09792882 0.0700036) quadrant=-x radius=0.03974516 length=0.1598254
              WrapCylinder Gmax2_at_pelvis_r: xyz_body_rotation=(-0.75 0.39 0)
                  translation=(-0.0724064 -0.08210194 0.0780368) quadrant=all radius=0.0399519 length=0.1053794
              WrapCylinder Gmax3_at_pelvis_r: xyz_body_rotation=(-0.1 0 0)
                  translation=(-0.07512164 -0.08704784 0.0780368) quadrant=all radius=0.03791928 length=0.1146129
              WrapCylinder Gmax1_at_pelvis_l: xyz_body_rotation=(0.6 -0.45 0)
                  translation=(-0.06969116 -0.09792882 -0.0700036) quadrant=-x radius=0.03974516 length=0.1598254
              WrapCylinder Gmax2_at_pelvis_l: xyz_body_rotation=(0.75 -0.39 0)
                  translation=(-0.0724064 -0.08210194 -0.0780368) quadrant=all radius=0.0399519 length=0.1053794
              WrapCylinder Gmax3_at_pelvis_l: xyz_body_rotation=(0.1 0 0)
                  translation=(-0.07512164 -0.08704784 -0.0780368) quadrant=all radius=0.03791928 length=0.1146129
              WrapCylinder PS_at_brim_r: xyz_body_rotation=(-0.25 -0.27 0.1)
                  translation=(-0.06697592 -0.0593508 0.07528256) quadrant=-y radius=0.04807801 length=0.1123531
              WrapCylinder PS_at_brim_l: xyz_body_rotation=(0.25 0.27 0.1)
                  translation=(-0.06697592 -0.0593508 -0.07528256) quadrant=-y radius=0.04807801 length=0.1123531
              WrapCylinder IL_at_brim_r: xyz_body_rotation=(-0.32 -0.24 0.9)
                  translation=(-0.06426068 -0.0642967 0.08675856) quadrant=-y radius=0.05290616 length=0.1121274
              WrapCylinder IL_at_brim_l: xyz_body_rotation=(0.32 0.24 0.9)
                  translation=(-0.06426068 -0.0642967 -0.08675856) quadrant=-y radius=0.05290616 length=0.1121274
            Body femur_r: mass=9.94757 mass_center=(0 -0.1690769 0) inertia=(0.1461192 0.04606793 0.1461192 0 0 0)
                meshes=r_femur.vtp
              PhysicalOffsetFrame femur_r_imu_offset: socket_parent=.. translation=(0.005897599 -0.3053957 0.05801713)
                  orientation=(-1.356385 0.1226684 -0.02663887)
              WrapCylinder GasLat_at_condyles_r: translation=(0.0053525 -0.4077737 0) quadrant=all radius=0.02684591
                  length=0.11464
              WrapCylinder GasMed_at_condyles_r: translation=(0.0053525 -0.4077737 0) quadrant=all radius=0.02581337
                  length=0.11464
              WrapCylinder KnExt_at_fem_r: xyz_body_rotation=(-0.0623366 0.0507601 0)
                  translation=(0.003841254 -0.4005452 0.002397249) quadrant=all radius=0.02582381 length=0.1145662
              WrapCylinder KnExtVL_at_fem_r: xyz_body_rotation=(-0.0623366 0.0507601 0)
                  translation=(0.002021404 -0.4005452 0.002397249) quadrant=all radius=0.02582381 length=0.1145662
              WrapCylinder AB_at_femshaft_r: xyz_body_rotation=(1.66157 0.186644 0)
                  translation=(0.01567576 -0.1119836 0.02678564) quadrant=all radius=0.01825933 length=0.0699001
              WrapCylinder AL_at_femshaft_r: xyz_body_rotation=(1.77711 0.136489 0)
                  translation=(0.03289936 -0.2306497 0.01732635) quadrant=all radius=0.02220745 length=0.1002727
              WrapCylinder AMprox_at_femshaft_r: xyz_body_rotation=(1.61126 0.18656 0)
                  translation=(0.005548391 -0.07249898 0.029122) quadrant=all radius=0.02335932 length=0.0698275
              WrapCylinder AMmid_at_femshaft_r: xyz_body_rotation=(1.61139 0.13656 0)
                  translation=(0.02463488 -0.1598383 0.02359773) quadrant=all radius=0.02370385 length=0.1195552
              WrapCylinder AMdist_at_femshaft_r: xyz_body_rotation=(1.71188 0.186636 0)
                  translation=(0.03383476 -0.2593202 0.01073558) quadrant=all radius=0.02410723 length=0.2000774
              WrapCylinder AMisch_at_condyles_r: xyz_body_rotation=(1.71115 -0.463363 0)
                  translation=(-0.024248 -0.3747848 -0.00361617) quadrant=all radius=0.04399983 length=0.2430508
              WrapCylinder PECT_at_femshaft_r: xyz_body_rotation=(1.81295 0.276344 0)
                  translation=(0.006514774 -0.08404405 0.03489699) quadrant=all radius=0.01652929 length=0.05045151
            Body tibia_r: mass=3.965061 mass_center=(0 -0.1877455 0) inertia=(0.05418603 0.004874257 0.05418603 0 0 0)
                meshes=(r_tibia.vtp r_fibula.vtp)
              PhysicalOffsetFrame tibia_r_imu_offset: socket_parent=.. translation=(0.004983722 -0.2880661 -0.01511925)
                  orientation=(-1.685455 0.2005051 0.02293258)
              WrapCylinder GasLat_at_shank_r: xyz_body_rotation=(2.96723 -0.279725 -1.47812)
                  translation=(-0.007145218 -0.0744144 -0.003054216) quadrant=-y radius=0.05406733 length=0.09309457
              WrapCylinder GasMed_at_shank_r: xyz_body_rotation=(2.96723 0.0279725 -1.47812)
                  translation=(-0.007145218 -0.0744144 -0.003054216) quadrant=-y radius=0.05808061 length=0.09280609
              WrapCylinder GR_at_condyles_r: xyz_body_rotation=(0 -0.4 0) translation=(-0.00289671 -0.020112 0)
                  quadrant=all radius=0.03537367 length=0.09317042
              WrapCylinder SM_at_condyles_r: xyz_body_rotation=(0 -0.1 0) translation=(-0.00096557 -0.020112 0)
                  quadrant=all radius=0.03399594 length=0.09259277
              WrapCylinder ST_at_condyles_r: xyz_body_rotation=(0 -0.2 0) translation=(-0.00193114 -0.0206148 0)
                  quadrant=all radius=0.04185444 length=0.09271335
              WrapCylinder BF_at_gastroc_r: translation=(-0.03765723 -0.060336 0) quadrant=y radius=0.02858197
                  length=0.138828
            Body patella_r: mass=0.09218833 mass_center=(0.0018 0.0264 0)
                inertia=(3.06938e-6 1.402075e-5 1.402075e-5 0 0 0) meshes=r_patella.vtp
            Body talus_r: mass=0.106947 mass_center=(0 0 0) inertia=(0.0006403363 0.0006403363 0.0006403363 0 0 0)
                meshes=r_talus.vtp
            Body calcn_r: mass=1.336838 mass_center=(0.07737839 0.02321352 0)
                inertia=(0.0008964708 0.002497311 0.002625379 0 0 0) meshes=r_foot.vtp
            Body toes_r: mass=0.2316473 mass_center=(0.02677292 0.004642703 -0.01354122)
                inertia=(6.403363e-5 0.0001280673 0.0006403363 0 0 0) meshes=r_bofoot.vtp
              PhysicalOffsetFrame toes_r_imu_offset: socket_parent=.. translation=(0 0.01 0)
                  orientation=(-1.308449 0.2094079 -0.1182096)
            Body femur_l: mass=9.94757 mass_center=(0 -0.1690769 0) inertia=(0.1461192 0.04606793 0.1461192 0 0 0)
                meshes=l_femur.vtp
              PhysicalOffsetFrame femur_l_imu_offset: socket_parent=.. translation=(0.005897599 -0.3053957 -0.05801713)
                  orientation=(-1.703079 -0.06288947 -0.008362359)
              WrapCylinder GasLat_at_condyles_l: translation=(0.0053525 -0.4077737 0) quadrant=all radius=0.02684591
                  length=0.11464
              WrapCylinder GasMed_at_condyles_l: translation=(0.0053525 -0.4077737 0) quadrant=all radius=0.02581337
                  length=0.11464
              WrapCylinder KnExt_at_fem_l: xyz_body_rotation=(0.0623366 -0.0507601 0)
                  translation=(0.003841254 -0.4005452 -0.002397249) quadrant=all radius=0.02582381 length=0.1145662
              WrapCylinder KnExtVL_at_fem_l: xyz_body_rotation=(0.0623366 -0.0507601 0)
                  translation=(0.002021404 -0.4005452 -0.002397249) quadrant=all radius=0.02582381 length=0.1145662
              WrapCylinder AB_at_femshaft_l: xyz_body_rotation=(-1.66157 -0.186644 0)
                  translation=(0.01567576 -0.1119836 -0.02678564) quadrant=all radius=0.01825933 length=0.0699001
              WrapCylinder AL_at_femshaft_l: xyz_body_rotation=(-1.77711 -0.136489 0)
                  translation=(0.03289936 -0.2306497 -0.01732635) quadrant=all radius=0.02220745 length=0.1002727
              WrapCylinder AMprox_at_femshaft_l: xyz_body_rotation=(-1.61126 -0.18656 0)
                  translation=(0.005548391 -0.07249898 -0.029122) quadrant=all radius=0.02335932 length=0.0698275
              WrapCylinder AMmid_at_femshaft_l: xyz_body_rotation=(-1.61139 -0.13656 0)
                  translation=(0.02463488 -0.1598383 -0.02359773) quadrant=all radius=0.02370385 length=0.1195552
              WrapCylinder AMdist_at_femshaft_l: xyz_body_rotation=(-1.71188 -0.186636 0)
                  translation=(0.03383476 -0.2593202 -0.01073558) quadrant=all radius=0.02410723 length=0.2000774
              WrapCylinder AMisch_at_condyles_l: xyz_body_rotation=(-1.71115 0.463363 0)
                  translation=(-0.024248 -0.3747848 0.00361617) quadrant=all radius=0.04399983 length=0.2430508
              WrapCylinder PECT_at_femshaft_l: xyz_body_rotation=(-1.81295 -0.276344 0)
                  translation=(0.006514774 -0.08404405 -0.03489699) quadrant=all radius=0.01652929 length=0.05045151
            Body tibia_l: mass=3.965061 mass_center=(0 -0.1877455 0) inertia=(0.05418603 0.004874257 0.05418603 0 0 0)
                meshes=(l_tibia.vtp l_fibula.vtp)
              PhysicalOffsetFrame tibia_l_imu_offset: socket_parent=.. translation=(0.0140055 -0.288061 0.01497133)
                  orientation=(-1.518345 0.1462621 -0.007651216)
              WrapCylinder GasLat_at_shank_l: xyz_body_rotation=(-2.96723 0.279725 -1.47812)
                  translation=(-0.007145218 -0.0744144 0.003054216) quadrant=-y radius=0.05406733 length=0.09309457
              WrapCylinder GasMed_at_shank_l: xyz_body_rotation=(-2.96723 -0.0279725 -1.47812)
                  translation=(-0.007145218 -0.0744144 0.003054216) quadrant=-y radius=0.05808061 length=0.09280609
              WrapCylinder GR_at_condyles_l: xyz_body_rotation=(0 0.4 0) translation=(-0.00289671 -0.020112 0)
                  quadrant=all radius=0.03537367 length=0.09317042
              WrapCylinder SM_at_condyles_l: xyz_body_rotation=(0 0.1 0) translation=(-0.00096557 -0.020112 0)
                  quadrant=all radius=0.03399594 length=0.09259277
              WrapCylinder ST_at_condyles_l: xyz_body_rotation=(0 0.2 0) translation=(-0.00193114 -0.0206148 0)
                  quadrant=all radius=0.04185444 length=0.09271335
              WrapCylinder BF_at_gastroc_l: translation=(-0.03765723 -0.060336 0) quadrant=all radius=0.02858197
                  length=0.138828
            Body patella_l: mass=0.09218833 mass_center=(0.0018 0.0264 0)
                inertia=(3.06938e-6 1.402075e-5 1.402075e-5 0 0 0) meshes=l_patella.vtp
            Body talus_l: mass=0.106947 mass_center=(0 0 0) inertia=(0.0006403363 0.0006403363 0.0006403363 0 0 0)
                meshes=l_talus.vtp
            Body calcn_l: mass=1.336838 mass_center=(0.07737839 0.02321352 0)
                inertia=(0.0008964708 0.002497311 0.002625379 0 0 0) meshes=l_foot.vtp
            Body toes_l: mass=0.2316473 mass_center=(0.02677292 0.004642703 0.01354122)
                inertia=(6.403363e-5 0.0001280673 0.0006403363 0 0 0) meshes=l_bofoot.vtp
              PhysicalOffsetFrame toes_l_imu_offset: socket_parent=.. translation=(0 0.01 0)
                  orientation=(-1.765029 0.2172414 0.0881486)
            Body torso: mass=36.24435 mass_center=(-0.02815688 0.3003401 0) inertia=(1.389121 0.7117537 1.348516 0 0 0)
                meshes=(hat_spine.vtp hat_jaw.vtp hat_skull.vtp hat_ribs_scap.vtp)
              PhysicalOffsetFrame torso_imu_offset: socket_parent=.. translation=(0.03369945 0.3691544 1.543185e-7)
                  orientation=(-1.638214 -0.5168109 -0.03334975)
          JointSet:
            CustomJoint ground_pelvis: socket_parent_frame=ground_offset socket_child_frame=pelvis_offset
              Coordinate pelvis_tilt: default_value=0 range=(-1.570796 1.570796) clamped=true
              Coordinate pelvis_list: default_value=0 range=(-1.570796 1.570796) clamped=true
              Coordinate pelvis_rotation: default_value=0 range=(-6.283185 6.283185) clamped=true
              Coordinate pelvis_tx: default_value=0 range=(-50 50) clamped=true
              Coordinate pelvis_ty: default_value=0.94 range=(-1 2) clamped=true
              Coordinate pelvis_tz: default_value=0 range=(-3 3) clamped=true
              PhysicalOffsetFrame ground_offset: socket_parent=/ground translation=(0 0 0)
              PhysicalOffsetFrame pelvis_offset: socket_parent=/bodyset/pelvis translation=(0 0 0)
              SpatialTransform:
                TransformAxis rotation1: coordinates=pelvis_tilt axis=(0 0 1) LinearFunction(coefficients=1 0)
                TransformAxis rotation2: coordinates=pelvis_list axis=(1 0 0) LinearFunction(coefficients=1 0)
                TransformAxis rotation3: coordinates=pelvis_rotation axis=(0 1 0) LinearFunction(coefficients=1 0)
                TransformAxis translation1: coordinates=pelvis_tx axis=(1 0 0) LinearFunction(coefficients=1 0)
                TransformAxis translation2: coordinates=pelvis_ty axis=(0 1 0) LinearFunction(coefficients=1 0)
                TransformAxis translation3: coordinates=pelvis_tz axis=(0 0 1) LinearFunction(coefficients=1 0)
            CustomJoint hip_r: socket_parent_frame=pelvis_offset socket_child_frame=femur_r_offset
              Coordinate hip_flexion_r: default_value=0 range=(-0.5235988 2.094395) clamped=true
              Coordinate hip_adduction_r: default_value=0 range=(-0.8726646 0.5235988) clamped=true
              Coordinate hip_rotation_r: default_value=0 range=(-0.6981317 0.6981317) clamped=true
              PhysicalOffsetFrame pelvis_offset: socket_parent=/bodyset/pelvis
                  translation=(-0.05093428 -0.07764074 0.08866358)
              PhysicalOffsetFrame femur_r_offset: socket_parent=/bodyset/femur_r translation=(0 0 0)
              SpatialTransform: axes_held_at_zero=(translation1 translation2 translation3)
                TransformAxis rotation1: coordinates=hip_flexion_r axis=(0 0 1) LinearFunction(coefficients=1 0)
                TransformAxis rotation2: coordinates=hip_adduction_r axis=(1 0 0) LinearFunction(coefficients=1 0)
                TransformAxis rotation3: coordinates=hip_rotation_r axis=(0 1 0) LinearFunction(coefficients=1 0)
            CustomJoint knee_r: socket_parent_frame=femur_r_offset socket_child_frame=tibia_r_offset
              Coordinate knee_angle_r: default_value=0 range=(0 2.443461) clamped=true
              PhysicalOffsetFrame femur_r_offset: socket_parent=/bodyset/femur_r
                  translation=(-0.00481725 -0.4073759 -0.0020062) orientation=(-1.64157 1.44618 1.5708)
              PhysicalOffsetFrame tibia_r_offset: socket_parent=/bodyset/tibia_r
                  translation=(-0.007811017 -0.003554595 -0.001374157) orientation=(-1.64157 1.44618 1.5708)
              SpatialTransform:
                TransformAxis rotation1: coordinates=knee_angle_r axis=(1 0 0) LinearFunction(coefficients=1 0)
                TransformAxis rotation2: coordinates=knee_angle_r axis=(0 0 1)
                  PolynomialFunction: coefficients=(0.01083209 -0.02521833 -0.03284781 0.07910001 -1.473252e-8)
                TransformAxis rotation3: coordinates=knee_angle_r axis=(0 1 0)
                  PolynomialFunction: coefficients=(0.02516576 -0.1694801 0.3694993 -4.430358e-8)
                TransformAxis translation1: coordinates=knee_angle_r axis=(1 0 0)
                  MultiplierFunction: scale=1.0705
                    PolynomialFunction: coefficients=(0.0001590448 -0.00101515 0.001817511 2.641427e-5 -7.746564e-7)
                TransformAxis translation2: coordinates=knee_angle_r axis=(0 1 0)
                  MultiplierFunction: scale=0.99457
                    PolynomialFunction: coefficients=(-0.0005796878 0.005079766 -0.01144238 0.003936909 -2.51635e-5)
                TransformAxis translation3: coordinates=knee_angle_r axis=(0 0 1)
                  MultiplierFunction: scale=1.1464
                    PolynomialFunction: coefficients=(0.001208087 -0.004453611 0.0006116494 0.00626543 -1.461913e-5)
            CustomJoint patellofemoral_r: socket_parent_frame=femur_r_offset socket_child_frame=patella_r_offset
              Coordinate knee_angle_r_beta: default_value=0 range=(-99999.9 99999.9) clamped=false
              PhysicalOffsetFrame femur_r_offset: socket_parent=/bodyset/femur_r
                  translation=(-0.008660345 -0.4057448 -0.0031526)
              PhysicalOffsetFrame patella_r_offset: socket_parent=/bodyset/patella_r translation=(0 0 0)
              SpatialTransform: axes_held_at_zero=(rotation2 rotation3)
                TransformAxis rotation1: coordinates=knee_angle_r_beta axis=(0 0 1)
                  SimmSpline: x=(0 0.174533 0.349066 0.523599 0.698132 0.872665 1.0472 1.22173 1.39626 1.5708 1.74533 1.91986 2.0944)
                      y=(0.00113686 -0.00629212 -0.105582 -0.253683 -0.414245 -0.579047 -0.747244 -0.91799 -1.09044 -1.26379 -1.43763 -1.61186 -1.78634)
                TransformAxis translation1: coordinates=knee_angle_r_beta axis=(1 0 0)
                  MultiplierFunction: scale=1.0705
                    SimmSpline: x=(0 0.174533 0.349066 0.523599 0.698132 0.872665 1.0472 1.22173 1.39626 1.5708 1.74533 1.91986 2.0944)
                        y=(0.0524 0.0488 0.0437 0.0371 0.0296 0.0216 0.0136 0.0057 -0.0019 -0.0088 -0.0148 -0.0196 -0.0227)
                TransformAxis translation2: coordinates=knee_angle_r_beta axis=(0 1 0)
                  MultiplierFunction: scale=0.99457
                    SimmSpline: x=(0 0.174533 0.349066 0.523599 0.698132 0.872665 1.0472 1.22173 1.39626 1.5708 1.74533 1.91986 2.0944)
                        y=(-0.0108 -0.019 -0.0263 -0.0322 -0.0367 -0.0395 -0.0408 -0.0404 -0.0384 -0.0349 -0.0301 -0.0245 -0.0187)
                TransformAxis translation3: axis=(0 0 1) MultiplierFunction(scale=1.1464, Constant(value=0.00275))
            PinJoint ankle_r: socket_parent_frame=tibia_r_offset socket_child_frame=talus_r_offset
              Coordinate ankle_angle_r: default_value=0 range=(-0.8726646 0.8726646) clamped=true
              PhysicalOffsetFrame tibia_r_offset: socket_parent=/bodyset/tibia_r translation=(-0.0096557 -0.40224 0)
                  orientation=(0.175895 -0.105208 0.0186622)
              PhysicalOffsetFrame talus_r_offset: socket_parent=/bodyset/talus_r translation=(0 0 0)
                  orientation=(0.175895 -0.105208 0.0186622)
            PinJoint subtalar_r: socket_parent_frame=talus_r_offset socket_child_frame=calcn_r_offset
              Coordinate subtalar_angle_r: default_value=0 range=(-0.6108652 0.6108652) clamped=true
              PhysicalOffsetFrame talus_r_offset: socket_parent=/bodyset/talus_r
                  translation=(-0.03773744 -0.03246024 0.006128369) orientation=(-1.76819 0.906223 1.8196)
              PhysicalOffsetFrame calcn_r_offset: socket_parent=/bodyset/calcn_r translation=(0 0 0)
                  orientation=(-1.76819 0.906223 1.8196)
            PinJoint mtp_r: socket_parent_frame=calcn_r_offset socket_child_frame=toes_r_offset
              Coordinate mtp_angle_r: default_value=0 range=(-0.7853982 0.5235988) clamped=true
              PhysicalOffsetFrame calcn_r_offset: socket_parent=/bodyset/calcn_r
                  translation=(0.1383526 -0.001547568 0.0008356866) orientation=(-3.14159 0.619901 0)
              PhysicalOffsetFrame toes_r_offset: socket_parent=/bodyset/toes_r translation=(0 0 0)
                  orientation=(-3.14159 0.619901 0)
            CustomJoint hip_l: socket_parent_frame=pelvis_offset socket_child_frame=femur_l_offset
              Coordinate hip_flexion_l: default_value=0 range=(-0.5235988 2.094395) clamped=true
              Coordinate hip_adduction_l: default_value=0 range=(-0.8726646 0.5235988) clamped=true
              Coordinate hip_rotation_l: default_value=0 range=(-0.6981317 0.6981317) clamped=true
              PhysicalOffsetFrame pelvis_offset: socket_parent=/bodyset/pelvis
                  translation=(-0.05093428 -0.07764074 -0.08866358)
              PhysicalOffsetFrame femur_l_offset: socket_parent=/bodyset/femur_l translation=(0 0 0)
              SpatialTransform: axes_held_at_zero=(translation1 translation2 translation3)
                TransformAxis rotation1: coordinates=hip_flexion_l axis=(0 0 1) LinearFunction(coefficients=1 0)
                TransformAxis rotation2: coordinates=hip_adduction_l axis=(1 0 0) LinearFunction(coefficients=-1 0)
                TransformAxis rotation3: coordinates=hip_rotation_l axis=(0 1 0) LinearFunction(coefficients=-1 0)
            CustomJoint knee_l: socket_parent_frame=femur_l_offset socket_child_frame=tibia_l_offset
              Coordinate knee_angle_l: default_value=0 range=(0 2.443461) clamped=true
              PhysicalOffsetFrame femur_l_offset: socket_parent=/bodyset/femur_l
                  translation=(-0.00481725 -0.4073759 0.0020062) orientation=(1.64157 -1.44618 1.5708)
              PhysicalOffsetFrame tibia_l_offset: socket_parent=/bodyset/tibia_l
                  translation=(-0.007811017 -0.003554595 0.001374157) orientation=(1.64157 -1.44618 1.5708)
              SpatialTransform:
                TransformAxis rotation1: coordinates=knee_angle_l axis=(-1 0 0) LinearFunction(coefficients=1 0)
                TransformAxis rotation2: coordinates=knee_angle_l axis=(0 0 1)
                  PolynomialFunction: coefficients=(0.01083209 -0.02521833 -0.03284781 0.07910001 -1.473252e-8)
                TransformAxis rotation3: coordinates=knee_angle_l axis=(0 1 0)
                  PolynomialFunction: coefficients=(-0.02516576 0.1694801 -0.3694993 4.430358e-8)
                TransformAxis translation1: coordinates=knee_angle_l axis=(1 0 0)
                  MultiplierFunction: scale=1.0705
                    PolynomialFunction: coefficients=(0.0001590448 -0.00101515 0.001817511 2.641427e-5 -7.746564e-7)
                TransformAxis translation2: coordinates=knee_angle_l axis=(0 1 0)
                  MultiplierFunction: scale=0.99457
                    PolynomialFunction: coefficients=(-0.0005796878 0.005079766 -0.01144238 0.003936909 -2.51635e-5)
                TransformAxis translation3: coordinates=knee_angle_l axis=(0 0 1)
                  MultiplierFunction: scale=1.1464
                    PolynomialFunction: coefficients=(-0.001208087 0.004453611 -0.0006116494 -0.00626543 1.461913e-5)
            CustomJoint patellofemoral_l: socket_parent_frame=femur_l_offset socket_child_frame=patella_l_offset
              Coordinate knee_angle_l_beta: default_value=0 range=(-99999.9 99999.9) clamped=false
              PhysicalOffsetFrame femur_l_offset: socket_parent=/bodyset/femur_l
                  translation=(-0.008660345 -0.4057448 0.0031526)
              PhysicalOffsetFrame patella_l_offset: socket_parent=/bodyset/patella_l translation=(0 0 0)
              SpatialTransform: axes_held_at_zero=(rotation2 rotation3)
                TransformAxis rotation1: coordinates=knee_angle_l_beta axis=(0 0 1)
                  SimmSpline: x=(0 0.174533 0.349066 0.523599 0.698132 0.872665 1.0472 1.22173 1.39626 1.5708 1.74533 1.91986 2.0944)
                      y=(0.00113686 -0.00629212 -0.105582 -0.253683 -0.414245 -0.579047 -0.747244 -0.91799 -1.09044 -1.26379 -1.43763 -1.61186 -1.78634)
                TransformAxis translation1: coordinates=knee_angle_l_beta axis=(1 0 0)
                  MultiplierFunction: scale=1.0705
                    SimmSpline: x=(0 0.174533 0.349066 0.523599 0.698132 0.872665 1.0472 1.22173 1.39626 1.5708 1.74533 1.91986 2.0944)
                        y=(0.0524 0.0488 0.0437 0.0371 0.0296 0.0216 0.0136 0.0057 -0.0019 -0.0088 -0.0148 -0.0196 -0.0227)
                TransformAxis translation2: coordinates=knee_angle_l_beta axis=(0 1 0)
                  MultiplierFunction: scale=0.99457
                    SimmSpline: x=(0 0.174533 0.349066 0.523599 0.698132 0.872665 1.0472 1.22173 1.39626 1.5708 1.74533 1.91986 2.0944)
                        y=(-0.0108 -0.019 -0.0263 -0.0322 -0.0367 -0.0395 -0.0408 -0.0404 -0.0384 -0.0349 -0.0301 -0.0245 -0.0187)
                TransformAxis translation3: axis=(0 0 1) MultiplierFunction(scale=1.1464, Constant(value=-0.00275))
            PinJoint ankle_l: socket_parent_frame=tibia_l_offset socket_child_frame=talus_l_offset
              Coordinate ankle_angle_l: default_value=0 range=(-0.8726646 0.8726646) clamped=true
              PhysicalOffsetFrame tibia_l_offset: socket_parent=/bodyset/tibia_l translation=(-0.0096557 -0.40224 0)
                  orientation=(-0.175895 0.105208 0.0186622)
              PhysicalOffsetFrame talus_l_offset: socket_parent=/bodyset/talus_l translation=(0 0 0)
                  orientation=(-0.175895 0.105208 0.0186622)
            PinJoint subtalar_l: socket_parent_frame=talus_l_offset socket_child_frame=calcn_l_offset
              Coordinate subtalar_angle_l: default_value=0 range=(-0.6108652 0.6108652) clamped=true
              PhysicalOffsetFrame talus_l_offset: socket_parent=/bodyset/talus_l
                  translation=(-0.03773744 -0.03246024 -0.006128369) orientation=(1.76819 -0.906223 1.8196)
              PhysicalOffsetFrame calcn_l_offset: socket_parent=/bodyset/calcn_l translation=(0 0 0)
                  orientation=(1.76819 -0.906223 1.8196)
            PinJoint mtp_l: socket_parent_frame=calcn_l_offset socket_child_frame=toes_l_offset
              Coordinate mtp_angle_l: default_value=0 range=(-0.7853982 0.5235988) clamped=true
              PhysicalOffsetFrame calcn_l_offset: socket_parent=/bodyset/calcn_l
                  translation=(0.1383526 -0.001547568 -0.0008356866) orientation=(-3.14159 -0.619901 0)
              PhysicalOffsetFrame toes_l_offset: socket_parent=/bodyset/toes_l translation=(0 0 0)
                  orientation=(-3.14159 -0.619901 0)
            CustomJoint lumbar: socket_parent_frame=pelvis_offset socket_child_frame=torso_offset
              Coordinate lumbar_ext: default_value=0 range=(-1.570796 1.570796) clamped=true
              Coordinate lumbar_bend: default_value=0 range=(-1.570796 1.570796) clamped=true
              Coordinate lumbar_rota: default_value=0 range=(-1.570796 1.570796) clamped=true
              PhysicalOffsetFrame pelvis_offset: socket_parent=/bodyset/pelvis translation=(-0.09114156 0.08061817 0)
              PhysicalOffsetFrame torso_offset: socket_parent=/bodyset/torso translation=(0 0 0)
              SpatialTransform: axes_held_at_zero=(translation1 translation2 translation3)
                TransformAxis rotation1: coordinates=lumbar_ext axis=(0 0 1) LinearFunction(coefficients=1 0)
                TransformAxis rotation2: coordinates=lumbar_bend axis=(1 0 0) LinearFunction(coefficients=1 0)
                TransformAxis rotation3: coordinates=lumbar_rota axis=(0 1 0) LinearFunction(coefficients=1 0)
          ConstraintSet:
            CoordinateCouplerConstraint patellofemoral_knee_angle_r_con: independent_coordinate_names=knee_angle_r
                dependent_coordinate_name=knee_angle_r_beta scale_factor=1
                coupled_coordinates_function=LinearFunction(coefficients=1 0)
            CoordinateCouplerConstraint patellofemoral_knee_angle_l_con: independent_coordinate_names=knee_angle_l
                dependent_coordinate_name=knee_angle_l_beta scale_factor=1
                coupled_coordinates_function=LinearFunction(coefficients=1 0)
          ForceSet:
            ExpressionBasedCoordinateForce SubtalarDamping_r: coordinate=subtalar_angle_r
                expression=-60.21*exp(16.32*(q-0.65))+60.21*exp(-16.32*(q+0.65))-0.1*qdot
            ExpressionBasedCoordinateForce SubtalarDamping_l: coordinate=subtalar_angle_l
                expression=-60.21*exp(16.32*(q-0.65))+60.21*exp(-16.32*(q+0.65))-0.1*qdot
            ExpressionBasedCoordinateForce PassiveHipDampingX_r: coordinate=hip_flexion_r
                expression=-2.44*exp(5.05*(q-1.81))+1.51*exp(-21.88*(q+0.47))-0.1*qdot
            ExpressionBasedCoordinateForce PassiveHipDampingY_r: coordinate=hip_adduction_r
                expression=-0.03*exp(14.94*(q-0.50))+0.03*exp(-14.94*(q+0.50))-0.1*qdot
            ExpressionBasedCoordinateForce PassiveHipDampingZ_r: coordinate=hip_rotation_r
                expression=-0.03*exp(14.94*(q-0.92))+0.03*exp(-14.94*(q+0.92))-0.1*qdot
            ExpressionBasedCoordinateForce PassiveHipDampingX_l: coordinate=hip_flexion_l
                expression=-2.44*exp(5.05*(q-1.81))+1.51*exp(-21.88*(q+0.47))-0.1*qdot
            ExpressionBasedCoordinateForce PassiveHipDampingY_l: coordinate=hip_adduction_l
                expression=-0.03*exp(14.94*(q-0.50))+0.03*exp(-14.94*(q+0.50))-0.1*qdot
            ExpressionBasedCoordinateForce PassiveHipDampingZ_l: coordinate=hip_rotation_l
                expression=-0.03*exp(14.94*(q-0.92))+0.03*exp(-14.94*(q+0.92))-0.1*qdot
            ExpressionBasedCoordinateForce PassiveKneeDamping_r: coordinate=knee_angle_r
                expression=6.09*exp(33.94*(-q-0.13))-11.03*exp(-11.33*(-q+2.40))-0.1*qdot
            ExpressionBasedCoordinateForce PassiveKneeDamping_l: coordinate=knee_angle_l
                expression=6.09*exp(33.94*(-q-0.13))-11.03*exp(-11.33*(-q+2.40))-0.1*qdot
            ExpressionBasedBushingForce PassiveAnkleBushing_r: socket_frame1=/bodyset/tibia_r
                socket_frame2=/bodyset/calcn_r
                Mx_expression=9.52095038*theta_x-29.57608094*theta_x^2+169.01588105*theta_x^3
                My_expression=3.61796125*theta_y-10.1612135*theta_y^2+64.5279144*theta_y^3
                Mz_expression=5.98187224*theta_z+15.74951827*theta_z^2+33.6780792*theta_z^3 Fx_expression=0
                Fy_expression=0 Fz_expression=0 rotational_damping=(2 2 2) translational_damping=(0 0 0)
                moment_visual_scale=1 force_visual_scale=1 visual_aspect_ratio=1
              PhysicalOffsetFrame tibia_r_offset_bushing: socket_parent=/bodyset/tibia_r
                  translation=(-0.0096557 -0.40224 0) orientation=(0.175895 -0.105208 0.0186622)
              PhysicalOffsetFrame calcn_r_offset_bushing: socket_parent=/bodyset/calcn_r
                  translation=(0.03773744 0.03246024 -0.006128369) orientation=(0.175895 -0.105208 0.0186622)
            ExpressionBasedBushingForce PassiveAnkleBushing_l: socket_frame1=/bodyset/tibia_l
                socket_frame2=/bodyset/calcn_l
                Mx_expression=9.52095038*theta_x+29.57608094*theta_x^2+169.01588105*theta_x^3
                My_expression=3.61796125*theta_y+10.1612135*theta_y^2+64.5279144*theta_y^3
                Mz_expression=5.98187224*theta_z+15.74951827*theta_z^2+33.6780792*theta_z^3 Fx_expression=0
                Fy_expression=0 Fz_expression=0 rotational_damping=(2 2 2) translational_damping=(0 0 0)
                moment_visual_scale=1 force_visual_scale=1 visual_aspect_ratio=1
              PhysicalOffsetFrame tibia_l_offset_bushing: socket_parent=/bodyset/tibia_l
                  translation=(-0.0096557 -0.40224 0) orientation=(-0.175895 0.105208 0.0186622)
              PhysicalOffsetFrame calcn_l_offset_bushing: socket_parent=/bodyset/calcn_l
                  translation=(0.03773744 0.03246024 0.006128369) orientation=(-0.175895 0.105208 0.0186622)
            ExpressionBasedCoordinateForce PassiveToeDamping_r: coordinate=mtp_angle_r expression=-25.0*q-2.0*qdot
            ExpressionBasedCoordinateForce PassiveToeDamping_l: coordinate=mtp_angle_l expression=-25.0*q-2.0*qdot
            SmoothSphereHalfSpaceForce [values shared by the 22 below unless stated]: socket_half_space=/contactgeometryset/floor
                stiffness=306000 [N/m^2] dissipation=2 [s/m] static_friction=0.8 dynamic_friction=0.8
                viscous_friction=0.5 transition_velocity=0.2 [m/s] hertz_smoothing=300 hunt_crossley_smoothing=50
            SmoothSphereHalfSpaceForce SmoothSphereHalfSpaceForce_heel_r: socket_sphere=/contactgeometryset/heel_r
            SmoothSphereHalfSpaceForce SmoothSphereHalfSpaceForce_mh1_r: socket_sphere=/contactgeometryset/mh1_r
            SmoothSphereHalfSpaceForce SmoothSphereHalfSpaceForce_mh3_r: socket_sphere=/contactgeometryset/mh3_r
            SmoothSphereHalfSpaceForce SmoothSphereHalfSpaceForce_mh5_r: socket_sphere=/contactgeometryset/mh5_r
            SmoothSphereHalfSpaceForce SmoothSphereHalfSpaceForce_hallux_r: socket_sphere=/contactgeometryset/hallux_r
            SmoothSphereHalfSpaceForce SmoothSphereHalfSpaceForce_othertoes_r: socket_sphere=/contactgeometryset/othertoes_r
            SmoothSphereHalfSpaceForce SmoothSphereHalfSpaceForce_latheel_r: socket_sphere=/contactgeometryset/latheel_r
            SmoothSphereHalfSpaceForce SmoothSphereHalfSpaceForce_medheel_r: socket_sphere=/contactgeometryset/medheel_r
            SmoothSphereHalfSpaceForce SmoothSphereHalfSpaceForce_mid_r: socket_sphere=/contactgeometryset/mid_r
            SmoothSphereHalfSpaceForce SmoothSphereHalfSpaceForce_latmid_r: socket_sphere=/contactgeometryset/latmid_r
            SmoothSphereHalfSpaceForce SmoothSphereHalfSpaceForce_latmid_l: socket_sphere=/contactgeometryset/latmid_l
            SmoothSphereHalfSpaceForce SmoothSphereHalfSpaceForce_medmid_r: socket_sphere=/contactgeometryset/medmid_r
            SmoothSphereHalfSpaceForce SmoothSphereHalfSpaceForce_medmid_l: socket_sphere=/contactgeometryset/medmid_l
            SmoothSphereHalfSpaceForce SmoothSphereHalfSpaceForce_heel_l: socket_sphere=/contactgeometryset/heel_l
            SmoothSphereHalfSpaceForce SmoothSphereHalfSpaceForce_mh1_l: socket_sphere=/contactgeometryset/mh1_l
            SmoothSphereHalfSpaceForce SmoothSphereHalfSpaceForce_mh3_l: socket_sphere=/contactgeometryset/mh3_l
            SmoothSphereHalfSpaceForce SmoothSphereHalfSpaceForce_mh5_l: socket_sphere=/contactgeometryset/mh5_l
            SmoothSphereHalfSpaceForce SmoothSphereHalfSpaceForce_hallux_l: socket_sphere=/contactgeometryset/hallux_l
            SmoothSphereHalfSpaceForce SmoothSphereHalfSpaceForce_othertoes_l: socket_sphere=/contactgeometryset/othertoes_l
            SmoothSphereHalfSpaceForce SmoothSphereHalfSpaceForce_latheel_l: socket_sphere=/contactgeometryset/latheel_l
            SmoothSphereHalfSpaceForce SmoothSphereHalfSpaceForce_medheel_l: socket_sphere=/contactgeometryset/medheel_l
            SmoothSphereHalfSpaceForce SmoothSphereHalfSpaceForce_mid_l: socket_sphere=/contactgeometryset/mid_l
            CoordinateActuator lumbar_ext: coordinate=lumbar_ext optimal_force=10
            CoordinateActuator lumbar_bend: coordinate=lumbar_bend optimal_force=10
            CoordinateActuator lumbar_rot: coordinate=lumbar_rota optimal_force=10
            SpringGeneralizedForce R_toe_spring: coordinate=mtp_angle_r stiffness=25 rest_length=0 viscosity=0.03
            SpringGeneralizedForce L_toe_spring: coordinate=mtp_angle_l stiffness=25 rest_length=0 viscosity=0.03
            DeGrooteFregly2016Muscle [values shared by the 80 below unless stated]: min_control=0.01 max_control=3
                max_contraction_velocity=20 activation_time_constant=0.01 deactivation_time_constant=0.04
                default_activation=0.01 active_force_width_scale=1.5 fiber_damping=0.01
                tendon_strain_at_one_norm_force=0.049 ignore_passive_fiber_force=true
                tendon_compliance_dynamics_mode=implicit
            DeGrooteFregly2016Muscle addbrev_r: max_isometric_force=938.7295 optimal_fiber_length=0.1041096
                tendon_slack_length=0.04297172 pennation_angle_at_optimal=0.1147809 [radians]
                passive_fiber_strain_at_one_norm_force=0.5003515
              FunctionBasedPath path: coordinate_paths=(/jointset/hip_r/hip_flexion_r /jointset/hip_r/hip_adduction_r /jointset/hip_r/hip_rotation_r)
                length_function: MultivariatePolynomialFunction: coefficients=(0.1473053 -0.00407545 -0.005404952 0.0007631381 -0.0005217975 -0.0003464679 -0.05976587 -0.00225158 -0.0008910798 -0.0007245572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)
                    dimension=3 order=5
            DeGrooteFregly2016Muscle addlong_r: max_isometric_force=1375.2 optimal_fiber_length=0.1099603
                tendon_slack_length=0.1344698 pennation_angle_at_optimal=0.1377704
                passive_fiber_strain_at_one_norm_force=0.5001055
              FunctionBasedPath path: coordinate_paths=(/jointset/hip_r/hip_flexion_r /jointset/hip_r/hip_adduction_r /jointset/hip_r/hip_rotation_r)
                length_function: MultivariatePolynomialFunction: coefficients=(0.2452726 -0.006541909 -0.00143127 0.001165036 0.0003140852 5.706717e-5 -0.06577801 -0.001253177 -0.0001010129 -0.0001575464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)
                    dimension=3 order=5
            DeGrooteFregly2016Muscle addmagDist_r: max_isometric_force=895.9426 optimal_fiber_length=0.1781477
                tendon_slack_length=0.0872463 pennation_angle_at_optimal=0.194705
                passive_fiber_strain_at_one_norm_force=0.700002
              FunctionBasedPath path: coordinate_paths=(/jointset/hip_r/hip_flexion_r /jointset/hip_r/hip_adduction_r /jointset/hip_r/hip_rotation_r)
                length_function: MultivariatePolynomialFunction: coefficients=(0.2242872 -4.475607e-5 -0.00182776 0.0003818423 0.0001222679 -7.405881e-5 -0.05473271 0.001918151 0.0006966698 -0.0008661754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)
                    dimension=3 order=5
            DeGrooteFregly2016Muscle addmagIsch_r: max_isometric_force=895.9426 optimal_fiber_length=0.1541883
                tendon_slack_length=0.2158319 pennation_angle_at_optimal=0.1680443
                passive_fiber_strain_at_one_norm_force=0.7020883
              FunctionBasedPath path: coordinate_paths=(/jointset/hip_r/hip_flexion_r /jointset/hip_r/hip_adduction_r /jointset/hip_r/hip_rotation_r)
                length_function: MultivariatePolynomialFunction: coefficients=(0.3374825 -0.004379374 0.002644988 0.0006756325 0.0001181774 0.0001254384 -0.04026204 -0.0005145843 -0.002086979 0.0002843116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)
                    dimension=3 order=5
            DeGrooteFregly2016Muscle addmagMid_r: max_isometric_force=895.9426 optimal_fiber_length=0.1435837
                tendon_slack_length=0.04692103 pennation_angle_at_optimal=0.2073076
                passive_fiber_strain_at_one_norm_force=0.7000001
              FunctionBasedPath path: coordinate_paths=(/jointset/hip_r/hip_flexion_r /jointset/hip_r/hip_adduction_r /jointset/hip_r/hip_rotation_r)
                length_function: MultivariatePolynomialFunction: coefficients=(0.149839 -0.000185114 -0.004314831 0.001258275 0.0007212278 0.0001275671 -0.06975167 8.092154e-5 0.002228065 0.001488754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)
                    dimension=3 order=5
            DeGrooteFregly2016Muscle addmagProx_r: max_isometric_force=895.9426 optimal_fiber_length=0.1056241
                tendon_slack_length=0.05172425 pennation_angle_at_optimal=0.3114833
                passive_fiber_strain_at_one_norm_force=0.7000001
              FunctionBasedPath path: coordinate_paths=(/jointset/hip_r/hip_flexion_r /jointset/hip_r/hip_adduction_r /jointset/hip_r/hip_rotation_r)
                length_function: MultivariatePolynomialFunction: coefficients=(0.127906 0.006435535 -0.008906171 -0.0005855599 -0.001473806 -0.0009000423 -0.05362102 -0.00229384 -0.001254296 -0.002081373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)
                    dimension=3 order=5
            DeGrooteFregly2016Muscle bflh_r: max_isometric_force=1969.775 optimal_fiber_length=0.09299393
                tendon_slack_length=0.3327749 pennation_angle_at_optimal=0.1759182
                passive_fiber_strain_at_one_norm_force=0.887866
              FunctionBasedPath path: coordinate_paths=(/jointset/hip_r/hip_flexion_r /jointset/hip_r/hip_adduction_r /jointset/hip_r/hip_rotation_r /jointset/knee_r/knee_angle_r)
                length_function: MultivariatePolynomialFunction: coefficients=(0.4197787 -0.03011363 0.01035434 -0.01398697 0.006336217 -0.0008717319 0.005187483 0.001217027 6.315246e-5 -0.0001818677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)
                    dimension=4 order=5
            DeGrooteFregly2016Muscle bfsh_r: max_isometric_force=835.6721 optimal_fiber_length=0.08738472
                tendon_slack_length=0.121067 pennation_angle_at_optimal=0.2642232
                passive_fiber_strain_at_one_norm_force=0.6954765
              FunctionBasedPath path: coordinate_paths=/jointset/knee_r/knee_angle_r
                length_function: MultivariatePolynomialFunction: coefficients=(0.2289978 -0.02299341 0.01005814 -0.01180495 0.003798437 -0.0002142147)
                    dimension=1 order=5
            DeGrooteFregly2016Muscle edl_r: max_isometric_force=905.2472 optimal_fiber_length=0.08231791
                tendon_slack_length=0.3190626 pennation_angle_at_optimal=0.2182582
                passive_fiber_strain_at_one_norm_force=0.7092204
              FunctionBasedPath path: coordinate_paths=(/jointset/ankle_r/ankle_angle_r /jointset/subtalar_r/subtalar_angle_r /jointset/mtp_r/mtp_angle_r)
                length_function: MultivariatePolynomialFunction: coefficients=(0.4024384 0.004366393 -0.001310641 -0.0002557825 0.01221686 -3.791386e-5 1.516484e-5 -0.001583522 -0.0007936219 -0.0009604592 -0.03181651 2.642267e-5 -2.832002e-5 0.0002898807 0.0002086838 0.008299985 -0.003411255 -2.651299e-5 -0.002377286 0.001495651)
                    dimension=3 order=3
            DeGrooteFregly2016Muscle ehl_r: max_isometric_force=428.8013 optimal_fiber_length=0.08919386
                tendon_slack_length=0.2715022 pennation_angle_at_optimal=0.1972681
                passive_fiber_strain_at_one_norm_force=0.7196932
              FunctionBasedPath path: coordinate_paths=(/jointset/ankle_r/ankle_angle_r /jointset/subtalar_r/subtalar_angle_r /jointset/mtp_r/mtp_angle_r)
                length_function: MultivariatePolynomialFunction: coefficients=(0.3676273 0.005094911 -0.001974526 -0.0004763544 0.0001092497 -0.0003725344 1.41004e-5 6.950335e-5 -0.0001137744 -0.003171533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)
                    dimension=3 order=4
            DeGrooteFregly2016Muscle fdl_r: max_isometric_force=634.7656 optimal_fiber_length=0.05742218
                tendon_slack_length=0.3300889 pennation_angle_at_optimal=0.2248391
                passive_fiber_strain_at_one_norm_force=0.6998707
              FunctionBasedPath path: coordinate_paths=(/jointset/ankle_r/ankle_angle_r /jointset/subtalar_r/subtalar_angle_r /jointset/mtp_r/mtp_angle_r)
                length_function: MultivariatePolynomialFunction: coefficients=(0.378211 -0.005011671 -0.0008480856 0.0005533605 -0.01355554 -3.724108e-5 6.209193e-5 -0.0006621901 -0.0001800346 0.002135849 0.00631589 3.101563e-5 -5.691439e-5 0.0069959 0.0002196529 0.0002552739 -0.003829284 -5.292083e-5 0.004040087 -0.0006196447)
                    dimension=3 order=3
            DeGrooteFregly2016Muscle fhl_r: max_isometric_force=1361.759 optimal_fiber_length=0.06396792
                tendon_slack_length=0.3043883 pennation_angle_at_optimal=0.2580255
                passive_fiber_strain_at_one_norm_force=0.6999039
              FunctionBasedPath path: coordinate_paths=(/jointset/ankle_r/ankle_angle_r /jointset/subtalar_r/subtalar_angle_r /jointset/mtp_r/mtp_angle_r)
                length_function: MultivariatePolynomialFunction: coefficients=(0.3559223 -0.004477716 0.0008340986 0.0009951002 -0.01191281 -3.243025e-5 5.345563e-5 -0.0008406663 -0.0001345314 0.001830135 0.01129295 1.847542e-5 -4.383181e-5 0.005420672 0.0002086855 -0.0002154181 -0.004282267 -6.611073e-5 0.003188644 -0.0009493478)
                    dimension=3 order=3
            DeGrooteFregly2016Muscle gaslat_r: max_isometric_force=2362.589 optimal_fiber_length=0.0629668
                tendon_slack_length=0.375063 pennation_angle_at_optimal=0.2102268
                passive_fiber_strain_at_one_norm_force=0.5006752
              FunctionBasedPath path: coordinate_paths=(/jointset/knee_r/knee_angle_r /jointset/ankle_r/ankle_angle_r /jointset/subtalar_r/subtalar_angle_r)
                length_function: MultivariatePolynomialFunction: coefficients=(0.4522582 -0.004163866 0.007310368 0.0005919955 -0.001853568 0.006313878 0.03430792 -0.002164309 -0.004752615 0.000275561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)
                    dimension=3 order=5
            DeGrooteFregly2016Muscle gasmed_r: max_isometric_force=4673.272 optimal_fiber_length=0.05667364
                tendon_slack_length=0.3940908 pennation_angle_at_optimal=0.1656816
                passive_fiber_strain_at_one_norm_force=0.5002227
              FunctionBasedPath path: coordinate_paths=(/jointset/knee_r/knee_angle_r /jointset/ankle_r/ankle_angle_r /jointset/subtalar_r/subtalar_angle_r)
                length_function: MultivariatePolynomialFunction: coefficients=(0.456946 -0.001661869 0.0075268 0.0002941917 -0.000186189 -0.003202683 0.03284815 -0.003089123 -0.004150185 0.000380927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)
                    dimension=3 order=5
            DeGrooteFregly2016Muscle glmax1_r: max_isometric_force=1475.675 optimal_fiber_length=0.1360206
                tendon_slack_length=0.05937094 pennation_angle_at_optimal=0.3540118
                passive_fiber_strain_at_one_norm_force=0.7004337
              FunctionBasedPath path: coordinate_paths=(/jointset/hip_r/hip_flexion_r /jointset/hip_r/hip_adduction_r /jointset/hip_r/hip_rotation_r)
                length_function: MultivariatePolynomialFunction: coefficients=(0.192393 0.02281399 0.01484382 0.003107534 0.01188791 0.0009602963 0.02000682 0.02245969 -0.02567906 -0.008220056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)
                    dimension=3 order=5
            DeGrooteFregly2016Muscle glmax2_r: max_isometric_force=2109.069 optimal_fiber_length=0.1524323
                tendon_slack_length=0.07200725 pennation_angle_at_optimal=0.3673821
                passive_fiber_strain_at_one_norm_force=0.7008108
              FunctionBasedPath path: coordinate_paths=(/jointset/hip_r/hip_flexion_r /jointset/hip_r/hip_adduction_r /jointset/hip_r/hip_rotation_r)
                length_function: MultivariatePolynomialFunction: coefficients=(0.218839 0.02223785 0.01878134 -0.006848383 0.001618213 0.00152129 0.009171004 0.008426734 -0.009630657 -0.01514187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)
                    dimension=3 order=5
            DeGrooteFregly2016Muscle glmax3_r: max_isometric_force=1421.631 optimal_fiber_length=0.158909
                tendon_slack_length=0.08160148 pennation_angle_at_optimal=0.3824161
                passive_fiber_strain_at_one_norm_force=0.7018363
              FunctionBasedPath path: coordinate_paths=(/jointset/hip_r/hip_flexion_r /jointset/hip_r/hip_adduction_r /jointset/hip_r/hip_rotation_r)
                length_function: MultivariatePolynomialFunction: coefficients=(0.2236376 0.02091159 0.0052304 -0.006767597 -0.002081344 -0.0004171279 -0.05487769 -0.002962356 0.006883598 -0.0003187104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)
                    dimension=3 order=5
            DeGrooteFregly2016Muscle glmed1_r: max_isometric_force=1640.2 optimal_fiber_length=0.08679287
                tendon_slack_length=0.05080387 pennation_angle_at_optimal=0.3165559
                passive_fiber_strain_at_one_norm_force=0.7000001
              FunctionBasedPath path: coordinate_paths=(/jointset/hip_r/hip_flexion_r /jointset/hip_r/hip_adduction_r /jointset/hip_r/hip_rotation_r)
                length_function: MultivariatePolynomialFunction: coefficients=(0.1255489 -0.008615344 0.01167678 0.004190474 0.0009271222 0.0002703095 0.06177204 0.01577241 -0.03463308 -0.01050338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)
                    dimension=3 order=5
            DeGrooteFregly2016Muscle glmed2_r: max_isometric_force=1147.637 optimal_fiber_length=0.09385871
                tendon_slack_length=0.06844097 pennation_angle_at_optimal=0.3165559
                passive_fiber_strain_at_one_norm_force=0.7051739
              FunctionBasedPath path: coordinate_paths=(/jointset/hip_r/hip_flexion_r /jointset/hip_r/hip_adduction_r /jointset/hip_r/hip_rotation_r)
                length_function: MultivariatePolynomialFunction: coefficients=(0.1536824 0.009973276 0.002626381 -0.001939483 -0.0001771694 -6.383236e-5 0.05548621 0.01605113 -0.03231857 -0.005350636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)
                    dimension=3 order=5
            DeGrooteFregly2016Muscle glmed3_r: max_isometric_force=1306.799 optimal_fiber_length=0.08258429
                tendon_slack_length=0.04757605 pennation_angle_at_optimal=0.3165559
                passive_fiber_strain_at_one_norm_force=0.7950859
              FunctionBasedPath path: coordinate_paths=(/jointset/hip_r/hip_flexion_r /jointset/hip_r/hip_adduction_r /jointset/hip_r/hip_rotation_r)
                length_function: MultivariatePolynomialFunction: coefficients=(0.1234321 0.02295877 -0.001172779 -0.004818448 -0.0003108572 -0.0002318832 0.04438284 0.01634134 -0.02756339 -0.001323868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)
                    dimension=3 order=5
            DeGrooteFregly2016Muscle glmin1_r: max_isometric_force=561.0689 optimal_fiber_length=0.09063511
                tendon_slack_length=0.0116298 pennation_angle_at_optimal=0.1745329
                passive_fiber_strain_at_one_norm_force=0.7000001
              FunctionBasedPath path: coordinate_paths=(/jointset/hip_r/hip_flexion_r /jointset/hip_r/hip_adduction_r /jointset/hip_r/hip_rotation_r)
                length_function: MultivariatePolynomialFunction: coefficients=(0.09600238 -0.01286969 0.01775725 0.01039698 0.004746696 0.001348278 0.05906053 0.002758719 -0.03745897 -0.01021758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)
                    dimension=3 order=5
            DeGrooteFregly2016Muscle glmin2_r: max_isometric_force=592.2295 optimal_fiber_length=0.07696747
                tendon_slack_length=0.0249925 pennation_angle_at_optimal=0
                passive_fiber_strain_at_one_norm_force=0.6997238
              FunctionBasedPath path: coordinate_paths=(/jointset/hip_r/hip_flexion_r /jointset/hip_r/hip_adduction_r /jointset/hip_r/hip_rotation_r)
                length_function: MultivariatePolynomialFunction: coefficients=(0.1021833 0.004090818 0.008633475 0.001715002 0.002136125 0.0007299879 0.0533848 -0.007108618 -0.03564442 -0.006485618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)
                    dimension=3 order=5
            DeGrooteFregly2016Muscle glmin3_r: max_isometric_force=670.1607 optimal_fiber_length=0.03816675
                tendon_slack_length=0.04787247 pennation_angle_at_optimal=0.01745329
                passive_fiber_strain_at_one_norm_force=0.6988467
              FunctionBasedPath path: coordinate_paths=(/jointset/hip_r/hip_flexion_r /jointset/hip_r/hip_adduction_r /jointset/hip_r/hip_rotation_r)
                length_function: MultivariatePolynomialFunction: coefficients=(0.08577023 0.0138699 0.0006688152 -0.001253295 0.001703858 0.000462839 0.04255335 -0.004110242 -0.02381664 -3.15729e-5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)
                    dimension=3 order=5
            DeGrooteFregly2016Muscle grac_r: max_isometric_force=421.9672 optimal_fiber_length=0.2379009
                tendon_slack_length=0.1615422 pennation_angle_at_optimal=0.1720016
                passive_fiber_strain_at_one_norm_force=0.8145527
              FunctionBasedPath path: coordinate_paths=(/jointset/hip_r/hip_flexion_r /jointset/hip_r/hip_adduction_r /jointset/hip_r/hip_rotation_r /jointset/knee_r/knee_angle_r)
                length_function: MultivariatePolynomialFunction: coefficients=(0.4386856 -0.02526857 -0.001075661 -0.007443925 0.00348856 -0.0003472406 0.00468595 0.001587686 0.003605782 -0.002342043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)
                    dimension=4 order=5
            DeGrooteFregly2016Muscle iliacus_r: max_isometric_force=1531.711 optimal_fiber_length=0.08497428
                tendon_slack_length=0.1085471 pennation_angle_at_optimal=0.279914
                passive_fiber_strain_at_one_norm_force=0.5003547
              FunctionBasedPath path: coordinate_paths=(/jointset/hip_r/hip_flexion_r /jointset/hip_r/hip_adduction_r /jointset/hip_r/hip_rotation_r)
                length_function: MultivariatePolynomialFunction: coefficients=(0.2011509 -0.006750475 -0.0009006813 0.001161654 0.0002858613 8.32499e-6 0.002758583 0.0007440199 -0.00178294 -0.0002109554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)
                    dimension=3 order=5
            DeGrooteFregly2016Muscle perbrev_r: max_isometric_force=781.8024 optimal_fiber_length=0.0594287
                tendon_slack_length=0.1288398 pennation_angle_at_optimal=0.2052361
                passive_fiber_strain_at_one_norm_force=0.6984177
              FunctionBasedPath path: coordinate_paths=(/jointset/ankle_r/ankle_angle_r /jointset/subtalar_r/subtalar_angle_r)
                length_function: MultivariatePolynomialFunction: coefficients=(0.1879941 0.02137789 -0.0009467638 -0.003089191 0.003005622 0.005224357 0.006702068 -0.006129972 0.006868895 -0.001903158 -0.006781606 0.009174327 -0.0003906827 0.0007665981 0.0001263778)
                    dimension=2 order=4
            DeGrooteFregly2016Muscle perlong_r: max_isometric_force=1673.057 optimal_fiber_length=0.07108844
                tendon_slack_length=0.2945851 pennation_angle_at_optimal=0.2479525
                passive_fiber_strain_at_one_norm_force=0.6896864
              FunctionBasedPath path: coordinate_paths=(/jointset/ankle_r/ankle_angle_r /jointset/subtalar_r/subtalar_angle_r)
                length_function: MultivariatePolynomialFunction: coefficients=(0.3612702 0.02094017 -0.002242909 -0.001554058 0.001129263 0.008151216 0.003140925 -0.002822953 0.00536685 -0.00208853 -0.005402731 0.010498 -0.0004975235 0.001631496 0.0001553631)
                    dimension=2 order=4
            DeGrooteFregly2016Muscle piri_r: max_isometric_force=1544.68 optimal_fiber_length=0.02664132
                tendon_slack_length=0.1239046 pennation_angle_at_optimal=0.1745329
                passive_fiber_strain_at_one_norm_force=0.7922451
              FunctionBasedPath path: coordinate_paths=(/jointset/hip_r/hip_flexion_r /jointset/hip_r/hip_adduction_r /jointset/hip_r/hip_rotation_r)
                length_function: MultivariatePolynomialFunction: coefficients=(0.1487743 0.02661063 -0.005298144 -0.00203094 0.002100531 0.0006030135 0.02581964 0.0008952972 -0.01198936 0.003653234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)
                    dimension=3 order=5
            DeGrooteFregly2016Muscle psoas_r: max_isometric_force=2140.185 optimal_fiber_length=0.1014572
                tendon_slack_length=0.1116735 pennation_angle_at_optimal=0.2155251
                passive_fiber_strain_at_one_norm_force=0.5006522
              FunctionBasedPath path: coordinate_paths=(/jointset/hip_r/hip_flexion_r /jointset/hip_r/hip_adduction_r /jointset/hip_r/hip_rotation_r)
                length_function: MultivariatePolynomialFunction: coefficients=(0.2256608 0.00023377 -0.003400022 9.861399e-6 5.715061e-5 -0.007076025 0.002681572 -0.0006805592 0.0004428302 -0.00452486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)
                    dimension=3 order=4
            DeGrooteFregly2016Muscle recfem_r: max_isometric_force=3287.611 optimal_fiber_length=0.07416841
                tendon_slack_length=0.4539829 pennation_angle_at_optimal=0.2170149
                passive_fiber_strain_at_one_norm_force=0.8998781
              FunctionBasedPath path: coordinate_paths=(/jointset/hip_r/hip_flexion_r /jointset/hip_r/hip_adduction_r /jointset/hip_r/hip_rotation_r /jointset/knee_r/knee_angle_r)
                length_function: MultivariatePolynomialFunction: coefficients=(0.5134836 0.03471212 0.0361732 -0.04760327 0.02213262 -0.003668803 0.007680728 -0.01222002 0.006980991 0.001670177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)
                    dimension=4 order=5
            DeGrooteFregly2016Muscle sart_r: max_isometric_force=374.1197 optimal_fiber_length=0.3921159
                tendon_slack_length=0.1324594 pennation_angle_at_optimal=0.02613542
                passive_fiber_strain_at_one_norm_force=0.7204409
              FunctionBasedPath path: coordinate_paths=(/jointset/hip_r/hip_flexion_r /jointset/hip_r/hip_adduction_r /jointset/hip_r/hip_rotation_r /jointset/knee_r/knee_angle_r)
                length_function: MultivariatePolynomialFunction: coefficients=(0.5838027 -0.01056986 -0.02045573 0.01379796 -0.006113994 0.001103463 0.00340828 0.000298947 1.208166e-5 -0.0003512314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)
                    dimension=4 order=5
            DeGrooteFregly2016Muscle semimem_r: max_isometric_force=3301.48 optimal_fiber_length=0.0648771
                tendon_slack_length=0.3500594 pennation_angle_at_optimal=0.2545615
                passive_fiber_strain_at_one_norm_force=0.8930618
              FunctionBasedPath path: coordinate_paths=(/jointset/hip_r/hip_flexion_r /jointset/hip_r/hip_adduction_r /jointset/hip_r/hip_rotation_r /jointset/knee_r/knee_angle_r)
                length_function: MultivariatePolynomialFunction: coefficients=(0.4115825 -0.03169517 -0.0003284899 -0.005680345 0.003616366 -0.0004689789 -0.0006654523 0.001888872 -0.001076696 0.0001531864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)
                    dimension=4 order=5
            DeGrooteFregly2016Muscle semiten_r: max_isometric_force=886.9426 optimal_fiber_length=0.1867815
                tendon_slack_length=0.2499043 pennation_angle_at_optimal=0.241295
                passive_fiber_strain_at_one_norm_force=0.7975909
              FunctionBasedPath path: coordinate_paths=(/jointset/hip_r/hip_flexion_r /jointset/hip_r/hip_adduction_r /jointset/hip_r/hip_rotation_r /jointset/knee_r/knee_angle_r)
                length_function: MultivariatePolynomialFunction: coefficients=(0.4534854 -0.0381767 -0.0008077916 -0.00897531 0.005595365 -0.0007454669 -0.0001065567 0.003703458 -0.00185451 0.0002361245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)
                    dimension=4 order=5
            DeGrooteFregly2016Muscle soleus_r: max_isometric_force=9292.264 optimal_fiber_length=0.04457675
                tendon_slack_length=0.2777427 pennation_angle_at_optimal=0.3814289
                passive_fiber_strain_at_one_norm_force=0.6490911
              FunctionBasedPath path: coordinate_paths=(/jointset/ankle_r/ankle_angle_r /jointset/subtalar_r/subtalar_angle_r)
                length_function: MultivariatePolynomialFunction: coefficients=(0.3207732 -0.003211778 0.006267083 0.0004340062 0.03242001 -0.001734921 -0.004924018 -0.005148683 0.002763275 -0.005131084)
                    dimension=2 order=3
            DeGrooteFregly2016Muscle tfl_r: max_isometric_force=616.8098 optimal_fiber_length=0.09978303
                tendon_slack_length=0.4390122 pennation_angle_at_optimal=0.05235988
                passive_fiber_strain_at_one_norm_force=0.506672
              FunctionBasedPath path: coordinate_paths=(/jointset/hip_r/hip_flexion_r /jointset/hip_r/hip_adduction_r /jointset/hip_r/hip_rotation_r /jointset/knee_r/knee_angle_r)
                length_function: MultivariatePolynomialFunction: coefficients=(0.5364707 0.01549461 0.005378576 -0.007136056 0.002544015 -0.0003795945 -0.001803388 -0.0002207956 -0.0002176914 2.193086e-5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)
                    dimension=4 order=5
            DeGrooteFregly2016Muscle tibant_r: max_isometric_force=1841.179 optimal_fiber_length=0.08832592
                tendon_slack_length=0.2099858 pennation_angle_at_optimal=0.1951828
                passive_fiber_strain_at_one_norm_force=0.7105193
              FunctionBasedPath path: coordinate_paths=(/jointset/ankle_r/ankle_angle_r /jointset/subtalar_r/subtalar_angle_r)
                length_function: MultivariatePolynomialFunction: coefficients=(0.2954564 -0.007590222 -0.003629041 0.000908779 -3.01998e-5 -0.03949088 0.004158329 0.01560903 0.001473591 -0.006198762 -0.002727898 0.01020312 0.002427794 -0.002059221 0.0005716708)
                    dimension=2 order=4
            DeGrooteFregly2016Muscle tibpost_r: max_isometric_force=2595.231 optimal_fiber_length=0.04521223
                tendon_slack_length=0.2669988 pennation_angle_at_optimal=0.2264891
                passive_fiber_strain_at_one_norm_force=0.6922344
              FunctionBasedPath path: coordinate_paths=(/jointset/ankle_r/ankle_angle_r /jointset/subtalar_r/subtalar_angle_r)
                length_function: MultivariatePolynomialFunction: coefficients=(0.3100503 -0.01371738 0.001064747 0.002809448 0.00721509 0.007310723 -0.0001106895 -0.003385914 0.0042149 -0.0007302489)
                    dimension=2 order=3
            DeGrooteFregly2016Muscle vasint_r: max_isometric_force=2546.041 optimal_fiber_length=0.1055711
                tendon_slack_length=0.2004264 pennation_angle_at_optimal=0.06309973
                passive_fiber_strain_at_one_norm_force=0.7073887
              FunctionBasedPath path: coordinate_paths=/jointset/knee_r/knee_angle_r
                length_function: MultivariatePolynomialFunction: coefficients=(0.2845611 0.04063281 0.008312814 -0.01499906 0.005611178 -0.0006321409)
                    dimension=1 order=5
            DeGrooteFregly2016Muscle vaslat_r: max_isometric_force=7723.151 optimal_fiber_length=0.1028725
                tendon_slack_length=0.2224439 pennation_angle_at_optimal=0.2528673
                passive_fiber_strain_at_one_norm_force=0.7110096
              FunctionBasedPath path: coordinate_paths=/jointset/knee_r/knee_angle_r
                length_function: MultivariatePolynomialFunction: coefficients=(0.3002462 0.02468731 0.06317606 -0.08370158 0.04005969 -0.00660924)
                    dimension=1 order=5
            DeGrooteFregly2016Muscle vasmed_r: max_isometric_force=4121.734 optimal_fiber_length=0.102494
                tendon_slack_length=0.1992151 pennation_angle_at_optimal=0.4222225
                passive_fiber_strain_at_one_norm_force=0.705948
              FunctionBasedPath path: coordinate_paths=/jointset/knee_r/knee_angle_r
                length_function: MultivariatePolynomialFunction: coefficients=(0.2729302 0.04048186 0.007665668 -0.01612885 0.006457183 -0.0007867676)
                    dimension=1 order=5
            DeGrooteFregly2016Muscle addbrev_l: max_isometric_force=938.7295 optimal_fiber_length=0.1041096
                tendon_slack_length=0.04297172 pennation_angle_at_optimal=0.1147809
                passive_fiber_strain_at_one_norm_force=0.5003515
              FunctionBasedPath path: coordinate_paths=(/jointset/hip_l/hip_flexion_l /jointset/hip_l/hip_adduction_l /jointset/hip_l/hip_rotation_l)
                length_function: MultivariatePolynomialFunction: coefficients=(0.1473522 -0.004069152 -0.005195792 0.00147437 0.0004842266 0.0009633821 -0.05990396 -0.002540478 -0.0009461589 0.0007660827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)
                    dimension=3 order=5
            DeGrooteFregly2016Muscle addlong_l: max_isometric_force=1375.2 optimal_fiber_length=0.1099603
                tendon_slack_length=0.1344698 pennation_angle_at_optimal=0.1377704
                passive_fiber_strain_at_one_norm_force=0.5001055
              FunctionBasedPath path: coordinate_paths=(/jointset/hip_l/hip_flexion_l /jointset/hip_l/hip_adduction_l /jointset/hip_l/hip_rotation_l)
                length_function: MultivariatePolynomialFunction: coefficients=(0.245271 -0.006559158 -0.00147212 0.001050416 5.364316e-5 -4.402173e-6 -0.06579727 -0.001288075 -2.616984e-6 0.0001190354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)
                    dimension=3 order=5
            DeGrooteFregly2016Muscle addmagDist_l: max_isometric_force=895.9426 optimal_fiber_length=0.1781477
                tendon_slack_length=0.0872463 pennation_angle_at_optimal=0.194705
                passive_fiber_strain_at_one_norm_force=0.700002
              FunctionBasedPath path: coordinate_paths=(/jointset/hip_l/hip_flexion_l /jointset/hip_l/hip_adduction_l /jointset/hip_l/hip_rotation_l)
                length_function: MultivariatePolynomialFunction: coefficients=(0.224358 -3.629318e-5 -0.001812656 0.0004610924 3.74383e-5 -0.0002985975 -0.05462689 0.00204318 0.000990289 -0.001294768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)
                    dimension=3 order=5
            DeGrooteFregly2016Muscle addmagIsch_l: max_isometric_force=895.9426 optimal_fiber_length=0.1541883
                tendon_slack_length=0.2158319 pennation_angle_at_optimal=0.1680443
                passive_fiber_strain_at_one_norm_force=0.7020883
              FunctionBasedPath path: coordinate_paths=(/jointset/hip_l/hip_flexion_l /jointset/hip_l/hip_adduction_l /jointset/hip_l/hip_rotation_l)
                length_function: MultivariatePolynomialFunction: coefficients=(0.3374069 -0.004393895 0.002599036 0.0004302903 -0.0001810827 0.0003266631 -0.0403072 -0.0006238652 -0.00225826 0.000732532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)
                    dimension=3 order=5
            DeGrooteFregly2016Muscle addmagMid_l: max_isometric_force=895.9426 optimal_fiber_length=0.1435837
                tendon_slack_length=0.04692103 pennation_angle_at_optimal=0.2073076
                passive_fiber_strain_at_one_norm_force=0.7000001
              FunctionBasedPath path: coordinate_paths=(/jointset/hip_l/hip_flexion_l /jointset/hip_l/hip_adduction_l /jointset/hip_l/hip_rotation_l)
                length_function: MultivariatePolynomialFunction: coefficients=(0.1499 -0.0001666823 -0.004372427 0.0009922395 0.0003060584 -5.27979e-5 -0.06976328 -0.0001830012 0.001034533 0.0001274886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)
                    dimension=3 order=5
            DeGrooteFregly2016Muscle addmagProx_l: max_isometric_force=895.9426 optimal_fiber_length=0.1056241
                tendon_slack_length=0.05172425 pennation_angle_at_optimal=0.3114833
                passive_fiber_strain_at_one_norm_force=0.7000001
              FunctionBasedPath path: coordinate_paths=(/jointset/hip_l/hip_flexion_l /jointset/hip_l/hip_adduction_l /jointset/hip_l/hip_rotation_l)
                length_function: MultivariatePolynomialFunction: coefficients=(0.1279682 0.006510944 -0.008445212 0.0008869077 0.001016165 0.000164272 -0.05374864 -0.002329756 -0.0007059633 0.0005172323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)
                    dimension=3 order=5
            DeGrooteFregly2016Muscle bflh_l: max_isometric_force=1969.775 optimal_fiber_length=0.09299378
                tendon_slack_length=0.3327744 pennation_angle_at_optimal=0.1759182
                passive_fiber_strain_at_one_norm_force=0.887866
              FunctionBasedPath path: coordinate_paths=(/jointset/hip_l/hip_flexion_l /jointset/hip_l/hip_adduction_l /jointset/hip_l/hip_rotation_l /jointset/knee_l/knee_angle_l)
                length_function: MultivariatePolynomialFunction: coefficients=(0.4197617 -0.02996885 0.01009543 -0.01384112 0.006312369 -0.0008723848 0.005125483 0.001708013 -0.0008065878 0.0003470828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)
                    dimension=4 order=5
            DeGrooteFregly2016Muscle bfsh_l: max_isometric_force=835.6721 optimal_fiber_length=0.08738456
                tendon_slack_length=0.1210668 pennation_angle_at_optimal=0.2642232
                passive_fiber_strain_at_one_norm_force=0.6954765
              FunctionBasedPath path: coordinate_paths=/jointset/knee_l/knee_angle_l
                length_function: MultivariatePolynomialFunction: coefficients=(0.2289779 -0.02272144 0.008992596 -0.01032151 0.002984901 -6.250387e-5)
                    dimension=1 order=5
            DeGrooteFregly2016Muscle edl_l: max_isometric_force=905.2472 optimal_fiber_length=0.0823179
                tendon_slack_length=0.3190627 pennation_angle_at_optimal=0.2182582
                passive_fiber_strain_at_one_norm_force=0.7092204
              FunctionBasedPath path: coordinate_paths=(/jointset/ankle_l/ankle_angle_l /jointset/subtalar_l/subtalar_angle_l /jointset/mtp_l/mtp_angle_l)
                length_function: MultivariatePolynomialFunction: coefficients=(0.4024269 0.004410314 -0.001388983 -0.0001936865 0.01219082 0.0001199655 -0.0001110347 -0.001044155 -0.001820965 -0.001145445 -0.03180925 -6.273297e-5 3.677258e-5 0.0002135226 0.000247878 0.008552009 -0.003377284 -0.0001079945 -0.002512771 0.001518789)
                    dimension=3 order=3
            DeGrooteFregly2016Muscle ehl_l: max_isometric_force=428.8013 optimal_fiber_length=0.08919386
                tendon_slack_length=0.2715022 pennation_angle_at_optimal=0.1972681
                passive_fiber_strain_at_one_norm_force=0.7196932
              FunctionBasedPath path: coordinate_paths=(/jointset/ankle_l/ankle_angle_l /jointset/subtalar_l/subtalar_angle_l /jointset/mtp_l/mtp_angle_l)
                length_function: MultivariatePolynomialFunction: coefficients=(0.3676263 0.00511888 -0.002039176 -0.0004102098 8.472083e-5 -0.0004061498 0.000114027 -5.523211e-5 -3.834956e-5 -0.003162382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)
                    dimension=3 order=4
            DeGrooteFregly2016Muscle fdl_l: max_isometric_force=634.7656 optimal_fiber_length=0.05742218
                tendon_slack_length=0.3300889 pennation_angle_at_optimal=0.2248391
                passive_fiber_strain_at_one_norm_force=0.6998707
              FunctionBasedPath path: coordinate_paths=(/jointset/ankle_l/ankle_angle_l /jointset/subtalar_l/subtalar_angle_l /jointset/mtp_l/mtp_angle_l)
                length_function: MultivariatePolynomialFunction: coefficients=(0.3782041 -0.004927095 -0.001144126 0.0008496883 -0.01355329 1.222052e-5 -1.928461e-6 -0.000600191 -0.0002424605 0.00199228 0.00632591 -4.987669e-5 3.839661e-5 0.006976603 0.0002127169 0.0003603584 -0.003828671 -5.259267e-5 0.003967457 -0.0006101952)
                    dimension=3 order=3
            DeGrooteFregly2016Muscle fhl_l: max_isometric_force=1361.759 optimal_fiber_length=0.06396792
                tendon_slack_length=0.3043882 pennation_angle_at_optimal=0.2580255
                passive_fiber_strain_at_one_norm_force=0.6999039
              FunctionBasedPath path: coordinate_paths=(/jointset/ankle_l/ankle_angle_l /jointset/subtalar_l/subtalar_angle_l /jointset/mtp_l/mtp_angle_l)
                length_function: MultivariatePolynomialFunction: coefficients=(0.3559204 -0.004483184 0.0008679959 0.0009587633 -0.01191554 3.799605e-5 -3.41743e-5 -0.0008037689 -0.0001580027 0.001708941 0.01129254 -1.105367e-5 -1.184183e-5 0.005407134 0.0001938106 -0.0001273342 -0.004277257 -7.242982e-5 0.003118286 -0.0009352323)
                    dimension=3 order=3
            DeGrooteFregly2016Muscle gaslat_l: max_isometric_force=2362.589 optimal_fiber_length=0.06296675
                tendon_slack_length=0.3750628 pennation_angle_at_optimal=0.2102268
                passive_fiber_strain_at_one_norm_force=0.5006752
              FunctionBasedPath path: coordinate_paths=(/jointset/knee_l/knee_angle_l /jointset/ankle_l/ankle_angle_l /jointset/subtalar_l/subtalar_angle_l)
                length_function: MultivariatePolynomialFunction: coefficients=(0.4525452 -0.004013716 0.007007211 0.0009370798 -7.994885e-5 -0.003648757 0.03467776 -0.002217774 -0.00421863 0.0002658496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)
                    dimension=3 order=5
            DeGrooteFregly2016Muscle gasmed_l: max_isometric_force=4673.272 optimal_fiber_length=0.05667364
                tendon_slack_length=0.3940908 pennation_angle_at_optimal=0.1656816
                passive_fiber_strain_at_one_norm_force=0.5002227
              FunctionBasedPath path: coordinate_paths=(/jointset/knee_l/knee_angle_l /jointset/ankle_l/ankle_angle_l /jointset/subtalar_l/subtalar_angle_l)
                length_function: MultivariatePolynomialFunction: coefficients=(0.4570293 -0.001560646 0.007444766 0.0003331375 -0.001336207 -6.061498e-5 0.03299597 -0.002812896 -0.0047107 0.0006438139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)
                    dimension=3 order=5
            DeGrooteFregly2016Muscle glmax1_l: max_isometric_force=1475.675 optimal_fiber_length=0.1360206
                tendon_slack_length=0.05937094 pennation_angle_at_optimal=0.3540118
                passive_fiber_strain_at_one_norm_force=0.7004337
              FunctionBasedPath path: coordinate_paths=(/jointset/hip_l/hip_flexion_l /jointset/hip_l/hip_adduction_l /jointset/hip_l/hip_rotation_l)
                length_function: MultivariatePolynomialFunction: coefficients=(0.1924067 0.02290494 0.01224651 -0.007118344 0.001185267 -0.003026376 0.01981377 0.02341265 -0.01747472 -0.007416176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)
                    dimension=3 order=5
            DeGrooteFregly2016Muscle glmax2_l: max_isometric_force=2109.069 optimal_fiber_length=0.1524323
                tendon_slack_length=0.07200725 pennation_angle_at_optimal=0.3673821
                passive_fiber_strain_at_one_norm_force=0.7008108
              FunctionBasedPath path: coordinate_paths=(/jointset/hip_l/hip_flexion_l /jointset/hip_l/hip_adduction_l /jointset/hip_l/hip_rotation_l)
                length_function: MultivariatePolynomialFunction: coefficients=(0.2187842 0.02218088 0.01807744 -0.009145378 -0.001291828 -0.0004775982 0.009151905 0.008142152 -0.004089112 -0.006610952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)
                    dimension=3 order=5
            DeGrooteFregly2016Muscle glmax3_l: max_isometric_force=1421.631 optimal_fiber_length=0.158909
                tendon_slack_length=0.08160148 pennation_angle_at_optimal=0.3824161
                passive_fiber_strain_at_one_norm_force=0.7018363
              FunctionBasedPath path: coordinate_paths=(/jointset/hip_l/hip_flexion_l /jointset/hip_l/hip_adduction_l /jointset/hip_l/hip_rotation_l)
                length_function: MultivariatePolynomialFunction: coefficients=(0.2236313 0.0210266 0.005897468 -0.004814099 0.001658055 5.09653e-5 -0.05495466 -0.002705494 0.005927718 -0.001699473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)
                    dimension=3 order=5
            DeGrooteFregly2016Muscle glmed1_l: max_isometric_force=1640.2 optimal_fiber_length=0.08684541
                tendon_slack_length=0.05059876 pennation_angle_at_optimal=0.3165559
                passive_fiber_strain_at_one_norm_force=0.7000001
              FunctionBasedPath path: coordinate_paths=(/jointset/hip_l/hip_flexion_l /jointset/hip_l/hip_adduction_l /jointset/hip_l/hip_rotation_l)
                length_function: MultivariatePolynomialFunction: coefficients=(0.1255447 -0.008724139 0.01088198 0.002069047 -0.001049482 0.0001676853 0.06185552 0.01681487 -0.03095066 -0.005118108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)
                    dimension=3 order=5
            DeGrooteFregly2016Muscle glmed2_l: max_isometric_force=1147.637 optimal_fiber_length=0.09420899
                tendon_slack_length=0.0681469 pennation_angle_at_optimal=0.3165559
                passive_fiber_strain_at_one_norm_force=0.7051739
              FunctionBasedPath path: coordinate_paths=(/jointset/hip_l/hip_flexion_l /jointset/hip_l/hip_adduction_l /jointset/hip_l/hip_rotation_l)
                length_function: MultivariatePolynomialFunction: coefficients=(0.1536877 0.01002068 0.002725456 -0.00189598 0.0001200203 0.001148704 0.05550509 0.01688522 -0.0287915 -0.0002033216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)
                    dimension=3 order=5
            DeGrooteFregly2016Muscle glmed3_l: max_isometric_force=1306.799 optimal_fiber_length=0.08268045
                tendon_slack_length=0.04748616 pennation_angle_at_optimal=0.3165559
                passive_fiber_strain_at_one_norm_force=0.7950859
              FunctionBasedPath path: coordinate_paths=(/jointset/hip_l/hip_flexion_l /jointset/hip_l/hip_adduction_l /jointset/hip_l/hip_rotation_l)
                length_function: MultivariatePolynomialFunction: coefficients=(0.1234476 0.02310754 -0.0005993397 -0.003722716 0.0009558507 0.001669716 0.0443818 0.01703107 -0.02463732 0.002877036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)
                    dimension=3 order=5
            DeGrooteFregly2016Muscle glmin1_l: max_isometric_force=561.0689 optimal_fiber_length=0.09097238
                tendon_slack_length=0.01097527 pennation_angle_at_optimal=0.1745329
                passive_fiber_strain_at_one_norm_force=0.7000001
              FunctionBasedPath path: coordinate_paths=(/jointset/hip_l/hip_flexion_l /jointset/hip_l/hip_adduction_l /jointset/hip_l/hip_rotation_l)
                length_function: MultivariatePolynomialFunction: coefficients=(0.09597254 -0.01331182 0.01539701 0.004254692 -0.001192869 0.0009289053 0.05919843 0.004207773 -0.03264202 -0.003395992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)
                    dimension=3 order=5
            DeGrooteFregly2016Muscle glmin2_l: max_isometric_force=592.2295 optimal_fiber_length=0.07732399
                tendon_slack_length=0.0249108 pennation_angle_at_optimal=0
                passive_fiber_strain_at_one_norm_force=0.6997238
              FunctionBasedPath path: coordinate_paths=(/jointset/hip_l/hip_flexion_l /jointset/hip_l/hip_adduction_l /jointset/hip_l/hip_rotation_l)
                length_function: MultivariatePolynomialFunction: coefficients=(0.1021712 0.003948467 0.007825815 -0.0008541725 0.0002380742 0.002626469 0.05345895 -0.005369466 -0.02798455 0.00328973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)
                    dimension=3 order=5
            DeGrooteFregly2016Muscle glmin3_l: max_isometric_force=670.1607 optimal_fiber_length=0.03797796
                tendon_slack_length=0.04773603 pennation_angle_at_optimal=0.01745329
                passive_fiber_strain_at_one_norm_force=0.6988467
              FunctionBasedPath path: coordinate_paths=(/jointset/hip_l/hip_flexion_l /jointset/hip_l/hip_adduction_l /jointset/hip_l/hip_rotation_l)
                length_function: MultivariatePolynomialFunction: coefficients=(0.08576063 0.01380776 0.000460364 -0.002268467 0.0009632509 0.002507013 0.04251425 -0.003350083 -0.01997831 0.004798077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)
                    dimension=3 order=5
            DeGrooteFregly2016Muscle grac_l: max_isometric_force=421.9672 optimal_fiber_length=0.2379006
                tendon_slack_length=0.161542 pennation_angle_at_optimal=0.1720016
                passive_fiber_strain_at_one_norm_force=0.8145527
              FunctionBasedPath path: coordinate_paths=(/jointset/hip_l/hip_flexion_l /jointset/hip_l/hip_adduction_l /jointset/hip_l/hip_rotation_l /jointset/knee_l/knee_angle_l)
                length_function: MultivariatePolynomialFunction: coefficients=(0.4387285 -0.025208 -0.001590462 -0.0068069 0.003189798 -0.0002980075 0.004928079 0.0008459777 0.004485737 -0.002845395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)
                    dimension=4 order=5
            DeGrooteFregly2016Muscle iliacus_l: max_isometric_force=1531.711 optimal_fiber_length=0.08497428
                tendon_slack_length=0.1085471 pennation_angle_at_optimal=0.279914
                passive_fiber_strain_at_one_norm_force=0.5003547
              FunctionBasedPath path: coordinate_paths=(/jointset/hip_l/hip_flexion_l /jointset/hip_l/hip_adduction_l /jointset/hip_l/hip_rotation_l)
                length_function: MultivariatePolynomialFunction: coefficients=(0.2011493 -0.006760034 -0.0009541356 0.001106316 0.0002843139 -5.530648e-5 0.002787906 0.0008322783 -0.001834859 -0.0008526331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)
                    dimension=3 order=5
            DeGrooteFregly2016Muscle perbrev_l: max_isometric_force=781.8024 optimal_fiber_length=0.0594287
                tendon_slack_length=0.1288398 pennation_angle_at_optimal=0.2052361
                passive_fiber_strain_at_one_norm_force=0.6984177
              FunctionBasedPath path: coordinate_paths=(/jointset/ankle_l/ankle_angle_l /jointset/subtalar_l/subtalar_angle_l)
                length_function: MultivariatePolynomialFunction: coefficients=(0.1879938 0.02137969 -0.0009112899 -0.003132684 0.002239739 0.005224915 0.006708125 -0.00614676 0.00667669 -0.001901566 -0.006799554 0.009124033 -0.0003939565 0.0007371423 0.0001204891)
                    dimension=2 order=4
            DeGrooteFregly2016Muscle perlong_l: max_isometric_force=1673.057 optimal_fiber_length=0.07108844
                tendon_slack_length=0.2945851 pennation_angle_at_optimal=0.2479525
                passive_fiber_strain_at_one_norm_force=0.6896864
              FunctionBasedPath path: coordinate_paths=(/jointset/ankle_l/ankle_angle_l /jointset/subtalar_l/subtalar_angle_l)
                length_function: MultivariatePolynomialFunction: coefficients=(0.3612696 0.02094767 -0.002177381 -0.001783963 0.0002446112 0.008152443 0.003157887 -0.002874701 0.00525215 -0.002086188 -0.005416257 0.01036621 -0.0005044542 0.001595965 0.0001482353)
                    dimension=2 order=4
            DeGrooteFregly2016Muscle piri_l: max_isometric_force=1544.68 optimal_fiber_length=0.02664132
                tendon_slack_length=0.1239046 pennation_angle_at_optimal=0.1745329
                passive_fiber_strain_at_one_norm_force=0.7922451
              FunctionBasedPath path: coordinate_paths=(/jointset/hip_l/hip_flexion_l /jointset/hip_l/hip_adduction_l /jointset/hip_l/hip_rotation_l)
                length_function: MultivariatePolynomialFunction: coefficients=(0.1487636 0.02653414 -0.005432255 -0.002744162 0.00118957 0.001315001 0.02577828 0.0008932246 -0.01177733 0.003126492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)
                    dimension=3 order=5
            DeGrooteFregly2016Muscle psoas_l: max_isometric_force=2140.185 optimal_fiber_length=0.1014572
                tendon_slack_length=0.1116735 pennation_angle_at_optimal=0.2155251
                passive_fiber_strain_at_one_norm_force=0.5006522
              FunctionBasedPath path: coordinate_paths=(/jointset/hip_l/hip_flexion_l /jointset/hip_l/hip_adduction_l /jointset/hip_l/hip_rotation_l)
                length_function: MultivariatePolynomialFunction: coefficients=(0.2256636 0.000247973 -0.003418803 -1.734287e-5 -1.164222e-5 -0.007134425 0.002445695 -0.001287979 0.0004961705 -0.004807866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)
                    dimension=3 order=4
            DeGrooteFregly2016Muscle recfem_l: max_isometric_force=3287.611 optimal_fiber_length=0.07416856
                tendon_slack_length=0.4539838 pennation_angle_at_optimal=0.2170149
                passive_fiber_strain_at_one_norm_force=0.8998781
              FunctionBasedPath path: coordinate_paths=(/jointset/hip_l/hip_flexion_l /jointset/hip_l/hip_adduction_l /jointset/hip_l/hip_rotation_l /jointset/knee_l/knee_angle_l)
                length_function: MultivariatePolynomialFunction: coefficients=(0.5123754 0.04255762 0.01140011 -0.01477664 0.004077835 -0.0002407106 0.001882666 0.004631984 -0.01237389 0.009701393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)
                    dimension=4 order=5
            DeGrooteFregly2016Muscle sart_l: max_isometric_force=374.1197 optimal_fiber_length=0.3921158
                tendon_slack_length=0.1324593 pennation_angle_at_optimal=0.02613542
                passive_fiber_strain_at_one_norm_force=0.7204409
              FunctionBasedPath path: coordinate_paths=(/jointset/hip_l/hip_flexion_l /jointset/hip_l/hip_adduction_l /jointset/hip_l/hip_rotation_l /jointset/knee_l/knee_angle_l)
                length_function: MultivariatePolynomialFunction: coefficients=(0.5839276 -0.01169254 -0.0171556 0.009876049 -0.004146151 0.0007571179 0.003593967 -0.000768988 0.002094675 -0.001823687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)
                    dimension=4 order=5
            DeGrooteFregly2016Muscle semimem_l: max_isometric_force=3301.48 optimal_fiber_length=0.06487786
                tendon_slack_length=0.3500577 pennation_angle_at_optimal=0.2545615
                passive_fiber_strain_at_one_norm_force=0.8930618
              FunctionBasedPath path: coordinate_paths=(/jointset/hip_l/hip_flexion_l /jointset/hip_l/hip_adduction_l /jointset/hip_l/hip_rotation_l /jointset/knee_l/knee_angle_l)
                length_function: MultivariatePolynomialFunction: coefficients=(0.4116348 -0.03201728 0.0003230779 -0.006243624 0.003844905 -0.0005050602 -0.0004662601 0.0009725934 0.0003293785 -0.0006857645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)
                    dimension=4 order=5
            DeGrooteFregly2016Muscle semiten_l: max_isometric_force=886.9426 optimal_fiber_length=0.1867811
                tendon_slack_length=0.2499039 pennation_angle_at_optimal=0.241295
                passive_fiber_strain_at_one_norm_force=0.7975909
              FunctionBasedPath path: coordinate_paths=(/jointset/hip_l/hip_flexion_l /jointset/hip_l/hip_adduction_l /jointset/hip_l/hip_rotation_l /jointset/knee_l/knee_angle_l)
                length_function: MultivariatePolynomialFunction: coefficients=(0.4535326 -0.038699 0.0004095967 -0.01004589 0.006022743 -0.0008122028 0.0001954462 0.001933159 0.001029631 -0.001498395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)
                    dimension=4 order=5
            DeGrooteFregly2016Muscle soleus_l: max_isometric_force=9292.264 optimal_fiber_length=0.04457675
                tendon_slack_length=0.2777427 pennation_angle_at_optimal=0.3814289
                passive_fiber_strain_at_one_norm_force=0.6490911
              FunctionBasedPath path: coordinate_paths=(/jointset/ankle_l/ankle_angle_l /jointset/subtalar_l/subtalar_angle_l)
                length_function: MultivariatePolynomialFunction: coefficients=(0.3207729 -0.00321225 0.006249617 0.0005217503 0.03239829 -0.001725576 -0.004990765 -0.005167729 0.002764724 -0.005113968)
                    dimension=2 order=3
            DeGrooteFregly2016Muscle tfl_l: max_isometric_force=616.8098 optimal_fiber_length=0.09977718
                tendon_slack_length=0.4390424 pennation_angle_at_optimal=0.05235988
                passive_fiber_strain_at_one_norm_force=0.506672
              FunctionBasedPath path: coordinate_paths=(/jointset/hip_l/hip_flexion_l /jointset/hip_l/hip_adduction_l /jointset/hip_l/hip_rotation_l /jointset/knee_l/knee_angle_l)
                length_function: MultivariatePolynomialFunction: coefficients=(0.5364768 0.01528114 0.005996108 -0.007792158 0.002853756 -0.0004330375 -0.00200012 -0.0001246614 0.0004305601 -0.0004264296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)
                    dimension=4 order=5
            DeGrooteFregly2016Muscle tibant_l: max_isometric_force=1841.179 optimal_fiber_length=0.08832592
                tendon_slack_length=0.2099858 pennation_angle_at_optimal=0.1951828
                passive_fiber_strain_at_one_norm_force=0.7105193
              FunctionBasedPath path: coordinate_paths=(/jointset/ankle_l/ankle_angle_l /jointset/subtalar_l/subtalar_angle_l)
                length_function: MultivariatePolynomialFunction: coefficients=(0.2954572 -0.007588785 -0.003690622 0.0009729739 0.0006946844 -0.03949482 0.004174787 0.01563049 0.001265495 -0.006206932 -0.002745563 0.01045327 0.002449963 -0.002126355 0.0006073771)
                    dimension=2 order=4
            DeGrooteFregly2016Muscle tibpost_l: max_isometric_force=2595.231 optimal_fiber_length=0.04521223
                tendon_slack_length=0.2669988 pennation_angle_at_optimal=0.2264891
                passive_fiber_strain_at_one_norm_force=0.6922344
              FunctionBasedPath path: coordinate_paths=(/jointset/ankle_l/ankle_angle_l /jointset/subtalar_l/subtalar_angle_l)
                length_function: MultivariatePolynomialFunction: coefficients=(0.3100496 -0.01370173 0.001077584 0.002625637 0.007207656 0.007312385 -2.734817e-5 -0.003387038 0.004158717 -0.0007195434)
                    dimension=2 order=3
            DeGrooteFregly2016Muscle vasint_l: max_isometric_force=2546.041 optimal_fiber_length=0.1055715
                tendon_slack_length=0.2004272 pennation_angle_at_optimal=0.06309973
                passive_fiber_strain_at_one_norm_force=0.7073887
              FunctionBasedPath path: coordinate_paths=/jointset/knee_l/knee_angle_l
                length_function: MultivariatePolynomialFunction: coefficients=(0.28457 0.04068172 0.00704906 -0.01249392 0.004013049 -0.0003055702)
                    dimension=1 order=5
            DeGrooteFregly2016Muscle vaslat_l: max_isometric_force=7723.151 optimal_fiber_length=0.1028728
                tendon_slack_length=0.2224446 pennation_angle_at_optimal=0.2528673
                passive_fiber_strain_at_one_norm_force=0.7110096
              FunctionBasedPath path: coordinate_paths=/jointset/knee_l/knee_angle_l
                length_function: MultivariatePolynomialFunction: coefficients=(0.2991703 0.0367678 0.02177591 -0.02970887 0.01167176 -0.001485609)
                    dimension=1 order=5
            DeGrooteFregly2016Muscle vasmed_l: max_isometric_force=4121.734 optimal_fiber_length=0.1024944
                tendon_slack_length=0.1992158 pennation_angle_at_optimal=0.4222225
                passive_fiber_strain_at_one_norm_force=0.705948
              FunctionBasedPath path: coordinate_paths=/jointset/knee_l/knee_angle_l
                length_function: MultivariatePolynomialFunction: coefficients=(0.2729317 0.04043715 0.006928837 -0.01444384 0.005340435 -0.0005545465)
                    dimension=1 order=5
            ActivationCoordinateActuator tau_lumbar_bend: coordinate=lumbar_bend optimal_force=200
            ActivationCoordinateActuator tau_lumbar_ext: coordinate=lumbar_ext optimal_force=300
            ActivationCoordinateActuator tau_lumbar_rota: coordinate=lumbar_rota optimal_force=100
            ObjectGroup right_leg
            ObjectGroup left_leg
            ObjectGroup hip_add_r
            ObjectGroup hip_abd_r
            ObjectGroup hip_flex_r
            ObjectGroup hip_ext_r
            ObjectGroup hip_inrot_r
            ObjectGroup hip_exrot_r
            ObjectGroup knee_flex_r
            ObjectGroup knee_ext_r
            ObjectGroup ankle_df_r
            ObjectGroup ankle_pf_r
            ObjectGroup everter_r
            ObjectGroup inverter_r
            ObjectGroup hip_add_l
            ObjectGroup hip_abd_l
            ObjectGroup hip_flex_l
            ObjectGroup hip_ext_l
            ObjectGroup hip_exrot_l
            ObjectGroup hip_inrot_l
            ObjectGroup knee_flex_l
            ObjectGroup knee_ext_l
            ObjectGroup ankle_df_l
            ObjectGroup ankle_pf_l
            ObjectGroup everter_l
            ObjectGroup inverter_l
          MarkerSet:
            Marker C7: torso (-0.07064923 0.4149164 -7.470327e-9) fixed=true
            Marker R_GTROC: femur_r (-0.02539654 -0.01705707 0.09601375) fixed=true
            Marker L_GTROC: femur_l (-0.02539654 -0.01705707 -0.09601375) fixed=true
            Marker R_LAT_FEM_EPI: femur_r (0.005897599 -0.4053957 0.05801713) fixed=true
            Marker L_LAT_FEM_EPI: femur_l (0.005897599 -0.4053957 -0.05801713) fixed=true
            Marker R_PSIS: pelvis (-0.1476726 0.03160366 0.04853592) fixed=true
            Marker L_PSIS: pelvis (-0.1395522 0.03269262 -0.05060721) fixed=true
            Marker R_ACROMION: torso (-0.06630054 0.3691545 0.1963595) fixed=true
            Marker L_ACROMION: torso (-0.06630056 0.3691544 -0.1963592) fixed=true
            Marker R_ASIS: pelvis (0.008632744 -0.001564378 0.1489344) fixed=true
            Marker L_ASIS: pelvis (0.008632741 -0.001564381 -0.1489346) fixed=true
            Marker R_MED_FEM_EPI: femur_r (0.005826507 -0.4094635 -0.06163929) fixed=true
            Marker R_MED_MAL: tibia_r (0.004983722 -0.3880661 -0.03739175) fixed=true
            Marker R_CALC: calcn_r (-0.008818583 0.008849534 -0.006368064) fixed=true
            Marker R_5TH: toes_r (-0.03425735 0.00386892 0.04112723) fixed=true
            Marker R_1ST: toes_r (0.00386892 0.00386892 -0.03404649) fixed=true
            Marker L_MED_FEM_EPI: femur_l (0.005826507 -0.4094635 0.06163929) fixed=true
            Marker L_LAT_MAL: tibia_l (-0.005878496 -0.4155682 -0.05281693) fixed=true
            Marker R_LAT_MAL: tibia_r (-0.007885907 -0.4145093 0.05169825) fixed=true
            Marker L_CALC: calcn_l (-0.009002434 0.01384516 0.004746932) fixed=true
            Marker L_1ST: toes_l (0.00386892 0.00386892 0.03419212) fixed=true
            Marker R_DORSAL: calcn_r (0.1508997 0.01863816 0.01846947) fixed=true
            Marker L_DORSAL: calcn_l (0.1604358 0.02159925 -0.007339385) fixed=true
            Marker L_5TH: toes_l (-0.03405624 0.00386892 -0.0410449) fixed=true
            Marker L_MED_MAL: tibia_l (0.0140055 -0.388061 0.03756741) fixed=true
            Marker heel_r: calcn_r (0.001107033 -0.0081 0)
            Marker latheel_r: calcn_r (0.01804026 -0.0081 0.02116653)
            Marker medheel_r: calcn_r (0.01804026 -0.0081 -0.02116653)
            Marker mid_r: calcn_r (0.07074172 -0.0081 0.004741302)
            Marker latmid_r: calcn_r (0.06108978 -0.0081 0.02624649)
            Marker medmid_r: calcn_r (0.07759967 -0.0081 -0.01947321)
            Marker mh1_r: calcn_r (0.1540923 -0.0081 -0.01947321)
            Marker mh3_r: calcn_r (0.1403764 -0.0081 0.009821269)
            Marker mh5_r: calcn_r (0.1210725 -0.0081 0.03132646)
            Marker hallux_r: toes_r (0.04758235 -0.0081 -0.01532457)
            Marker othertoes_r: toes_r (0.03733776 -0.0081 0.0204892)
            Marker heel_l: calcn_l (0.001107033 -0.0081 0)
            Marker latheel_l: calcn_l (0.01804026 -0.0081 -0.02116653)
            Marker medheel_l: calcn_l (0.01804026 -0.0081 0.02116653)
            Marker mid_l: calcn_l (0.07074172 -0.0081 -0.004741302)
            Marker latmid_l: calcn_l (0.06108978 -0.0081 -0.02624649)
            Marker medmid_l: calcn_l (0.07759967 -0.0081 0.01947321)
            Marker mh1_l: calcn_l (0.1540923 -0.0081 0.01947321)
            Marker mh3_l: calcn_l (0.1403764 -0.0081 -0.009821269)
            Marker mh5_l: calcn_l (0.1210725 -0.0081 -0.03132646)
            Marker hallux_l: toes_l (0.04758235 -0.0081 0.01532457)
            Marker othertoes_l: toes_l (0.03733776 -0.0081 -0.0204892)
          ContactGeometrySet:
            ContactHalfSpace floor: socket_frame=/ground location=(0 0 0) orientation=(0 0 -1.570796)
            ContactSphere heel_r: socket_frame=/bodyset/calcn_r location=(0.001107033 -0.0081 0) radius=0.015
            ContactSphere latheel_r: socket_frame=/bodyset/calcn_r location=(0.01804026 -0.0081 0.02116653)
                radius=0.015
            ContactSphere medheel_r: socket_frame=/bodyset/calcn_r location=(0.01804026 -0.0081 -0.02116653)
                radius=0.015
            ContactSphere mid_r: socket_frame=/bodyset/calcn_r location=(0.07074172 -0.0081 0.004741302) radius=0.015
            ContactSphere latmid_r: socket_frame=/bodyset/calcn_r location=(0.06108978 -0.0081 0.02624649) radius=0.015
            ContactSphere medmid_r: socket_frame=/bodyset/calcn_r location=(0.07759967 -0.0081 -0.01947321)
                radius=0.015
            ContactSphere mh1_r: socket_frame=/bodyset/calcn_r location=(0.1540923 -0.0081 -0.01947321) radius=0.015
            ContactSphere mh3_r: socket_frame=/bodyset/calcn_r location=(0.1403764 -0.0081 0.009821269) radius=0.015
            ContactSphere mh5_r: socket_frame=/bodyset/calcn_r location=(0.1210725 -0.0081 0.03132646) radius=0.015
            ContactSphere hallux_r: socket_frame=/bodyset/toes_r location=(0.04758235 -0.0081 -0.01532457) radius=0.015
            ContactSphere othertoes_r: socket_frame=/bodyset/toes_r location=(0.03733776 -0.0081 0.0204892)
                radius=0.015
            ContactSphere heel_l: socket_frame=/bodyset/calcn_l location=(0.001107033 -0.0081 0) radius=0.015
            ContactSphere latheel_l: socket_frame=/bodyset/calcn_l location=(0.01804026 -0.0081 -0.02116653)
                radius=0.015
            ContactSphere medheel_l: socket_frame=/bodyset/calcn_l location=(0.01804026 -0.0081 0.02116653)
                radius=0.015
            ContactSphere mid_l: socket_frame=/bodyset/calcn_l location=(0.07074172 -0.0081 -0.004741302) radius=0.015
            ContactSphere latmid_l: socket_frame=/bodyset/calcn_l location=(0.06108978 -0.0081 -0.02624649)
                radius=0.015
            ContactSphere medmid_l: socket_frame=/bodyset/calcn_l location=(0.07759967 -0.0081 0.01947321) radius=0.015
            ContactSphere mh1_l: socket_frame=/bodyset/calcn_l location=(0.1540923 -0.0081 0.01947321) radius=0.015
            ContactSphere mh3_l: socket_frame=/bodyset/calcn_l location=(0.1403764 -0.0081 -0.009821269) radius=0.015
            ContactSphere mh5_l: socket_frame=/bodyset/calcn_l location=(0.1210725 -0.0081 -0.03132646) radius=0.015
            ContactSphere hallux_l: socket_frame=/bodyset/toes_l location=(0.04758235 -0.0081 0.01532457) radius=0.015
            ContactSphere othertoes_l: socket_frame=/bodyset/toes_l location=(0.03733776 -0.0081 -0.0204892)
                radius=0.015
          ProbeSet:
            Umberger2010MuscleMetabolicsProbe metabolic_cost_Umb: probe_operation=value
                report_total_metabolics_only=false
              Umberger2010MuscleMetabolicsProbe_MetabolicMuscleParameterSet:
                Umberger2010MuscleMetabolicsProbe_MetabolicMuscleParameter addbrev_r: ratio_slow_twitch_fibers=0.5
                    use_provided_muscle_mass=false
                Umberger2010MuscleMetabolicsProbe_MetabolicMuscleParameter addlong_r: ratio_slow_twitch_fibers=0.5
                    use_provided_muscle_mass=false
                Umberger2010MuscleMetabolicsProbe_MetabolicMuscleParameter addmagDist_r: ratio_slow_twitch_fibers=0.552
                    use_provided_muscle_mass=false
                Umberger2010MuscleMetabolicsProbe_MetabolicMuscleParameter addmagIsch_r: ratio_slow_twitch_fibers=0.552
                    use_provided_muscle_mass=false
                Umberger2010MuscleMetabolicsProbe_MetabolicMuscleParameter addmagMid_r: ratio_slow_twitch_fibers=0.552
                    use_provided_muscle_mass=false
                Umberger2010MuscleMetabolicsProbe_MetabolicMuscleParameter addmagProx_r: ratio_slow_twitch_fibers=0.552
                    use_provided_muscle_mass=false
                Umberger2010MuscleMetabolicsProbe_MetabolicMuscleParameter bflh_r: ratio_slow_twitch_fibers=0.5425
                    use_provided_muscle_mass=false
                Umberger2010MuscleMetabolicsProbe_MetabolicMuscleParameter bfsh_r: ratio_slow_twitch_fibers=0.529
                    use_provided_muscle_mass=false
                Umberger2010MuscleMetabolicsProbe_MetabolicMuscleParameter edl_r: ratio_slow_twitch_fibers=0.75
                    use_provided_muscle_mass=false
                Umberger2010MuscleMetabolicsProbe_MetabolicMuscleParameter ehl_r: ratio_slow_twitch_fibers=0.75
                    use_provided_muscle_mass=false
                Umberger2010MuscleMetabolicsProbe_MetabolicMuscleParameter fdl_r: ratio_slow_twitch_fibers=0.6
                    use_provided_muscle_mass=false
                Umberger2010MuscleMetabolicsProbe_MetabolicMuscleParameter fhl_r: ratio_slow_twitch_fibers=0.6
                    use_provided_muscle_mass=false
                Umberger2010MuscleMetabolicsProbe_MetabolicMuscleParameter gaslat_r: ratio_slow_twitch_fibers=0.507
                    use_provided_muscle_mass=false
                Umberger2010MuscleMetabolicsProbe_MetabolicMuscleParameter gasmed_r: ratio_slow_twitch_fibers=0.566
                    use_provided_muscle_mass=false
                Umberger2010MuscleMetabolicsProbe_MetabolicMuscleParameter glmax1_r: ratio_slow_twitch_fibers=0.55
                    use_provided_muscle_mass=false
                Umberger2010MuscleMetabolicsProbe_MetabolicMuscleParameter glmax2_r: ratio_slow_twitch_fibers=0.55
                    use_provided_muscle_mass=false
                Umberger2010MuscleMetabolicsProbe_MetabolicMuscleParameter glmax3_r: ratio_slow_twitch_fibers=0.55
                    use_provided_muscle_mass=false
                Umberger2010MuscleMetabolicsProbe_MetabolicMuscleParameter glmed1_r: ratio_slow_twitch_fibers=0.55
                    use_provided_muscle_mass=false
                Umberger2010MuscleMetabolicsProbe_MetabolicMuscleParameter glmed2_r: ratio_slow_twitch_fibers=0.55
                    use_provided_muscle_mass=false
                Umberger2010MuscleMetabolicsProbe_MetabolicMuscleParameter glmed3_r: ratio_slow_twitch_fibers=0.55
                    use_provided_muscle_mass=false
                Umberger2010MuscleMetabolicsProbe_MetabolicMuscleParameter glmin1_r: ratio_slow_twitch_fibers=0.55
                    use_provided_muscle_mass=false
                Umberger2010MuscleMetabolicsProbe_MetabolicMuscleParameter glmin2_r: ratio_slow_twitch_fibers=0.55
                    use_provided_muscle_mass=false
                Umberger2010MuscleMetabolicsProbe_MetabolicMuscleParameter glmin3_r: ratio_slow_twitch_fibers=0.55
                    use_provided_muscle_mass=false
                Umberger2010MuscleMetabolicsProbe_MetabolicMuscleParameter grac_r: ratio_slow_twitch_fibers=0.5
                    use_provided_muscle_mass=false
                Umberger2010MuscleMetabolicsProbe_MetabolicMuscleParameter iliacus_r: ratio_slow_twitch_fibers=0.5
                    use_provided_muscle_mass=false
                Umberger2010MuscleMetabolicsProbe_MetabolicMuscleParameter perbrev_r: ratio_slow_twitch_fibers=0.6
                    use_provided_muscle_mass=false
                Umberger2010MuscleMetabolicsProbe_MetabolicMuscleParameter perlong_r: ratio_slow_twitch_fibers=0.6
                    use_provided_muscle_mass=false
                Umberger2010MuscleMetabolicsProbe_MetabolicMuscleParameter piri_r: ratio_slow_twitch_fibers=0.5
                    use_provided_muscle_mass=false
                Umberger2010MuscleMetabolicsProbe_MetabolicMuscleParameter psoas_r: ratio_slow_twitch_fibers=0.5
                    use_provided_muscle_mass=false
                Umberger2010MuscleMetabolicsProbe_MetabolicMuscleParameter recfem_r: ratio_slow_twitch_fibers=0.3865
                    use_provided_muscle_mass=false
                Umberger2010MuscleMetabolicsProbe_MetabolicMuscleParameter sart_r: ratio_slow_twitch_fibers=0.5
                    use_provided_muscle_mass=false
                Umberger2010MuscleMetabolicsProbe_MetabolicMuscleParameter semimem_r: ratio_slow_twitch_fibers=0.4925
                    use_provided_muscle_mass=false
                Umberger2010MuscleMetabolicsProbe_MetabolicMuscleParameter semiten_r: ratio_slow_twitch_fibers=0.425
                    use_provided_muscle_mass=false
                Umberger2010MuscleMetabolicsProbe_MetabolicMuscleParameter soleus_r: ratio_slow_twitch_fibers=0.803
                    use_provided_muscle_mass=false
                Umberger2010MuscleMetabolicsProbe_MetabolicMuscleParameter tfl_r: ratio_slow_twitch_fibers=0.5
                    use_provided_muscle_mass=false
                Umberger2010MuscleMetabolicsProbe_MetabolicMuscleParameter tibant_r: ratio_slow_twitch_fibers=0.7
                    use_provided_muscle_mass=false
                Umberger2010MuscleMetabolicsProbe_MetabolicMuscleParameter tibpost_r: ratio_slow_twitch_fibers=0.6
                    use_provided_muscle_mass=false
                Umberger2010MuscleMetabolicsProbe_MetabolicMuscleParameter vasint_r: ratio_slow_twitch_fibers=0.543
                    use_provided_muscle_mass=false
                Umberger2010MuscleMetabolicsProbe_MetabolicMuscleParameter vaslat_r: ratio_slow_twitch_fibers=0.455
                    use_provided_muscle_mass=false
                Umberger2010MuscleMetabolicsProbe_MetabolicMuscleParameter vasmed_r: ratio_slow_twitch_fibers=0.503
                    use_provided_muscle_mass=false
                Umberger2010MuscleMetabolicsProbe_MetabolicMuscleParameter addbrev_l: ratio_slow_twitch_fibers=0.5
                    use_provided_muscle_mass=false
                Umberger2010MuscleMetabolicsProbe_MetabolicMuscleParameter addlong_l: ratio_slow_twitch_fibers=0.5
                    use_provided_muscle_mass=false
                Umberger2010MuscleMetabolicsProbe_MetabolicMuscleParameter addmagDist_l: ratio_slow_twitch_fibers=0.552
                    use_provided_muscle_mass=false
                Umberger2010MuscleMetabolicsProbe_MetabolicMuscleParameter addmagIsch_l: ratio_slow_twitch_fibers=0.552
                    use_provided_muscle_mass=false
                Umberger2010MuscleMetabolicsProbe_MetabolicMuscleParameter addmagMid_l: ratio_slow_twitch_fibers=0.552
                    use_provided_muscle_mass=false
                Umberger2010MuscleMetabolicsProbe_MetabolicMuscleParameter addmagProx_l: ratio_slow_twitch_fibers=0.552
                    use_provided_muscle_mass=false
                Umberger2010MuscleMetabolicsProbe_MetabolicMuscleParameter bflh_l: ratio_slow_twitch_fibers=0.5425
                    use_provided_muscle_mass=false
                Umberger2010MuscleMetabolicsProbe_MetabolicMuscleParameter bfsh_l: ratio_slow_twitch_fibers=0.529
                    use_provided_muscle_mass=false
                Umberger2010MuscleMetabolicsProbe_MetabolicMuscleParameter edl_l: ratio_slow_twitch_fibers=0.75
                    use_provided_muscle_mass=false
                Umberger2010MuscleMetabolicsProbe_MetabolicMuscleParameter ehl_l: ratio_slow_twitch_fibers=0.75
                    use_provided_muscle_mass=false
                Umberger2010MuscleMetabolicsProbe_MetabolicMuscleParameter fdl_l: ratio_slow_twitch_fibers=0.6
                    use_provided_muscle_mass=false
                Umberger2010MuscleMetabolicsProbe_MetabolicMuscleParameter fhl_l: ratio_slow_twitch_fibers=0.6
                    use_provided_muscle_mass=false
                Umberger2010MuscleMetabolicsProbe_MetabolicMuscleParameter gaslat_l: ratio_slow_twitch_fibers=0.507
                    use_provided_muscle_mass=false
                Umberger2010MuscleMetabolicsProbe_MetabolicMuscleParameter gasmed_l: ratio_slow_twitch_fibers=0.566
                    use_provided_muscle_mass=false
                Umberger2010MuscleMetabolicsProbe_MetabolicMuscleParameter glmax1_l: ratio_slow_twitch_fibers=0.55
                    use_provided_muscle_mass=false
                Umberger2010MuscleMetabolicsProbe_MetabolicMuscleParameter glmax2_l: ratio_slow_twitch_fibers=0.55
                    use_provided_muscle_mass=false
                Umberger2010MuscleMetabolicsProbe_MetabolicMuscleParameter glmax3_l: ratio_slow_twitch_fibers=0.55
                    use_provided_muscle_mass=false
                Umberger2010MuscleMetabolicsProbe_MetabolicMuscleParameter glmed1_l: ratio_slow_twitch_fibers=0.55
                    use_provided_muscle_mass=false
                Umberger2010MuscleMetabolicsProbe_MetabolicMuscleParameter glmed2_l: ratio_slow_twitch_fibers=0.55
                    use_provided_muscle_mass=false
                Umberger2010MuscleMetabolicsProbe_MetabolicMuscleParameter glmed3_l: ratio_slow_twitch_fibers=0.55
                    use_provided_muscle_mass=false
                Umberger2010MuscleMetabolicsProbe_MetabolicMuscleParameter glmin1_l: ratio_slow_twitch_fibers=0.55
                    use_provided_muscle_mass=false
                Umberger2010MuscleMetabolicsProbe_MetabolicMuscleParameter glmin2_l: ratio_slow_twitch_fibers=0.55
                    use_provided_muscle_mass=false
                Umberger2010MuscleMetabolicsProbe_MetabolicMuscleParameter glmin3_l: ratio_slow_twitch_fibers=0.55
                    use_provided_muscle_mass=false
                Umberger2010MuscleMetabolicsProbe_MetabolicMuscleParameter grac_l: ratio_slow_twitch_fibers=0.5
                    use_provided_muscle_mass=false
                Umberger2010MuscleMetabolicsProbe_MetabolicMuscleParameter iliacus_l: ratio_slow_twitch_fibers=0.5
                    use_provided_muscle_mass=false
                Umberger2010MuscleMetabolicsProbe_MetabolicMuscleParameter perbrev_l: ratio_slow_twitch_fibers=0.6
                    use_provided_muscle_mass=false
                Umberger2010MuscleMetabolicsProbe_MetabolicMuscleParameter perlong_l: ratio_slow_twitch_fibers=0.6
                    use_provided_muscle_mass=false
                Umberger2010MuscleMetabolicsProbe_MetabolicMuscleParameter piri_l: ratio_slow_twitch_fibers=0.5
                    use_provided_muscle_mass=false
                Umberger2010MuscleMetabolicsProbe_MetabolicMuscleParameter psoas_l: ratio_slow_twitch_fibers=0.5
                    use_provided_muscle_mass=false
                Umberger2010MuscleMetabolicsProbe_MetabolicMuscleParameter recfem_l: ratio_slow_twitch_fibers=0.3865
                    use_provided_muscle_mass=false
                Umberger2010MuscleMetabolicsProbe_MetabolicMuscleParameter sart_l: ratio_slow_twitch_fibers=0.5
                    use_provided_muscle_mass=false
                Umberger2010MuscleMetabolicsProbe_MetabolicMuscleParameter semimem_l: ratio_slow_twitch_fibers=0.4925
                    use_provided_muscle_mass=false
                Umberger2010MuscleMetabolicsProbe_MetabolicMuscleParameter semiten_l: ratio_slow_twitch_fibers=0.425
                    use_provided_muscle_mass=false
                Umberger2010MuscleMetabolicsProbe_MetabolicMuscleParameter soleus_l: ratio_slow_twitch_fibers=0.803
                    use_provided_muscle_mass=false
                Umberger2010MuscleMetabolicsProbe_MetabolicMuscleParameter tfl_l: ratio_slow_twitch_fibers=0.5
                    use_provided_muscle_mass=false
                Umberger2010MuscleMetabolicsProbe_MetabolicMuscleParameter tibant_l: ratio_slow_twitch_fibers=0.7
                    use_provided_muscle_mass=false
                Umberger2010MuscleMetabolicsProbe_MetabolicMuscleParameter tibpost_l: ratio_slow_twitch_fibers=0.6
                    use_provided_muscle_mass=false
                Umberger2010MuscleMetabolicsProbe_MetabolicMuscleParameter vasint_l: ratio_slow_twitch_fibers=0.543
                    use_provided_muscle_mass=false
                Umberger2010MuscleMetabolicsProbe_MetabolicMuscleParameter vaslat_l: ratio_slow_twitch_fibers=0.455
                    use_provided_muscle_mass=false
                Umberger2010MuscleMetabolicsProbe_MetabolicMuscleParameter vasmed_l: ratio_slow_twitch_fibers=0.503
                    use_provided_muscle_mass=false
          ComponentSet:
            IMU torso_imu_offset_imu: socket_frame=/bodyset/torso/torso_imu_offset
            IMU pelvis_imu_offset_imu: socket_frame=/bodyset/pelvis/pelvis_imu_offset
            IMU femur_r_imu_offset_imu: socket_frame=/bodyset/femur_r/femur_r_imu_offset
            IMU tibia_r_imu_offset_imu: socket_frame=/bodyset/tibia_r/tibia_r_imu_offset
            IMU toes_r_imu_offset_imu: socket_frame=/bodyset/toes_r/toes_r_imu_offset
            IMU femur_l_imu_offset_imu: socket_frame=/bodyset/femur_l/femur_l_imu_offset
            IMU tibia_l_imu_offset_imu: socket_frame=/bodyset/tibia_l/tibia_l_imu_offset
            IMU toes_l_imu_offset_imu: socket_frame=/bodyset/toes_l/toes_l_imu_offset
      MocoInitialBounds time_initial_bounds: bounds=334.821
      MocoFinalBounds time_final_bounds: bounds=335.532
      state_infos:
        MocoVariableInfo /jointset/ground_pelvis/pelvis_tx/speed: bounds=(2.083333 5.555556)
        MocoVariableInfo /jointset/ground_pelvis/pelvis_tilt/value: bounds=(-0.4363323 0.4363323)
        MocoVariableInfo /jointset/ground_pelvis/pelvis_list/value: bounds=(-0.3490659 0.3490659)
        MocoVariableInfo /jointset/ground_pelvis/pelvis_rotation/value: bounds=(-0.3490659 0.3490659)
        MocoVariableInfo /jointset/ground_pelvis/pelvis_tx/value: bounds=(0 6) initial_bounds=0
        MocoVariableInfo /jointset/hip_l/hip_flexion_l/value: bounds=(-0.7853982 1.396263)
            initial_bounds=(-0.7853982 0.3490659)
        MocoVariableInfo /jointset/hip_l/hip_adduction_l/value: bounds=(-0.3490659 0.3490659)
            initial_bounds=(-0.1745329 0.1745329)
        MocoVariableInfo /jointset/hip_l/hip_rotation_l/value: bounds=(-0.4363323 0.4363323)
        MocoVariableInfo /jointset/hip_r/hip_flexion_r/value: bounds=(-0.7853982 1.396263) initial_bounds=(0 0.6108652)
        MocoVariableInfo /jointset/hip_r/hip_adduction_r/value: bounds=(-0.3490659 0.3490659)
            initial_bounds=(0 0.3490659)
        MocoVariableInfo /jointset/hip_r/hip_rotation_r/value: bounds=(-0.4363323 0.4363323)
            initial_bounds=(-0.1745329 0.1745329)
        MocoVariableInfo /jointset/knee_l/knee_angle_l/value: bounds=(-0.08726646 2.792527)
            initial_bounds=(0.6981317 2.70526)
        MocoVariableInfo /jointset/knee_r/knee_angle_r/value: bounds=(-0.08726646 2.70526)
            initial_bounds=(-0.08726646 0.6981317)
        MocoVariableInfo /jointset/ankle_l/ankle_angle_l/value: bounds=(-0.6981317 0.5235988)
            initial_bounds=(-0.5235988 0)
        MocoVariableInfo /jointset/ankle_r/ankle_angle_r/value: bounds=(-0.6981317 0.5235988)
            initial_bounds=(-0.3490659 0.3490659)
        MocoVariableInfo /jointset/subtalar_l/subtalar_angle_l/value: bounds=(-0.2094395 0.2094395)
            initial_bounds=(-0.1745329 0.1745329)
        MocoVariableInfo /jointset/subtalar_r/subtalar_angle_r/value: bounds=(-0.2094395 0.2094395)
            initial_bounds=(-0.1745329 0.1745329)
        MocoVariableInfo /jointset/mtp_l/mtp_angle_l/value: bounds=(-0.5235988 0.5235988)
            initial_bounds=(-0.1770874 0.1719784)
        MocoVariableInfo /jointset/mtp_r/mtp_angle_r/value: bounds=(-0.5235988 0.5235988)
            initial_bounds=(-0.1509989 0.1108005)
        MocoVariableInfo /jointset/lumbar/lumbar_ext/value: bounds=(-0.6981317 0.5235988) initial_bounds=(-0.6981317 0)
        MocoVariableInfo /jointset/lumbar/lumbar_bend/value: bounds=(-0.4363323 0.5235988)
            initial_bounds=(-0.1068418 0.06769113)
        MocoVariableInfo /jointset/lumbar/lumbar_rota/value: bounds=(-0.5235988 0.5235988)
            initial_bounds=(-0.1937425 -0.01920953)
        MocoVariableInfo /jointset/ankle_l/ankle_angle_l/speed: bounds=(-87.26646 87.26646)
        MocoVariableInfo /jointset/ankle_r/ankle_angle_r/speed: bounds=(-87.26646 87.26646)
        MocoVariableInfo /jointset/ground_pelvis/pelvis_list/speed: bounds=(-87.26646 87.26646)
        MocoVariableInfo /jointset/ground_pelvis/pelvis_rotation/speed: bounds=(-87.26646 87.26646)
        MocoVariableInfo /jointset/ground_pelvis/pelvis_tilt/speed: bounds=(-34.90659 34.90659)
        MocoVariableInfo /jointset/hip_l/hip_adduction_l/speed: bounds=(-87.26646 87.26646)
        MocoVariableInfo /jointset/hip_l/hip_rotation_l/speed: bounds=(-87.26646 87.26646)
        MocoVariableInfo /jointset/hip_r/hip_adduction_r/speed: bounds=(-87.26646 87.26646)
        MocoVariableInfo /jointset/hip_r/hip_rotation_r/speed: bounds=(-87.26646 87.26646)
        MocoVariableInfo /jointset/lumbar/lumbar_bend/speed: bounds=(-87.26646 87.26646)
        MocoVariableInfo /jointset/lumbar/lumbar_rota/speed: bounds=(-87.26646 87.26646)
        MocoVariableInfo /jointset/lumbar/lumbar_ext/speed: bounds=(-87.26646 87.26646)
      state_infos_pattern:
        MocoVariableInfo /forceset/.*/normalized_tendon_force: bounds=(0 1.8)
        MocoVariableInfo /forceset/.*/activation: bounds=(0.001 1)
      goals:
        MocoStateTrackingGoal state_tracking: weight=0.2 allow_unused_references=true scale_weights_with_range=false
          TableProcessor reference
          MocoWeightSet state_weights:
            MocoWeight /jointset/ground_pelvis/pelvis_tilt/value: weight=1
            MocoWeight /jointset/ground_pelvis/pelvis_tilt/speed: weight=0.0001
            MocoWeight /jointset/ground_pelvis/pelvis_list/value: weight=1
            MocoWeight /jointset/ground_pelvis/pelvis_list/speed: weight=0.0001
            MocoWeight /jointset/ground_pelvis/pelvis_rotation/value: weight=1
            MocoWeight /jointset/ground_pelvis/pelvis_rotation/speed: weight=0.0001
            MocoWeight /jointset/ground_pelvis/pelvis_tx/value: weight=0
            MocoWeight /jointset/ground_pelvis/pelvis_tx/speed: weight=0
            MocoWeight /jointset/ground_pelvis/pelvis_ty/value: weight=0
            MocoWeight /jointset/ground_pelvis/pelvis_ty/speed: weight=0.0001
            MocoWeight /jointset/ground_pelvis/pelvis_tz/value: weight=0
            MocoWeight /jointset/ground_pelvis/pelvis_tz/speed: weight=0
            MocoWeight /jointset/hip_r/hip_flexion_r/value: weight=0.01
            MocoWeight /jointset/hip_r/hip_flexion_r/speed: weight=1e-6
            MocoWeight /jointset/hip_r/hip_adduction_r/value: weight=1
            MocoWeight /jointset/hip_r/hip_adduction_r/speed: weight=0.0001
            MocoWeight /jointset/hip_r/hip_rotation_r/value: weight=1
            MocoWeight /jointset/hip_r/hip_rotation_r/speed: weight=0.0001
            MocoWeight /jointset/knee_r/knee_angle_r/value: weight=1
            MocoWeight /jointset/knee_r/knee_angle_r/speed: weight=0.0001
            MocoWeight /jointset/patellofemoral_r/knee_angle_r_beta/value: weight=0
            MocoWeight /jointset/ankle_r/ankle_angle_r/value: weight=5
            MocoWeight /jointset/ankle_r/ankle_angle_r/speed: weight=0.0005
            MocoWeight /jointset/subtalar_r/subtalar_angle_r/value: weight=1
            MocoWeight /jointset/subtalar_r/subtalar_angle_r/speed: weight=0.0001
            MocoWeight /jointset/mtp_r/mtp_angle_r/value: weight=1
            MocoWeight /jointset/mtp_r/mtp_angle_r/speed: weight=0.0001
            MocoWeight /jointset/hip_l/hip_flexion_l/value: weight=0.01
            MocoWeight /jointset/hip_l/hip_flexion_l/speed: weight=1e-6
            MocoWeight /jointset/hip_l/hip_adduction_l/value: weight=1
            MocoWeight /jointset/hip_l/hip_adduction_l/speed: weight=0.0001
            MocoWeight /jointset/hip_l/hip_rotation_l/value: weight=1
            MocoWeight /jointset/hip_l/hip_rotation_l/speed: weight=0.0001
            MocoWeight /jointset/knee_l/knee_angle_l/value: weight=1
            MocoWeight /jointset/knee_l/knee_angle_l/speed: weight=0.0001
            MocoWeight /jointset/patellofemoral_l/knee_angle_l_beta/value: weight=0
            MocoWeight /jointset/ankle_l/ankle_angle_l/value: weight=5
            MocoWeight /jointset/ankle_l/ankle_angle_l/speed: weight=0.0005
            MocoWeight /jointset/subtalar_l/subtalar_angle_l/value: weight=1
            MocoWeight /jointset/subtalar_l/subtalar_angle_l/speed: weight=0.0001
            MocoWeight /jointset/mtp_l/mtp_angle_l/value: weight=1
            MocoWeight /jointset/mtp_l/mtp_angle_l/speed: weight=0.0001
            MocoWeight /jointset/lumbar/lumbar_ext/value: weight=1
            MocoWeight /jointset/lumbar/lumbar_ext/speed: weight=0.0001
            MocoWeight /jointset/lumbar/lumbar_bend/value: weight=1
            MocoWeight /jointset/lumbar/lumbar_bend/speed: weight=0.0001
            MocoWeight /jointset/lumbar/lumbar_rota/value: weight=1
            MocoWeight /jointset/lumbar/lumbar_rota/speed: weight=0.0001
        MocoControlGoal control_effort: weight=1.162791 divide_by_displacement=true exponent=3
        MocoStateTrackingGoal track2: weight=0.2
          TableProcessor reference
          MocoWeightSet state_weights:
            MocoWeight /jointset/patellofemoral_r/knee_angle_r_beta/value: weight=0
            MocoWeight /jointset/patellofemoral_r/knee_angle_r_beta/speed: weight=0
            MocoWeight /jointset/patellofemoral_l/knee_angle_l_beta/value: weight=0
            MocoWeight /jointset/patellofemoral_l/knee_angle_l_beta/speed: weight=0
        MocoPeriodicityGoal periodicityGoal: weight=1 mode=endpoint_constraint
          state_pairs:
            MocoPeriodicityGoalPair: initial_variable=/jointset/ground_pelvis/pelvis_tilt/value
                final_variable=/jointset/ground_pelvis/pelvis_tilt/value
            MocoPeriodicityGoalPair: initial_variable=/jointset/ground_pelvis/pelvis_tilt/speed
                final_variable=/jointset/ground_pelvis/pelvis_tilt/speed
            MocoPeriodicityGoalPair: initial_variable=/jointset/ground_pelvis/pelvis_list/value
                final_variable=/jointset/ground_pelvis/pelvis_list/value
            MocoPeriodicityGoalPair: initial_variable=/jointset/ground_pelvis/pelvis_list/speed
                final_variable=/jointset/ground_pelvis/pelvis_list/speed
            MocoPeriodicityGoalPair: initial_variable=/jointset/ground_pelvis/pelvis_rotation/value
                final_variable=/jointset/ground_pelvis/pelvis_rotation/value
            MocoPeriodicityGoalPair: initial_variable=/jointset/ground_pelvis/pelvis_rotation/speed
                final_variable=/jointset/ground_pelvis/pelvis_rotation/speed
            MocoPeriodicityGoalPair: initial_variable=/jointset/ground_pelvis/pelvis_ty/value
                final_variable=/jointset/ground_pelvis/pelvis_ty/value
            MocoPeriodicityGoalPair: initial_variable=/jointset/ground_pelvis/pelvis_ty/speed
                final_variable=/jointset/ground_pelvis/pelvis_ty/speed
            MocoPeriodicityGoalPair: initial_variable=/jointset/ground_pelvis/pelvis_tz/value
                final_variable=/jointset/ground_pelvis/pelvis_tz/value
            MocoPeriodicityGoalPair: initial_variable=/jointset/ground_pelvis/pelvis_tz/speed
                final_variable=/jointset/ground_pelvis/pelvis_tz/speed
            MocoPeriodicityGoalPair: initial_variable=/jointset/hip_r/hip_flexion_r/value
                final_variable=/jointset/hip_r/hip_flexion_r/value
            MocoPeriodicityGoalPair: initial_variable=/jointset/hip_r/hip_flexion_r/speed
                final_variable=/jointset/hip_r/hip_flexion_r/speed
            MocoPeriodicityGoalPair: initial_variable=/jointset/hip_r/hip_adduction_r/value
                final_variable=/jointset/hip_r/hip_adduction_r/value
            MocoPeriodicityGoalPair: initial_variable=/jointset/hip_r/hip_adduction_r/speed
                final_variable=/jointset/hip_r/hip_adduction_r/speed
            MocoPeriodicityGoalPair: initial_variable=/jointset/hip_r/hip_rotation_r/value
                final_variable=/jointset/hip_r/hip_rotation_r/value
            MocoPeriodicityGoalPair: initial_variable=/jointset/hip_r/hip_rotation_r/speed
                final_variable=/jointset/hip_r/hip_rotation_r/speed
            MocoPeriodicityGoalPair: initial_variable=/jointset/knee_r/knee_angle_r/value
                final_variable=/jointset/knee_r/knee_angle_r/value
            MocoPeriodicityGoalPair: initial_variable=/jointset/knee_r/knee_angle_r/speed
                final_variable=/jointset/knee_r/knee_angle_r/speed
            MocoPeriodicityGoalPair: initial_variable=/jointset/ankle_r/ankle_angle_r/value
                final_variable=/jointset/ankle_r/ankle_angle_r/value
            MocoPeriodicityGoalPair: initial_variable=/jointset/ankle_r/ankle_angle_r/speed
                final_variable=/jointset/ankle_r/ankle_angle_r/speed
            MocoPeriodicityGoalPair: initial_variable=/jointset/subtalar_r/subtalar_angle_r/value
                final_variable=/jointset/subtalar_r/subtalar_angle_r/value
            MocoPeriodicityGoalPair: initial_variable=/jointset/subtalar_r/subtalar_angle_r/speed
                final_variable=/jointset/subtalar_r/subtalar_angle_r/speed
            MocoPeriodicityGoalPair: initial_variable=/jointset/mtp_r/mtp_angle_r/value
                final_variable=/jointset/mtp_r/mtp_angle_r/value
            MocoPeriodicityGoalPair: initial_variable=/jointset/mtp_r/mtp_angle_r/speed
                final_variable=/jointset/mtp_r/mtp_angle_r/speed
            MocoPeriodicityGoalPair: initial_variable=/jointset/hip_l/hip_flexion_l/value
                final_variable=/jointset/hip_l/hip_flexion_l/value
            MocoPeriodicityGoalPair: initial_variable=/jointset/hip_l/hip_flexion_l/speed
                final_variable=/jointset/hip_l/hip_flexion_l/speed
            MocoPeriodicityGoalPair: initial_variable=/jointset/hip_l/hip_adduction_l/value
                final_variable=/jointset/hip_l/hip_adduction_l/value
            MocoPeriodicityGoalPair: initial_variable=/jointset/hip_l/hip_adduction_l/speed
                final_variable=/jointset/hip_l/hip_adduction_l/speed
            MocoPeriodicityGoalPair: initial_variable=/jointset/hip_l/hip_rotation_l/value
                final_variable=/jointset/hip_l/hip_rotation_l/value
            MocoPeriodicityGoalPair: initial_variable=/jointset/hip_l/hip_rotation_l/speed
                final_variable=/jointset/hip_l/hip_rotation_l/speed
            MocoPeriodicityGoalPair: initial_variable=/jointset/knee_l/knee_angle_l/value
                final_variable=/jointset/knee_l/knee_angle_l/value
            MocoPeriodicityGoalPair: initial_variable=/jointset/knee_l/knee_angle_l/speed
                final_variable=/jointset/knee_l/knee_angle_l/speed
            MocoPeriodicityGoalPair: initial_variable=/jointset/ankle_l/ankle_angle_l/value
                final_variable=/jointset/ankle_l/ankle_angle_l/value
            MocoPeriodicityGoalPair: initial_variable=/jointset/ankle_l/ankle_angle_l/speed
                final_variable=/jointset/ankle_l/ankle_angle_l/speed
            MocoPeriodicityGoalPair: initial_variable=/jointset/subtalar_l/subtalar_angle_l/value
                final_variable=/jointset/subtalar_l/subtalar_angle_l/value
            MocoPeriodicityGoalPair: initial_variable=/jointset/subtalar_l/subtalar_angle_l/speed
                final_variable=/jointset/subtalar_l/subtalar_angle_l/speed
            MocoPeriodicityGoalPair: initial_variable=/jointset/mtp_l/mtp_angle_l/value
                final_variable=/jointset/mtp_l/mtp_angle_l/value
            MocoPeriodicityGoalPair: initial_variable=/jointset/mtp_l/mtp_angle_l/speed
                final_variable=/jointset/mtp_l/mtp_angle_l/speed
            MocoPeriodicityGoalPair: initial_variable=/jointset/lumbar/lumbar_ext/value
                final_variable=/jointset/lumbar/lumbar_ext/value
            MocoPeriodicityGoalPair: initial_variable=/jointset/lumbar/lumbar_ext/speed
                final_variable=/jointset/lumbar/lumbar_ext/speed
            MocoPeriodicityGoalPair: initial_variable=/jointset/lumbar/lumbar_bend/value
                final_variable=/jointset/lumbar/lumbar_bend/value
            MocoPeriodicityGoalPair: initial_variable=/jointset/lumbar/lumbar_bend/speed
                final_variable=/jointset/lumbar/lumbar_bend/speed
            MocoPeriodicityGoalPair: initial_variable=/jointset/lumbar/lumbar_rota/value
                final_variable=/jointset/lumbar/lumbar_rota/value
            MocoPeriodicityGoalPair: initial_variable=/jointset/lumbar/lumbar_rota/speed
                final_variable=/jointset/lumbar/lumbar_rota/speed
            MocoPeriodicityGoalPair: initial_variable=/forceset/addbrev_r/activation
                final_variable=/forceset/addbrev_r/activation
            MocoPeriodicityGoalPair: initial_variable=/forceset/addlong_r/activation
                final_variable=/forceset/addlong_r/activation
            MocoPeriodicityGoalPair: initial_variable=/forceset/addmagDist_r/activation
                final_variable=/forceset/addmagDist_r/activation
            MocoPeriodicityGoalPair: initial_variable=/forceset/addmagIsch_r/activation
                final_variable=/forceset/addmagIsch_r/activation
            MocoPeriodicityGoalPair: initial_variable=/forceset/addmagMid_r/activation
                final_variable=/forceset/addmagMid_r/activation
            MocoPeriodicityGoalPair: initial_variable=/forceset/addmagProx_r/activation
                final_variable=/forceset/addmagProx_r/activation
            MocoPeriodicityGoalPair: initial_variable=/forceset/bflh_r/activation
                final_variable=/forceset/bflh_r/activation
            MocoPeriodicityGoalPair: initial_variable=/forceset/bfsh_r/activation
                final_variable=/forceset/bfsh_r/activation
            MocoPeriodicityGoalPair: initial_variable=/forceset/edl_r/activation
                final_variable=/forceset/edl_r/activation
            MocoPeriodicityGoalPair: initial_variable=/forceset/ehl_r/activation
                final_variable=/forceset/ehl_r/activation
            MocoPeriodicityGoalPair: initial_variable=/forceset/fdl_r/activation
                final_variable=/forceset/fdl_r/activation
            MocoPeriodicityGoalPair: initial_variable=/forceset/fhl_r/activation
                final_variable=/forceset/fhl_r/activation
            MocoPeriodicityGoalPair: initial_variable=/forceset/gaslat_r/activation
                final_variable=/forceset/gaslat_r/activation
            MocoPeriodicityGoalPair: initial_variable=/forceset/gasmed_r/activation
                final_variable=/forceset/gasmed_r/activation
            MocoPeriodicityGoalPair: initial_variable=/forceset/glmax1_r/activation
                final_variable=/forceset/glmax1_r/activation
            MocoPeriodicityGoalPair: initial_variable=/forceset/glmax2_r/activation
                final_variable=/forceset/glmax2_r/activation
            MocoPeriodicityGoalPair: initial_variable=/forceset/glmax3_r/activation
                final_variable=/forceset/glmax3_r/activation
            MocoPeriodicityGoalPair: initial_variable=/forceset/glmed1_r/activation
                final_variable=/forceset/glmed1_r/activation
            MocoPeriodicityGoalPair: initial_variable=/forceset/glmed2_r/activation
                final_variable=/forceset/glmed2_r/activation
            MocoPeriodicityGoalPair: initial_variable=/forceset/glmed3_r/activation
                final_variable=/forceset/glmed3_r/activation
            MocoPeriodicityGoalPair: initial_variable=/forceset/glmin1_r/activation
                final_variable=/forceset/glmin1_r/activation
            MocoPeriodicityGoalPair: initial_variable=/forceset/glmin2_r/activation
                final_variable=/forceset/glmin2_r/activation
            MocoPeriodicityGoalPair: initial_variable=/forceset/glmin3_r/activation
                final_variable=/forceset/glmin3_r/activation
            MocoPeriodicityGoalPair: initial_variable=/forceset/grac_r/activation
                final_variable=/forceset/grac_r/activation
            MocoPeriodicityGoalPair: initial_variable=/forceset/iliacus_r/activation
                final_variable=/forceset/iliacus_r/activation
            MocoPeriodicityGoalPair: initial_variable=/forceset/perbrev_r/activation
                final_variable=/forceset/perbrev_r/activation
            MocoPeriodicityGoalPair: initial_variable=/forceset/perlong_r/activation
                final_variable=/forceset/perlong_r/activation
            MocoPeriodicityGoalPair: initial_variable=/forceset/piri_r/activation
                final_variable=/forceset/piri_r/activation
            MocoPeriodicityGoalPair: initial_variable=/forceset/psoas_r/activation
                final_variable=/forceset/psoas_r/activation
            MocoPeriodicityGoalPair: initial_variable=/forceset/recfem_r/activation
                final_variable=/forceset/recfem_r/activation
            MocoPeriodicityGoalPair: initial_variable=/forceset/sart_r/activation
                final_variable=/forceset/sart_r/activation
            MocoPeriodicityGoalPair: initial_variable=/forceset/semimem_r/activation
                final_variable=/forceset/semimem_r/activation
            MocoPeriodicityGoalPair: initial_variable=/forceset/semiten_r/activation
                final_variable=/forceset/semiten_r/activation
            MocoPeriodicityGoalPair: initial_variable=/forceset/soleus_r/activation
                final_variable=/forceset/soleus_r/activation
            MocoPeriodicityGoalPair: initial_variable=/forceset/tfl_r/activation
                final_variable=/forceset/tfl_r/activation
            MocoPeriodicityGoalPair: initial_variable=/forceset/tibant_r/activation
                final_variable=/forceset/tibant_r/activation
            MocoPeriodicityGoalPair: initial_variable=/forceset/tibpost_r/activation
                final_variable=/forceset/tibpost_r/activation
            MocoPeriodicityGoalPair: initial_variable=/forceset/vasint_r/activation
                final_variable=/forceset/vasint_r/activation
            MocoPeriodicityGoalPair: initial_variable=/forceset/vaslat_r/activation
                final_variable=/forceset/vaslat_r/activation
            MocoPeriodicityGoalPair: initial_variable=/forceset/vasmed_r/activation
                final_variable=/forceset/vasmed_r/activation
            MocoPeriodicityGoalPair: initial_variable=/forceset/addbrev_l/activation
                final_variable=/forceset/addbrev_l/activation
            MocoPeriodicityGoalPair: initial_variable=/forceset/addlong_l/activation
                final_variable=/forceset/addlong_l/activation
            MocoPeriodicityGoalPair: initial_variable=/forceset/addmagDist_l/activation
                final_variable=/forceset/addmagDist_l/activation
            MocoPeriodicityGoalPair: initial_variable=/forceset/addmagIsch_l/activation
                final_variable=/forceset/addmagIsch_l/activation
            MocoPeriodicityGoalPair: initial_variable=/forceset/addmagMid_l/activation
                final_variable=/forceset/addmagMid_l/activation
            MocoPeriodicityGoalPair: initial_variable=/forceset/addmagProx_l/activation
                final_variable=/forceset/addmagProx_l/activation
            MocoPeriodicityGoalPair: initial_variable=/forceset/bflh_l/activation
                final_variable=/forceset/bflh_l/activation
            MocoPeriodicityGoalPair: initial_variable=/forceset/bfsh_l/activation
                final_variable=/forceset/bfsh_l/activation
            MocoPeriodicityGoalPair: initial_variable=/forceset/edl_l/activation
                final_variable=/forceset/edl_l/activation
            MocoPeriodicityGoalPair: initial_variable=/forceset/ehl_l/activation
                final_variable=/forceset/ehl_l/activation
            MocoPeriodicityGoalPair: initial_variable=/forceset/fdl_l/activation
                final_variable=/forceset/fdl_l/activation
            MocoPeriodicityGoalPair: initial_variable=/forceset/fhl_l/activation
                final_variable=/forceset/fhl_l/activation
            MocoPeriodicityGoalPair: initial_variable=/forceset/gaslat_l/activation
                final_variable=/forceset/gaslat_l/activation
            MocoPeriodicityGoalPair: initial_variable=/forceset/gasmed_l/activation
                final_variable=/forceset/gasmed_l/activation
            MocoPeriodicityGoalPair: initial_variable=/forceset/glmax1_l/activation
                final_variable=/forceset/glmax1_l/activation
            MocoPeriodicityGoalPair: initial_variable=/forceset/glmax2_l/activation
                final_variable=/forceset/glmax2_l/activation
            MocoPeriodicityGoalPair: initial_variable=/forceset/glmax3_l/activation
                final_variable=/forceset/glmax3_l/activation
            MocoPeriodicityGoalPair: initial_variable=/forceset/glmed1_l/activation
                final_variable=/forceset/glmed1_l/activation
            MocoPeriodicityGoalPair: initial_variable=/forceset/glmed2_l/activation
                final_variable=/forceset/glmed2_l/activation
            MocoPeriodicityGoalPair: initial_variable=/forceset/glmed3_l/activation
                final_variable=/forceset/glmed3_l/activation
            MocoPeriodicityGoalPair: initial_variable=/forceset/glmin1_l/activation
                final_variable=/forceset/glmin1_l/activation
            MocoPeriodicityGoalPair: initial_variable=/forceset/glmin2_l/activation
                final_variable=/forceset/glmin2_l/activation
            MocoPeriodicityGoalPair: initial_variable=/forceset/glmin3_l/activation
                final_variable=/forceset/glmin3_l/activation
            MocoPeriodicityGoalPair: initial_variable=/forceset/grac_l/activation
                final_variable=/forceset/grac_l/activation
            MocoPeriodicityGoalPair: initial_variable=/forceset/iliacus_l/activation
                final_variable=/forceset/iliacus_l/activation
            MocoPeriodicityGoalPair: initial_variable=/forceset/perbrev_l/activation
                final_variable=/forceset/perbrev_l/activation
            MocoPeriodicityGoalPair: initial_variable=/forceset/perlong_l/activation
                final_variable=/forceset/perlong_l/activation
            MocoPeriodicityGoalPair: initial_variable=/forceset/piri_l/activation
                final_variable=/forceset/piri_l/activation
            MocoPeriodicityGoalPair: initial_variable=/forceset/psoas_l/activation
                final_variable=/forceset/psoas_l/activation
            MocoPeriodicityGoalPair: initial_variable=/forceset/recfem_l/activation
                final_variable=/forceset/recfem_l/activation
            MocoPeriodicityGoalPair: initial_variable=/forceset/sart_l/activation
                final_variable=/forceset/sart_l/activation
            MocoPeriodicityGoalPair: initial_variable=/forceset/semimem_l/activation
                final_variable=/forceset/semimem_l/activation
            MocoPeriodicityGoalPair: initial_variable=/forceset/semiten_l/activation
                final_variable=/forceset/semiten_l/activation
            MocoPeriodicityGoalPair: initial_variable=/forceset/soleus_l/activation
                final_variable=/forceset/soleus_l/activation
            MocoPeriodicityGoalPair: initial_variable=/forceset/tfl_l/activation
                final_variable=/forceset/tfl_l/activation
            MocoPeriodicityGoalPair: initial_variable=/forceset/tibant_l/activation
                final_variable=/forceset/tibant_l/activation
            MocoPeriodicityGoalPair: initial_variable=/forceset/tibpost_l/activation
                final_variable=/forceset/tibpost_l/activation
            MocoPeriodicityGoalPair: initial_variable=/forceset/vasint_l/activation
                final_variable=/forceset/vasint_l/activation
            MocoPeriodicityGoalPair: initial_variable=/forceset/vaslat_l/activation
                final_variable=/forceset/vaslat_l/activation
            MocoPeriodicityGoalPair: initial_variable=/forceset/vasmed_l/activation
                final_variable=/forceset/vasmed_l/activation
            MocoPeriodicityGoalPair: initial_variable=/forceset/tau_lumbar_bend/activation
                final_variable=/forceset/tau_lumbar_bend/activation
            MocoPeriodicityGoalPair: initial_variable=/forceset/tau_lumbar_ext/activation
                final_variable=/forceset/tau_lumbar_ext/activation
            MocoPeriodicityGoalPair: initial_variable=/forceset/tau_lumbar_rota/activation
                final_variable=/forceset/tau_lumbar_rota/activation
        MocoInitialForceEquilibriumDGFGoal tendonEQ
        MocoInitialVelocityEquilibriumDGFGoal tendonV
        MocoOutputGoal met: weight=0.005 divide_by_displacement=true divide_by_mass=true
            output_path=/metabolic_cost_Bhargava2004|total_metabolic_rate
        MocoAccelerationTrackingGoal acceleration_tracking: weight=0.00025
            frame_paths=(/bodyset/torso/torso_imu_offset /bodyset/pelvis/pelvis_imu_offset /bodyset/femur_r/femur_r_imu_offset /bodyset/tibia_r/tibia_r_imu_offset /bodyset/toes_r/toes_r_imu_offset /bodyset/femur_l/femur_l_imu_offset /bodyset/tibia_l/tibia_l_imu_offset /bodyset/toes_l/toes_l_imu_offset)
            gravity_offset=true express_accelerations_in_tracking_frames=true
          MocoWeightSet acceleration_weights:
            MocoWeight /bodyset/torso/torso_imu_offset: weight=8.438665
            MocoWeight /bodyset/pelvis/pelvis_imu_offset: weight=8.439448
            MocoWeight /bodyset/femur_r/femur_r_imu_offset: weight=8.894106
            MocoWeight /bodyset/tibia_r/tibia_r_imu_offset: weight=21.55393
            MocoWeight /bodyset/toes_r/toes_r_imu_offset: weight=0.5672831
            MocoWeight /bodyset/femur_l/femur_l_imu_offset: weight=8.894106
            MocoWeight /bodyset/tibia_l/tibia_l_imu_offset: weight=21.55393
            MocoWeight /bodyset/toes_l/toes_l_imu_offset: weight=0.5672831
        MocoAngularVelocityTrackingGoal AngularVelocity_tracking: weight=0.0025
            frame_paths=(/bodyset/torso/torso_imu_offset /bodyset/pelvis/pelvis_imu_offset /bodyset/femur_r/femur_r_imu_offset /bodyset/tibia_r/tibia_r_imu_offset /bodyset/toes_r/toes_r_imu_offset /bodyset/femur_l/femur_l_imu_offset /bodyset/tibia_l/tibia_l_imu_offset /bodyset/toes_l/toes_l_imu_offset)
          TableProcessor states_reference
          MocoWeightSet angular_velocity_weights:
            MocoWeight /bodyset/torso/torso_imu_offset: weight=7.342903
            MocoWeight /bodyset/pelvis/pelvis_imu_offset: weight=15.21006
            MocoWeight /bodyset/femur_r/femur_r_imu_offset: weight=11.78708
            MocoWeight /bodyset/tibia_r/tibia_r_imu_offset: weight=11.60865
            MocoWeight /bodyset/toes_r/toes_r_imu_offset: weight=0.5197692
            MocoWeight /bodyset/femur_l/femur_l_imu_offset: weight=11.78708
            MocoWeight /bodyset/tibia_l/tibia_l_imu_offset: weight=11.60865
            MocoWeight /bodyset/toes_l/toes_l_imu_offset: weight=0.5197692
        MocoOrientationTrackingGoal IMU_Orientation_tracking: weight=0.125
            frame_paths=(/bodyset/torso/torso_imu_offset /bodyset/pelvis/pelvis_imu_offset /bodyset/femur_r/femur_r_imu_offset /bodyset/tibia_r/tibia_r_imu_offset /bodyset/toes_r/toes_r_imu_offset /bodyset/femur_l/femur_l_imu_offset /bodyset/tibia_l/tibia_l_imu_offset /bodyset/toes_l/toes_l_imu_offset)
          TableProcessor states_reference
          MocoWeightSet rotation_weights:
            MocoWeight /bodyset/pelvis/pelvis_imu_offset: weight=5.176507
            MocoWeight /bodyset/femur_r/femur_r_imu_offset: weight=14.88653
            MocoWeight /bodyset/tibia_r/tibia_r_imu_offset: weight=15.10148
            MocoWeight /bodyset/toes_r/toes_r_imu_offset: weight=0.3722057
            MocoWeight /bodyset/femur_l/femur_l_imu_offset: weight=14.88653
            MocoWeight /bodyset/tibia_l/tibia_l_imu_offset: weight=15.10148
            MocoWeight /bodyset/toes_l/toes_l_imu_offset: weight=0.3722057
        MocoOrientationTrackingGoal torsoGoal: weight=0.5 frame_paths=/bodyset/torso
          TableProcessor states_reference: filepath=refQ_0State_S1.sto
        MocoContactTrackingGoal contactGoalVert: weight=1000 external_loads_file=refGRF_edit_S1.xml projection=vector
            projection_vector=(0 1 0) normalize_tracking_error=true
          contact_groups:
            MocoContactTrackingGoalGroup: contact_force_paths=(forceset/SmoothSphereHalfSpaceForce_mh1_r forceset/SmoothSphereHalfSpaceForce_mh3_r forceset/SmoothSphereHalfSpaceForce_mh5_r forceset/SmoothSphereHalfSpaceForce_heel_r forceset/SmoothSphereHalfSpaceForce_hallux_r forceset/SmoothSphereHalfSpaceForce_othertoes_r forceset/SmoothSphereHalfSpaceForce_latheel_r forceset/SmoothSphereHalfSpaceForce_medheel_r forceset/SmoothSphereHalfSpaceForce_mid_r forceset/SmoothSphereHalfSpaceForce_latmid_r forceset/SmoothSphereHalfSpaceForce_medmid_r)
                external_force_name=RightGRF alternative_frame_paths=/bodyset/toes_r
            MocoContactTrackingGoalGroup: contact_force_paths=(forceset/SmoothSphereHalfSpaceForce_mh1_l forceset/SmoothSphereHalfSpaceForce_mh3_l forceset/SmoothSphereHalfSpaceForce_mh5_l forceset/SmoothSphereHalfSpaceForce_heel_l forceset/SmoothSphereHalfSpaceForce_hallux_l forceset/SmoothSphereHalfSpaceForce_othertoes_l forceset/SmoothSphereHalfSpaceForce_latheel_l forceset/SmoothSphereHalfSpaceForce_medheel_l forceset/SmoothSphereHalfSpaceForce_mid_l forceset/SmoothSphereHalfSpaceForce_latmid_l forceset/SmoothSphereHalfSpaceForce_medmid_l)
                external_force_name=LeftGRF alternative_frame_paths=/bodyset/toes_l
        MocoContactTrackingGoal contactGoalHor: weight=1000 external_loads_file=refGRF_edit_S1.xml projection=vector
            projection_vector=(1 0 0) normalize_tracking_error=true
          contact_groups:
            MocoContactTrackingGoalGroup: contact_force_paths=(forceset/SmoothSphereHalfSpaceForce_mh1_r forceset/SmoothSphereHalfSpaceForce_mh3_r forceset/SmoothSphereHalfSpaceForce_mh5_r forceset/SmoothSphereHalfSpaceForce_heel_r forceset/SmoothSphereHalfSpaceForce_hallux_r forceset/SmoothSphereHalfSpaceForce_othertoes_r forceset/SmoothSphereHalfSpaceForce_latheel_r forceset/SmoothSphereHalfSpaceForce_medheel_r forceset/SmoothSphereHalfSpaceForce_mid_r forceset/SmoothSphereHalfSpaceForce_latmid_r forceset/SmoothSphereHalfSpaceForce_medmid_r)
                external_force_name=RightGRF alternative_frame_paths=/bodyset/toes_r
            MocoContactTrackingGoalGroup: contact_force_paths=(forceset/SmoothSphereHalfSpaceForce_mh1_l forceset/SmoothSphereHalfSpaceForce_mh3_l forceset/SmoothSphereHalfSpaceForce_mh5_l forceset/SmoothSphereHalfSpaceForce_heel_l forceset/SmoothSphereHalfSpaceForce_hallux_l forceset/SmoothSphereHalfSpaceForce_othertoes_l forceset/SmoothSphereHalfSpaceForce_latheel_l forceset/SmoothSphereHalfSpaceForce_medheel_l forceset/SmoothSphereHalfSpaceForce_mid_l forceset/SmoothSphereHalfSpaceForce_latmid_l forceset/SmoothSphereHalfSpaceForce_medmid_l)
                external_force_name=LeftGRF alternative_frame_paths=/bodyset/toes_l
        MocoJointReactionGoal reaction_r: weight=0.0001 joint_path=/jointset/knee_r reaction_measures=(force-x force-y)
        MocoJointReactionGoal reaction_l: weight=0.0001 joint_path=/jointset/knee_l reaction_measures=(force-x force-y)
  MocoCasADiSolver solver:
    num_mesh_intervals: 100
    verbosity: 2
    enforce_constraint_derivatives: true
    multibody_dynamics_mode: explicit
    optim_max_iterations: 7000
    optim_convergence_tolerance: 0.002
    optim_constraint_tolerance: 0.01
    optim_ipopt_print_level: 5
    guess_file: RE_Post_01TP_2_timepoint3_S1265_guess2.sto
    optim_finite_difference_scheme: forward
    parallel: 1
    minimize_implicit_auxiliary_derivatives: true
    implicit_auxiliary_derivatives_weight: 0.0001
