# OpenSim document version 40000
MocoStudy RE_Pre_11TP_1_timepoint1_S4_track:
  write_solution: false
  MocoProblem problem:
    MocoPhase phases:
      ModelProcessor model:
        model: Model NI:
          gravity: 0 -9.80665 0
          length_units: meters
          force_units: N
          Ground
          BodySet:
            Body pelvis: mass=12.5372 [kg] mass_center=(-0.06398916 0 0) inertia=(0.1311291 0.1311291 0.0551832 0 0 0)
                meshes=(r_pelvis.vtp l_pelvis.vtp sacrum.vtp)
              PhysicalOffsetFrame pelvis_imu_offset: socket_parent=..
                  translation=(-0.1436124 0.03214814 -0.001035643) [meters]
                  orientation=(-1.73798 0.1704723 0.05085138) [radians]
              WrapCylinder Gmax1_at_pelvis_r: xyz_body_rotation=(-0.6 0.45 0)
                  translation=(-0.06969116 -0.09792882 0.0700036) quadrant=-x radius=0.03974516 length=0.1598254
              WrapCylinder Gmax2_at_pelvis_r: xyz_body_rotation=(-0.75 0.39 0)
                  translation=(-0.0724064 -0.08210194 0.0780368) quadrant=all radius=0.0399519 length=0.1053794
              WrapCylinder Gmax3_at_pelvis_r: xyz_body_rotation=(-0.1 0 0)
                  translation=(-0.07512164 -0.08704784 0.0780368) quadrant=all radius=0.03791928 length=0.1146129
              WrapCylinder Gmax1_at_pelvis_l: xyz_body_rotation=(0.6 -0.45 0)
                  translation=(-0.06969116 -0.09792882 -0.0700036) quadrant=-x radius=0.03974516 length=0.1598254
              WrapCylinder Gmax2_at_pelvis_l: xyz_body_rotation=(0.75 -0.39 0)
                  translation=(-0.0724064 -0.08210194 -0.0780368) quadrant=all radius=0.0399519 length=0.1053794
              WrapCylinder Gmax3_at_pelvis_l: xyz_body_rotation=(0.1 0 0)
                  translation=(-0.07512164 -0.08704784 -0.0780368) quadrant=all radius=0.03791928 length=0.1146129
              WrapCylinder PS_at_brim_r: xyz_body_rotation=(-0.25 -0.27 0.1)
                  translation=(-0.06697592 -0.0593508 0.07528256) quadrant=-y radius=0.04807801 length=0.1123531
              WrapCylinder PS_at_brim_l: xyz_body_rotation=(0.25 0.27 0.1)
                  translation=(-0.06697592 -0.0593508 -0.07528256) quadrant=-y radius=0.04807801 length=0.1123531
              WrapCylinder IL_at_brim_r: xyz_body_rotation=(-0.32 -0.24 0.9)
                  translation=(-0.06426068 -0.0642967 0.08675856) quadrant=-y radius=0.05290616 length=0.1121274
              WrapCylinder IL_at_brim_l: xyz_body_rotation=(0.32 0.24 0.9)
                  translation=(-0.06426068 -0.0642967 -0.08675856) quadrant=-y radius=0.05290616 length=0.1121274
            Body femur_r: mass=9.901805 mass_center=(0 -0.1690769 0) inertia=(0.1454469 0.04585598 0.1454469 0 0 0)
                meshes=r_femur.vtp
              PhysicalOffsetFrame femur_r_imu_offset: socket_parent=.. translation=(0.005897599 -0.3053957 0.05801713)
                  orientation=(-1.356385 0.1226684 -0.02663887)
              WrapCylinder Gastroc_at_condyles_r: translation=(0.0053525 -0.4077737 0) quadrant=all radius=0.02581337
                  length=0.11464
              WrapCylinder KnExt_at_fem_r: xyz_body_rotation=(-0.0623366 0.0507601 0)
                  translation=(0.003841254 -0.4005452 0.002397249) quadrant=all radius=0.02582381 length=0.1145662
              WrapCylinder AB_at_femshaft_r: xyz_body_rotation=(1.66157 0.186644 0)
                  translation=(0.01567576 -0.1119836 0.02678564) quadrant=all radius=0.01825933 length=0.0699001
              WrapCylinder AL_at_femshaft_r: xyz_body_rotation=(1.77711 0.136489 0)
                  translation=(0.03289936 -0.2306497 0.01732635) quadrant=all radius=0.02220745 length=0.1002727
              WrapCylinder AMprox_at_femshaft_r: xyz_body_rotation=(1.61126 0.18656 0)
                  translation=(0.005548391 -0.07249898 0.029122) quadrant=all radius=0.02335932 length=0.0698275
              WrapCylinder AMmid_at_femshaft_r: xyz_body_rotation=(1.61139 0.13656 0)
                  translation=(0.02463488 -0.1598383 0.02359773) quadrant=all radius=0.02370385 length=0.1195552
              WrapCylinder AMdist_at_femshaft_r: xyz_body_rotation=(1.71188 0.186636 0)
                  translation=(0.03383476 -0.2593202 0.01073558) quadrant=all radius=0.02410723 length=0.2000774
              WrapCylinder AMisch_at_condyles_r: xyz_body_rotation=(1.71115 -0.463363 0)
                  translation=(-0.024248 -0.3747848 -0.00361617) quadrant=all radius=0.04399983 length=0.2430508
              WrapCylinder PECT_at_femshaft_r: xyz_body_rotation=(1.81295 0.276344 0)
                  translation=(0.006514774 -0.08404405 0.03489699) quadrant=all radius=0.01652929 length=0.05045151
            Body tibia_r: mass=3.946819 mass_center=(0 -0.1877455 0) inertia=(0.05393674 0.004851832 0.05393674 0 0 0)
                meshes=(r_tibia.vtp r_fibula.vtp)
              PhysicalOffsetFrame tibia_r_imu_offset: socket_parent=.. translation=(0.004983722 -0.2880661 -0.01511925)
                  orientation=(-1.685455 0.2005051 0.02293258)
              WrapCylinder GasLat_at_shank_r: xyz_body_rotation=(2.96723 -0.279725 -1.47812)
                  translation=(-0.007145218 -0.0744144 -0.003054216) quadrant=-y radius=0.05406733 length=0.09309457
              WrapCylinder GasMed_at_shank_r: xyz_body_rotation=(2.96723 0.0279725 -1.47812)
                  translation=(-0.007145218 -0.0744144 -0.003054216) quadrant=-y radius=0.05414294 length=0.09280609
              WrapCylinder GR_at_condyles_r: xyz_body_rotation=(0 -0.4 0) translation=(-0.00289671 -0.020112 0)
                  quadrant=all radius=0.03537367 length=0.09317042
              WrapCylinder SM_at_condyles_r: xyz_body_rotation=(0 -0.1 0) translation=(-0.00096557 -0.020112 0)
                  quadrant=all radius=0.03468571 length=0.09259277
              WrapCylinder ST_at_condyles_r: xyz_body_rotation=(0 -0.2 0) translation=(-0.00193114 -0.0206148 0)
                  quadrant=all radius=0.04185444 length=0.09271335
              WrapCylinder BF_at_gastroc_r: translation=(-0.05600306 -0.060336 0) quadrant=y radius=0.02956755
                  length=0.138828
            Body patella_r: mass=0.09176421 mass_center=(0.0018 0.0264 0)
                inertia=(3.055258e-6 1.395625e-5 1.395625e-5 0 0 0) meshes=r_patella.vtp
            Body talus_r: mass=0.106455 mass_center=(0 0 0) inertia=(0.0005139555 0.0005139555 0.0005139555 0 0 0)
                meshes=r_talus.vtp
            Body calcn_r: mass=1.330687 mass_center=(0.06948319 0.02084496 0)
                inertia=(0.0007195378 0.002004427 0.002107218 0 0 0) meshes=r_foot.vtp
            Body toes_r: mass=0.2305815 mass_center=(0.02404118 0.004168991 -0.01215956)
                inertia=(5.139555e-5 0.0001027911 0.0005139555 0 0 0) meshes=r_bofoot.vtp
              PhysicalOffsetFrame toes_r_imu_offset: socket_parent=.. translation=(0 0.01 0)
                  orientation=(-1.308449 0.2094079 -0.1182096)
            Body femur_l: mass=9.901805 mass_center=(0 -0.1690769 0) inertia=(0.1454469 0.04585598 0.1454469 0 0 0)
                meshes=l_femur.vtp
              PhysicalOffsetFrame femur_l_imu_offset: socket_parent=.. translation=(0.005897599 -0.3053957 -0.05801713)
                  orientation=(-1.703079 -0.06288947 -0.008362359)
              WrapCylinder Gastroc_at_condyles_l: translation=(0.0053525 -0.4077737 0) quadrant=all radius=0.02581337
                  length=0.11464
              WrapCylinder KnExt_at_fem_l: xyz_body_rotation=(0.0623366 -0.0507601 0)
                  translation=(0.003841254 -0.4005452 -0.002397249) quadrant=all radius=0.02582381 length=0.1145662
              WrapCylinder AB_at_femshaft_l: xyz_body_rotation=(-1.66157 -0.186644 0)
                  translation=(0.01567576 -0.1119836 -0.02678564) quadrant=all radius=0.01825933 length=0.0699001
              WrapCylinder AL_at_femshaft_l: xyz_body_rotation=(-1.77711 -0.136489 0)
                  translation=(0.03289936 -0.2306497 -0.01732635) quadrant=all radius=0.02220745 length=0.1002727
              WrapCylinder AMprox_at_femshaft_l: xyz_body_rotation=(-1.61126 -0.18656 0)
                  translation=(0.005548391 -0.07249898 -0.029122) quadrant=all radius=0.02335932 length=0.0698275
              WrapCylinder AMmid_at_femshaft_l: xyz_body_rotation=(-1.61139 -0.13656 0)
                  translation=(0.02463488 -0.1598383 -0.02359773) quadrant=all radius=0.02370385 length=0.1195552
              WrapCylinder AMdist_at_femshaft_l: xyz_body_rotation=(-1.71188 -0.186636 0)
                  translation=(0.03383476 -0.2593202 -0.01073558) quadrant=all radius=0.02410723 length=0.2000774
              WrapCylinder AMisch_at_condyles_l: xyz_body_rotation=(-1.71115 0.463363 0)
                  translation=(-0.024248 -0.3747848 0.00361617) quadrant=all radius=0.04399983 length=0.2430508
              WrapCylinder PECT_at_femshaft_l: xyz_body_rotation=(-1.81295 -0.276344 0)
                  translation=(0.006514774 -0.08404405 -0.03489699) quadrant=all radius=0.01652929 length=0.05045151
            Body tibia_l: mass=3.946819 mass_center=(0 -0.1877455 0) inertia=(0.05393674 0.004851832 0.05393674 0 0 0)
                meshes=(l_tibia.vtp l_fibula.vtp)
              PhysicalOffsetFrame tibia_l_imu_offset: socket_parent=.. translation=(0.0140055 -0.290025 0.01497133)
                  orientation=(-1.518345 0.1462621 -0.007651216)
              WrapCylinder GasLat_at_shank_l: xyz_body_rotation=(-2.96723 0.279725 -1.47812)
                  translation=(-0.007145218 -0.0744144 0.003054216) quadrant=-y radius=0.05406733 length=0.09309457
              WrapCylinder GasMed_at_shank_l: xyz_body_rotation=(-2.96723 -0.0279725 -1.47812)
                  translation=(-0.007145218 -0.0744144 0.003054216) quadrant=-y radius=0.05414294 length=0.09280609
              WrapCylinder GR_at_condyles_l: xyz_body_rotation=(0 0.4 0) translation=(-0.00289671 -0.020112 0)
                  quadrant=all radius=0.03537367 length=0.09317042
              WrapCylinder SM_at_condyles_l: xyz_body_rotation=(0 0.1 0) translation=(-0.00096557 -0.020112 0)
                  quadrant=all radius=0.03468571 length=0.09259277
              WrapCylinder ST_at_condyles_l: xyz_body_rotation=(0 0.2 0) translation=(-0.00193114 -0.0206148 0)
                  quadrant=all radius=0.04185444 length=0.09271335
              WrapCylinder BF_at_gastroc_l: translation=(-0.05600306 -0.060336 0) quadrant=all radius=0.02956755
                  length=0.138828
            Body patella_l: mass=0.09176421 mass_center=(0.0018 0.0264 0)
                inertia=(3.055258e-6 1.395625e-5 1.395625e-5 0 0 0) meshes=l_patella.vtp
            Body talus_l: mass=0.106455 mass_center=(0 0 0) inertia=(0.0005139555 0.0005139555 0.0005139555 0 0 0)
                meshes=l_talus.vtp
            Body calcn_l: mass=1.330687 mass_center=(0.06948319 0.02084496 0)
                inertia=(0.0007195378 0.002004427 0.002107218 0 0 0) meshes=l_foot.vtp
            Body toes_l: mass=0.2305815 mass_center=(0.02404118 0.004168991 0.01215956)
                inertia=(5.139555e-5 0.0001027911 0.0005139555 0 0 0) meshes=l_bofoot.vtp
              PhysicalOffsetFrame toes_l_imu_offset: socket_parent=.. translation=(0 0.01 0)
                  orientation=(-1.765029 0.2172414 0.0881486)
            Body torso: mass=36.44657 mass_center=(-0.02815688 0.3003401 0) inertia=(1.38273 0.7084791 1.342312 0 0 0)
                meshes=(hat_spine.vtp hat_jaw.vtp hat_skull.vtp hat_ribs_scap.vtp)
              PhysicalOffsetFrame torso_imu_offset: socket_parent=.. translation=(0.03369945 0.3691544 1.543185e-7)
                  orientation=(-1.638214 -0.5168109 -0.03334975)
          JointSet:
            CustomJoint ground_pelvis: socket_parent_frame=ground_offset socket_child_frame=pelvis_offset
              Coordinate pelvis_tilt: default_value=0 range=(-1.570796 1.570796) clamped=true
              Coordinate pelvis_list: default_value=0 range=(-1.570796 1.570796) clamped=true
              Coordinate pelvis_rotation: default_value=0 range=(-1.570796 1.570796) clamped=true
              Coordinate pelvis_tx: default_value=0 range=(-5 5) clamped=true
              Coordinate pelvis_ty: default_value=0.93 range=(-1 2) clamped=true
              Coordinate pelvis_tz: default_value=0 range=(-3 3) clamped=true
              PhysicalOffsetFrame ground_offset: socket_parent=/ground translation=(0 0 0)
              PhysicalOffsetFrame pelvis_offset: socket_parent=/bodyset/pelvis translation=(0 0 0)
              SpatialTransform:
                TransformAxis rotation1: coordinates=pelvis_tilt axis=(0 0 1) LinearFunction(coefficients=1 0)
                TransformAxis rotation2: coordinates=pelvis_list axis=(1 0 0) LinearFunction(coefficients=1 0)
                TransformAxis rotation3: coordinates=pelvis_rotation axis=(0 1 0) LinearFunction(coefficients=1 0)
                TransformAxis translation1: coordinates=pelvis_tx axis=(1 0 0) LinearFunction(coefficients=1 0)
                TransformAxis translation2: coordinates=pelvis_ty axis=(0 1 0) LinearFunction(coefficients=1 0)
                TransformAxis translation3: coordinates=pelvis_tz axis=(0 0 1) LinearFunction(coefficients=1 0)
            CustomJoint hip_r: socket_parent_frame=pelvis_offset socket_child_frame=femur_r_offset
              Coordinate hip_flexion_r: default_value=0 range=(-0.5235988 2.094395) clamped=true
              Coordinate hip_adduction_r: default_value=0 range=(-0.8726646 0.5235988) clamped=true
              Coordinate hip_rotation_r: default_value=0 range=(-0.6981317 0.6981317) clamped=true
              PhysicalOffsetFrame pelvis_offset: socket_parent=/bodyset/pelvis
                  translation=(-0.05093428 -0.07764074 0.08866358)
              PhysicalOffsetFrame femur_r_offset: socket_parent=/bodyset/femur_r translation=(0 0 0)
              SpatialTransform: axes_held_at_zero=(translation1 translation2 translation3)
                TransformAxis rotation1: coordinates=hip_flexion_r axis=(0 0 1) LinearFunction(coefficients=1 0)
                TransformAxis rotation2: coordinates=hip_adduction_r axis=(1 0 0) LinearFunction(coefficients=1 0)
                TransformAxis rotation3: coordinates=hip_rotation_r axis=(0 1 0) LinearFunction(coefficients=1 0)
            CustomJoint knee_r: socket_parent_frame=femur_r_offset socket_child_frame=tibia_r_offset
              Coordinate knee_angle_r: default_value=0 range=(0 2.0944) clamped=true
              PhysicalOffsetFrame femur_r_offset: socket_parent=/bodyset/femur_r
                  translation=(-0.008660345 -0.4057448 -0.0031526) orientation=(-1.64157 1.44618 1.5708)
              PhysicalOffsetFrame tibia_r_offset: socket_parent=/bodyset/tibia_r
                  translation=(-0.007811017 -0.003554595 -0.001374157) orientation=(-1.64157 1.44618 1.5708)
              SpatialTransform: axes_held_at_zero=translation3
                TransformAxis rotation1: coordinates=knee_angle_r axis=(1 0 0) LinearFunction(coefficients=1 0)
                TransformAxis rotation2: coordinates=knee_angle_r axis=(0 0 1)
                  SimmSpline: x=(0 0.174533 0.349066 0.523599 0.698132 0.872665 1.0472 1.22173 1.39626 1.5708 1.74533 1.91986 2.0944)
                      y=(0 0.0126809 0.0226969 0.0296054 0.0332049 0.0335354 0.0308779 0.0257548 0.0189295 0.011407 0.00443314 -0.00050475 -0.0016782)
                TransformAxis rotation3: coordinates=knee_angle_r axis=(0 1 0)
                  SimmSpline: x=(0 0.174533 0.349066 0.523599 0.698132 0.872665 1.0472 1.22173 1.39626 1.5708 1.74533 1.91986 2.0944)
                      y=(0 0.059461 0.109399 0.150618 0.18392 0.210107 0.229983 0.24435 0.254012 0.25977 0.262428 0.262788 0.261654)
                TransformAxis translation1: coordinates=knee_angle_r axis=(0 1 0)
                  MultiplierFunction: scale=0.99457
                    SimmSpline: x=(0 0.174533 0.349066 0.523599 0.698132 0.872665 1.0472 1.22173 1.39626 1.5708 1.74533 1.91986 2.0944)
                        y=(0 0.000479 0.000835 0.001086 0.001251 0.001346 0.001391 0.001403 0.0014 0.0014 0.001421 0.001481 0.001599)
                TransformAxis translation2: coordinates=knee_angle_r axis=(0 0 1)
                  MultiplierFunction: scale=1.1464
                    SimmSpline: x=(0 0.174533 0.349066 0.523599 0.698132 0.872665 1.0472 1.22173 1.39626 1.5708 1.74533 1.91986 2.0944)
                        y=(0 0.000988 0.001899 0.002734 0.003492 0.004173 0.004777 0.005305 0.005756 0.00613 0.006427 0.006648 0.006792)
            CustomJoint patellofemoral_r: socket_parent_frame=femur_r_offset socket_child_frame=patella_r_offset
              Coordinate knee_angle_r_beta: default_value=0 range=(-99999.9 99999.9) clamped=false
              PhysicalOffsetFrame femur_r_offset: socket_parent=/bodyset/femur_r
                  translation=(-0.008660345 -0.4057448 -0.0031526)
              PhysicalOffsetFrame patella_r_offset: socket_parent=/bodyset/patella_r translation=(0 0 0)
              SpatialTransform: axes_held_at_zero=(rotation2 rotation3)
                TransformAxis rotation1: coordinates=knee_angle_r_beta axis=(0 0 1)
                  SimmSpline: x=(0 0.174533 0.349066 0.523599 0.698132 0.872665 1.0472 1.22173 1.39626 1.5708 1.74533 1.91986 2.0944)
                      y=(0.00113686 -0.00629212 -0.105582 -0.253683 -0.414245 -0.579047 -0.747244 -0.91799 -1.09044 -1.26379 -1.43763 -1.61186 -1.78634)
                TransformAxis translation1: coordinates=knee_angle_r_beta axis=(1 0 0)
                  MultiplierFunction: scale=1.0705
                    SimmSpline: x=(0 0.174533 0.349066 0.523599 0.698132 0.872665 1.0472 1.22173 1.39626 1.5708 1.74533 1.91986 2.0944)
                        y=(0.0524 0.0488 0.0437 0.0371 0.0296 0.0216 0.0136 0.0057 -0.0019 -0.0088 -0.0148 -0.0196 -0.0227)
                TransformAxis translation2: coordinates=knee_angle_r_beta axis=(0 1 0)
                  MultiplierFunction: scale=0.99457
                    SimmSpline: x=(0 0.174533 0.349066 0.523599 0.698132 0.872665 1.0472 1.22173 1.39626 1.5708 1.74533 1.91986 2.0944)
                        y=(-0.0108 -0.019 -0.0263 -0.0322 -0.0367 -0.0395 -0.0408 -0.0404 -0.0384 -0.0349 -0.0301 -0.0245 -0.0187)
                TransformAxis translation3: axis=(0 0 1) MultiplierFunction(scale=1.1464, Constant(value=0.00275))
            PinJoint ankle_r: socket_parent_frame=tibia_r_offset socket_child_frame=talus_r_offset
              Coordinate ankle_angle_r: default_value=0 range=(-0.6981317 0.5235988) clamped=true
              PhysicalOffsetFrame tibia_r_offset: socket_parent=/bodyset/tibia_r translation=(-0.0096557 -0.40224 0)
                  orientation=(0.175895 -0.105208 0.0186622)
              PhysicalOffsetFrame talus_r_offset: socket_parent=/bodyset/talus_r translation=(0 0 0)
                  orientation=(0.175895 -0.105208 0.0186622)
            PinJoint subtalar_r: socket_parent_frame=talus_r_offset socket_child_frame=calcn_r_offset
              Coordinate subtalar_angle_r: default_value=0 range=(-0.3490659 0.3490659) clamped=true
              PhysicalOffsetFrame talus_r_offset: socket_parent=/bodyset/talus_r
                  translation=(-0.03388695 -0.0291482 0.005503069) orientation=(-1.76819 0.906223 1.8196)
              PhysicalOffsetFrame calcn_r_offset: socket_parent=/bodyset/calcn_r translation=(0 0 0)
                  orientation=(-1.76819 0.906223 1.8196)
            PinJoint mtp_r: socket_parent_frame=calcn_r_offset socket_child_frame=toes_r_offset
              Coordinate mtp_angle_r: default_value=0 range=(-0.5235988 0.5235988) clamped=true
              PhysicalOffsetFrame calcn_r_offset: socket_parent=/bodyset/calcn_r
                  translation=(0.1242359 -0.001389664 0.0007504185)
              PhysicalOffsetFrame toes_r_offset: socket_parent=/bodyset/toes_r translation=(0 0 0)
            CustomJoint hip_l: socket_parent_frame=pelvis_offset socket_child_frame=femur_l_offset
              Coordinate hip_flexion_l: default_value=0 range=(-0.5235988 2.094395) clamped=true
              Coordinate hip_adduction_l: default_value=0 range=(-0.8726646 0.5235988) clamped=true
              Coordinate hip_rotation_l: default_value=0 range=(-0.6981317 0.6981317) clamped=true
              PhysicalOffsetFrame pelvis_offset: socket_parent=/bodyset/pelvis
                  translation=(-0.05093428 -0.07764074 -0.08866358)
              PhysicalOffsetFrame femur_l_offset: socket_parent=/bodyset/femur_l translation=(0 0 0)
              SpatialTransform: axes_held_at_zero=(translation1 translation2 translation3)
                TransformAxis rotation1: coordinates=hip_flexion_l axis=(0 0 1) LinearFunction(coefficients=1 0)
                TransformAxis rotation2: coordinates=hip_adduction_l axis=(1 0 0) LinearFunction(coefficients=-1 0)
                TransformAxis rotation3: coordinates=hip_rotation_l axis=(0 1 0) LinearFunction(coefficients=-1 0)
            CustomJoint knee_l: socket_parent_frame=femur_l_offset socket_child_frame=tibia_l_offset
              Coordinate knee_angle_l: default_value=0 range=(0 2.0944) clamped=true
              PhysicalOffsetFrame femur_l_offset: socket_parent=/bodyset/femur_l
                  translation=(-0.008660345 -0.4057448 0.0031526) orientation=(1.64157 -1.44618 1.5708)
              PhysicalOffsetFrame tibia_l_offset: socket_parent=/bodyset/tibia_l
                  translation=(-0.007811017 -0.003554595 0.001374157) orientation=(1.64157 -1.44618 1.5708)
              SpatialTransform: axes_held_at_zero=translation3
                TransformAxis rotation1: coordinates=knee_angle_l axis=(-1 0 0) LinearFunction(coefficients=1 0)
                TransformAxis rotation2: coordinates=knee_angle_l axis=(0 0 1)
                  SimmSpline: x=(0 0.174533 0.349066 0.523599 0.698132 0.872665 1.0472 1.22173 1.39626 1.5708 1.74533 1.91986 2.0944)
                      y=(0 0.0126809 0.0226969 0.0296054 0.0332049 0.0335354 0.0308779 0.0257548 0.0189295 0.011407 0.00443314 -0.00050475 -0.0016782)
                TransformAxis rotation3: coordinates=knee_angle_l axis=(0 1 0)
                  SimmSpline: x=(0 0.174533 0.349066 0.523599 0.698132 0.872665 1.0472 1.22173 1.39626 1.5708 1.74533 1.91986 2.0944)
                      y=(0 -0.059461 -0.109399 -0.150618 -0.18392 -0.210107 -0.229983 -0.24435 -0.254012 -0.25977 -0.262428 -0.262788 -0.261654)
                TransformAxis translation1: coordinates=knee_angle_l axis=(0 1 0)
                  MultiplierFunction: scale=0.99457
                    SimmSpline: x=(0 0.174533 0.349066 0.523599 0.698132 0.872665 1.0472 1.22173 1.39626 1.5708 1.74533 1.91986 2.0944)
                        y=(0 0.000479 0.000835 0.001086 0.001251 0.001346 0.001391 0.001403 0.0014 0.0014 0.001421 0.001481 0.001599)
                TransformAxis translation2: coordinates=knee_angle_l axis=(0 0 1)
                  MultiplierFunction: scale=1.1464
                    SimmSpline: x=(0 0.174533 0.349066 0.523599 0.698132 0.872665 1.0472 1.22173 1.39626 1.5708 1.74533 1.91986 2.0944)
                        y=(0 -0.000988 -0.001899 -0.002734 -0.003492 -0.004173 -0.004777 -0.005305 -0.005756 -0.00613 -0.006427 -0.006648 -0.006792)
            CustomJoint patellofemoral_l: socket_parent_frame=femur_l_offset socket_child_frame=patella_l_offset
              Coordinate knee_angle_l_beta: default_value=0 range=(-99999.9 99999.9) clamped=false
              PhysicalOffsetFrame femur_l_offset: socket_parent=/bodyset/femur_l
                  translation=(-0.008660345 -0.4057448 0.0031526)
              PhysicalOffsetFrame patella_l_offset: socket_parent=/bodyset/patella_l translation=(0 0 0)
              SpatialTransform: axes_held_at_zero=(rotation2 rotation3)
                TransformAxis rotation1: coordinates=knee_angle_l_beta axis=(0 0 1)
                  SimmSpline: x=(0 0.174533 0.349066 0.523599 0.698132 0.872665 1.0472 1.22173 1.39626 1.5708 1.74533 1.91986 2.0944)
                      y=(0.00113686 -0.00629212 -0.105582 -0.253683 -0.414245 -0.579047 -0.747244 -0.91799 -1.09044 -1.26379 -1.43763 -1.61186 -1.78634)
                TransformAxis translation1: coordinates=knee_angle_l_beta axis=(1 0 0)
                  MultiplierFunction: scale=1.0705
                    SimmSpline: x=(0 0.174533 0.349066 0.523599 0.698132 0.872665 1.0472 1.22173 1.39626 1.5708 1.74533 1.91986 2.0944)
                        y=(0.0524 0.0488 0.0437 0.0371 0.0296 0.0216 0.0136 0.0057 -0.0019 -0.0088 -0.0148 -0.0196 -0.0227)
                TransformAxis translation2: coordinates=knee_angle_l_beta axis=(0 1 0)
                  MultiplierFunction: scale=0.99457
                    SimmSpline: x=(0 0.174533 0.349066 0.523599 0.698132 0.872665 1.0472 1.22173 1.39626 1.5708 1.74533 1.91986 2.0944)
                        y=(-0.0108 -0.019 -0.0263 -0.0322 -0.0367 -0.0395 -0.0408 -0.0404 -0.0384 -0.0349 -0.0301 -0.0245 -0.0187)
                TransformAxis translation3: axis=(0 0 1) MultiplierFunction(scale=1.1464, Constant(value=-0.00275))
            PinJoint ankle_l: socket_parent_frame=tibia_l_offset socket_child_frame=talus_l_offset
              Coordinate ankle_angle_l: default_value=0 range=(-0.6981317 0.5235988) clamped=true
              PhysicalOffsetFrame tibia_l_offset: socket_parent=/bodyset/tibia_l translation=(-0.0096557 -0.40224 0)
                  orientation=(-0.175895 0.105208 0.0186622)
              PhysicalOffsetFrame talus_l_offset: socket_parent=/bodyset/talus_l translation=(0 0 0)
                  orientation=(-0.175895 0.105208 0.0186622)
            PinJoint subtalar_l: socket_parent_frame=talus_l_offset socket_child_frame=calcn_l_offset
              Coordinate subtalar_angle_l: default_value=0 range=(-0.3490659 0.3490659) clamped=true
              PhysicalOffsetFrame talus_l_offset: socket_parent=/bodyset/talus_l
                  translation=(-0.03388695 -0.0291482 -0.005503069) orientation=(1.76819 -0.906223 1.8196)
              PhysicalOffsetFrame calcn_l_offset: socket_parent=/bodyset/calcn_l translation=(0 0 0)
                  orientation=(1.76819 -0.906223 1.8196)
            PinJoint mtp_l: socket_parent_frame=calcn_l_offset socket_child_frame=toes_l_offset
              Coordinate mtp_angle_l: default_value=0 range=(-0.5235988 0.5235988) clamped=true
              PhysicalOffsetFrame calcn_l_offset: socket_parent=/bodyset/calcn_l
                  translation=(0.1242359 -0.001389664 -0.0007504185)
              PhysicalOffsetFrame toes_l_offset: socket_parent=/bodyset/toes_l translation=(0 0 0)
            CustomJoint lumbar: socket_parent_frame=pelvis_offset socket_child_frame=torso_offset
              Coordinate lumbar_ext: default_value=0 range=(-1.570796 1.570796) clamped=true
              Coordinate lumbar_bend: default_value=0 range=(-1.570796 1.570796) clamped=true
              Coordinate lumbar_rota: default_value=0 range=(-1.570796 1.570796) clamped=true
              PhysicalOffsetFrame pelvis_offset: socket_parent=/bodyset/pelvis translation=(-0.09114156 0.08061817 0)
              PhysicalOffsetFrame torso_offset: socket_parent=/bodyset/torso translation=(0 0 0)
              SpatialTransform: axes_held_at_zero=(translation1 translation2 translation3)
                TransformAxis rotation1: coordinates=lumbar_ext axis=(0 0 1) LinearFunction(coefficients=1 0)
                TransformAxis rotation2: coordinates=lumbar_bend axis=(1 0 0) LinearFunction(coefficients=1 0)
                TransformAxis rotation3: coordinates=lumbar_rota axis=(0 1 0) LinearFunction(coefficients=1 0)
          ConstraintSet:
            CoordinateCouplerConstraint patellofemoral_knee_angle_r_con: independent_coordinate_names=knee_angle_r
                dependent_coordinate_name=knee_angle_r_beta scale_factor=1
                coupled_coordinates_function=LinearFunction(coefficients=1 0)
            CoordinateCouplerConstraint patellofemoral_knee_angle_l_con: independent_coordinate_names=knee_angle_l
                dependent_coordinate_name=knee_angle_l_beta scale_factor=1
                coupled_coordinates_function=LinearFunction(coefficients=1 0)
          ForceSet:
            ExpressionBasedCoordinateForce SubtalarDamping_r: coordinate=subtalar_angle_r
                expression=-60.21*exp(16.32*(q-0.65))+60.21*exp(-16.32*(q+0.65))-0.1*qdot
            ExpressionBasedCoordinateForce SubtalarDamping_l: coordinate=subtalar_angle_l
                expression=-60.21*exp(16.32*(q-0.65))+60.21*exp(-16.32*(q+0.65))-0.1*qdot
            ExpressionBasedCoordinateForce PassiveHipDampingX_r: coordinate=hip_flexion_r
                expression=-2.44*exp(5.05*(q-1.81))+1.51*exp(-21.88*(q+0.47))-0.1*qdot
            ExpressionBasedCoordinateForce PassiveHipDampingY_r: coordinate=hip_adduction_r
                expression=-0.03*exp(14.94*(q-0.50))+0.03*exp(-14.94*(q+0.50))-0.1*qdot
            ExpressionBasedCoordinateForce PassiveHipDampingZ_r: coordinate=hip_rotation_r
                expression=-0.03*exp(14.94*(q-0.92))+0.03*exp(-14.94*(q+0.92))-0.1*qdot
            ExpressionBasedCoordinateForce PassiveHipDampingX_l: coordinate=hip_flexion_l
                expression=-2.44*exp(5.05*(q-1.81))+1.51*exp(-21.88*(q+0.47))-0.1*qdot
            ExpressionBasedCoordinateForce PassiveHipDampingY_l: coordinate=hip_adduction_l
                expression=-0.03*exp(14.94*(q-0.50))+0.03*exp(-14.94*(q+0.50))-0.1*qdot
            ExpressionBasedCoordinateForce PassiveHipDampingZ_l: coordinate=hip_rotation_l
                expression=-0.03*exp(14.94*(q-0.92))+0.03*exp(-14.94*(q+0.92))-0.1*qdot
            ExpressionBasedCoordinateForce PassiveKneeDamping_r: coordinate=knee_angle_r
                expression=6.09*exp(33.94*(-q-0.13))-11.03*exp(-11.33*(-q+2.40))-0.1*qdot
            ExpressionBasedCoordinateForce PassiveKneeDamping_l: coordinate=knee_angle_l
                expression=6.09*exp(33.94*(-q-0.13))-11.03*exp(-11.33*(-q+2.40))-0.1*qdot
            ExpressionBasedBushingForce PassiveAnkleBushing_r: socket_frame1=/bodyset/tibia_r
                socket_frame2=/bodyset/calcn_r
                Mx_expression=9.52095038*theta_x-29.57608094*theta_x^2+169.01588105*theta_x^3
                My_expression=3.61796125*theta_y-10.1612135*theta_y^2+64.5279144*theta_y^3
                Mz_expression=5.98187224*theta_z+15.74951827*theta_z^2+33.6780792*theta_z^3 Fx_expression=0
                Fy_expression=0 Fz_expression=0 rotational_damping=(2 2 2) translational_damping=(0 0 0)
                moment_visual_scale=1 force_visual_scale=1 visual_aspect_ratio=1
              PhysicalOffsetFrame tibia_r_offset_bushing: socket_parent=/bodyset/tibia_r
                  translation=(-0.0096557 -0.40224 0) orientation=(0.175895 -0.105208 0.0186622)
              PhysicalOffsetFrame calcn_r_offset_bushing: socket_parent=/bodyset/calcn_r
                  translation=(0.03388695 0.0291482 -0.005503069) orientation=(0.175895 -0.105208 0.0186622)
            ExpressionBasedBushingForce PassiveAnkleBushing_l: socket_frame1=/bodyset/tibia_l
                socket_frame2=/bodyset/calcn_l
                Mx_expression=9.52095038*theta_x+29.57608094*theta_x^2+169.01588105*theta_x^3
                My_expression=3.61796125*theta_y+10.1612135*theta_y^2+64.5279144*theta_y^3
                Mz_expression=5.98187224*theta_z+15.74951827*theta_z^2+33.6780792*theta_z^3 Fx_expression=0
                Fy_expression=0 Fz_expression=0 rotational_damping=(2 2 2) translational_damping=(0 0 0)
                moment_visual_scale=1 force_visual_scale=1 visual_aspect_ratio=1
              PhysicalOffsetFrame tibia_l_offset_bushing: socket_parent=/bodyset/tibia_l
                  translation=(-0.0096557 -0.40224 0) orientation=(-0.175895 0.105208 0.0186622)
              PhysicalOffsetFrame calcn_l_offset_bushing: socket_parent=/bodyset/calcn_l
                  translation=(0.03388695 0.0291482 0.005503069) orientation=(-0.175895 0.105208 0.0186622)
            ExpressionBasedCoordinateForce PassiveToeDamping_r: coordinate=mtp_angle_r expression=-25.0*q-2.0*qdot
            ExpressionBasedCoordinateForce PassiveToeDamping_l: coordinate=mtp_angle_l expression=-25.0*q-2.0*qdot
            SmoothSphereHalfSpaceForce [values shared by the 22 below unless stated]: socket_half_space=/contactgeometryset/floor
                stiffness=3067776 [N/m^2] dissipation=2 [s/m] static_friction=0.8 dynamic_friction=0.8
                viscous_friction=0.5 transition_velocity=0.2 [m/s] hertz_smoothing=300 hunt_crossley_smoothing=50
            SmoothSphereHalfSpaceForce SmoothSphereHalfSpaceForce_heel_r: socket_sphere=/contactgeometryset/heel_r
            SmoothSphereHalfSpaceForce SmoothSphereHalfSpaceForce_mh1_r: socket_sphere=/contactgeometryset/mh1_r
            SmoothSphereHalfSpaceForce SmoothSphereHalfSpaceForce_mh3_r: socket_sphere=/contactgeometryset/mh3_r
            SmoothSphereHalfSpaceForce SmoothSphereHalfSpaceForce_mh5_r: socket_sphere=/contactgeometryset/mh5_r
            SmoothSphereHalfSpaceForce SmoothSphereHalfSpaceForce_hallux_r: socket_sphere=/contactgeometryset/hallux_r
            SmoothSphereHalfSpaceForce SmoothSphereHalfSpaceForce_othertoes_r: socket_sphere=/contactgeometryset/othertoes_r
            SmoothSphereHalfSpaceForce SmoothSphereHalfSpaceForce_latheel_r: socket_sphere=/contactgeometryset/latheel_r
            SmoothSphereHalfSpaceForce SmoothSphereHalfSpaceForce_medheel_r: socket_sphere=/contactgeometryset/medheel_r
            SmoothSphereHalfSpaceForce SmoothSphereHalfSpaceForce_mid_r: socket_sphere=/contactgeometryset/mid_r
            SmoothSphereHalfSpaceForce SmoothSphereHalfSpaceForce_latmid_r: socket_sphere=/contactgeometryset/latmid_r
            SmoothSphereHalfSpaceForce SmoothSphereHalfSpaceForce_latmid_l: socket_sphere=/contactgeometryset/latmid_l
            SmoothSphereHalfSpaceForce SmoothSphereHalfSpaceForce_medmid_r: socket_sphere=/contactgeometryset/medmid_r
            SmoothSphereHalfSpaceForce SmoothSphereHalfSpaceForce_medmid_l: socket_sphere=/contactgeometryset/medmid_l
            SmoothSphereHalfSpaceForce SmoothSphereHalfSpaceForce_heel_l: socket_sphere=/contactgeometryset/heel_l
            SmoothSphereHalfSpaceForce SmoothSphereHalfSpaceForce_mh1_l: socket_sphere=/contactgeometryset/mh1_l
            SmoothSphereHalfSpaceForce SmoothSphereHalfSpaceForce_mh3_l: socket_sphere=/contactgeometryset/mh3_l
            SmoothSphereHalfSpaceForce SmoothSphereHalfSpaceForce_mh5_l: socket_sphere=/contactgeometryset/mh5_l
            SmoothSphereHalfSpaceForce SmoothSphereHalfSpaceForce_hallux_l: socket_sphere=/contactgeometryset/hallux_l
            SmoothSphereHalfSpaceForce SmoothSphereHalfSpaceForce_othertoes_l: socket_sphere=/contactgeometryset/othertoes_l
            SmoothSphereHalfSpaceForce SmoothSphereHalfSpaceForce_latheel_l: socket_sphere=/contactgeometryset/latheel_l
            SmoothSphereHalfSpaceForce SmoothSphereHalfSpaceForce_medheel_l: socket_sphere=/contactgeometryset/medheel_l
            SmoothSphereHalfSpaceForce SmoothSphereHalfSpaceForce_mid_l: socket_sphere=/contactgeometryset/mid_l
            SpringGeneralizedForce R_toe_spring: coordinate=mtp_angle_r stiffness=25 rest_length=0 viscosity=0.03
            SpringGeneralizedForce L_toe_spring: coordinate=mtp_angle_l stiffness=25 rest_length=0 viscosity=0.03
            CoordinateActuator res_pelvis_ty: min_control=-25 max_control=25 coordinate=pelvis_ty optimal_force=1
            CoordinateActuator res_pelvis_tilt: min_control=-50 max_control=50 coordinate=pelvis_tilt optimal_force=1
            CoordinateActuator res_pelvis_list: min_control=-50 max_control=50 coordinate=pelvis_list optimal_force=1
            CoordinateActuator res_pelvis_rotation: min_control=-50 max_control=50 coordinate=pelvis_rotation
                optimal_force=1
            ActivationCoordinateActuator tau_hip_flexion_r: min_control=-5 max_control=5 coordinate=hip_flexion_r
                optimal_force=750
            ActivationCoordinateActuator tau_hip_adduction_r: min_control=-5 max_control=5 coordinate=hip_adduction_r
                optimal_force=300
            ActivationCoordinateActuator tau_hip_rotation_r: min_control=-5 max_control=5 coordinate=hip_rotation_r
                optimal_force=150
            ActivationCoordinateActuator tau_knee_angle_r: min_control=-5 max_control=5 coordinate=knee_angle_r
                optimal_force=750
            ActivationCoordinateActuator tau_ankle_angle_r: min_control=-5 max_control=5 coordinate=ankle_angle_r
                optimal_force=750
            ActivationCoordinateActuator tau_hip_flexion_l: min_control=-5 max_control=5 coordinate=hip_flexion_l
                optimal_force=750
            ActivationCoordinateActuator tau_hip_adduction_l: min_control=-5 max_control=5 coordinate=hip_adduction_l
                optimal_force=300
            ActivationCoordinateActuator tau_hip_rotation_l: min_control=-5 max_control=5 coordinate=hip_rotation_l
                optimal_force=150
            ActivationCoordinateActuator tau_knee_angle_l: min_control=-5 max_control=5 coordinate=knee_angle_l
                optimal_force=750
            ActivationCoordinateActuator tau_ankle_angle_l: min_control=-5 max_control=5 coordinate=ankle_angle_l
                optimal_force=750
            ActivationCoordinateActuator tau_subtalar_angle_r: min_control=-5 max_control=5 coordinate=subtalar_angle_r
                optimal_force=15
            ActivationCoordinateActuator tau_subtalar_angle_l: min_control=-5 max_control=5 coordinate=subtalar_angle_l
                optimal_force=15
            ActivationCoordinateActuator tau_lumbar_bend: min_control=-10 max_control=10 coordinate=lumbar_bend
                optimal_force=200
            ActivationCoordinateActuator tau_lumbar_ext: min_control=-10 max_control=10 coordinate=lumbar_ext
                optimal_force=300
            ActivationCoordinateActuator tau_lumbar_rota: min_control=-10 max_control=10 coordinate=lumbar_rota
                optimal_force=100
            ObjectGroup right_leg
            ObjectGroup left_leg
            ObjectGroup hip_add_r
            ObjectGroup hip_abd_r
            ObjectGroup hip_flex_r
            ObjectGroup hip_ext_r
            ObjectGroup hip_inrot_r
            ObjectGroup hip_exrot_r
            ObjectGroup knee_flex_r
            ObjectGroup knee_ext_r
            ObjectGroup ankle_df_r
            ObjectGroup ankle_pf_r
            ObjectGroup everter_r
            ObjectGroup inverter_r
            ObjectGroup hip_add_l
            ObjectGroup hip_abd_l
            ObjectGroup hip_flex_l
            ObjectGroup hip_ext_l
            ObjectGroup hip_exrot_l
            ObjectGroup hip_inrot_l
            ObjectGroup knee_flex_l
            ObjectGroup knee_ext_l
            ObjectGroup ankle_df_l
            ObjectGroup ankle_pf_l
            ObjectGroup everter_l
            ObjectGroup inverter_l
          MarkerSet:
            Marker C7: torso (-0.07064923 0.4149164 -7.470327e-9) fixed=true
            Marker R_GTROC: femur_r (-0.02539654 -0.01705707 0.09601375) fixed=true
            Marker L_GTROC: femur_l (-0.02539654 -0.01705707 -0.09601375) fixed=true
            Marker R_LAT_FEM_EPI: femur_r (0.005897599 -0.4053957 0.05801713) fixed=true
            Marker L_LAT_FEM_EPI: femur_l (0.005897599 -0.4053957 -0.05801713) fixed=true
            Marker R_PSIS: pelvis (-0.1476726 0.03160366 0.04853592) fixed=true
            Marker L_PSIS: pelvis (-0.1395522 0.03269262 -0.05060721) fixed=true
            Marker R_ACROMION: torso (-0.06630054 0.3691545 0.1963595) fixed=true
            Marker L_ACROMION: torso (-0.06630056 0.3691544 -0.1963592) fixed=true
            Marker R_ASIS: pelvis (0.008632744 -0.001564378 0.1489344) fixed=true
            Marker L_ASIS: pelvis (0.008632741 -0.001564381 -0.1489346) fixed=true
            Marker R_MED_FEM_EPI: femur_r (0.005826507 -0.4094635 -0.06163929) fixed=true
            Marker R_MED_MAL: tibia_r (0.004983722 -0.3880661 -0.03739175) fixed=true
            Marker R_CALC: calcn_r (-0.01486712 0.007946584 -0.005718307) fixed=true
            Marker R_5TH: toes_r (-0.03076195 0.00289023 0.04387916) fixed=true
            Marker R_1ST: toes_r (0.00347416 0.006948319 -0.03752092) fixed=true
            Marker L_MED_FEM_EPI: femur_l (0.005826507 -0.4094635 0.06163929) fixed=true
            Marker L_LAT_MAL: tibia_l (-0.005878496 -0.4155682 -0.05281693) fixed=true
            Marker R_LAT_MAL: tibia_r (-0.007885907 -0.4145093 0.05169825) fixed=true
            Marker L_CALC: calcn_l (-0.0150322 0.01243249 0.004262585) fixed=true
            Marker L_1ST: toes_l (0.00347416 0.006948319 0.03765169) fixed=true
            Marker R_DORSAL: calcn_r (0.1355028 0.01673644 0.01658496) fixed=true
            Marker L_DORSAL: calcn_l (0.1440659 0.0193954 -0.00659052) fixed=true
            Marker L_5TH: toes_l (-0.03058138 0.005749713 -0.04380526) fixed=true
            Marker L_MED_MAL: tibia_l (0.0140055 -0.390025 0.03756741) fixed=true
            Marker heel_r: calcn_r (0.0009940782 -0.0081 0)
            Marker latheel_r: calcn_r (0.01619954 -0.0081 0.01900683)
            Marker medheel_r: calcn_r (0.01619954 -0.0081 -0.01900683)
            Marker mid_r: calcn_r (0.06352368 -0.0081 0.00425753)
            Marker latmid_r: calcn_r (0.05485657 -0.0081 0.02356847)
            Marker medmid_r: calcn_r (0.0696819 -0.0081 -0.01748628)
            Marker mh1_r: calcn_r (0.1383697 -0.0081 -0.01748628)
            Marker mh3_r: calcn_r (0.1260533 -0.0081 0.008819169)
            Marker mh5_r: calcn_r (0.1087191 -0.0081 0.02813011)
            Marker hallux_r: toes_r (0.04272735 -0.0081 -0.01376094)
            Marker othertoes_r: toes_r (0.03352805 -0.0081 0.01839861)
            Marker heel_l: calcn_l (0.0009940782 -0.0081 0)
            Marker latheel_l: calcn_l (0.01619954 -0.0081 -0.01900683)
            Marker medheel_l: calcn_l (0.01619954 -0.0081 0.01900683)
            Marker mid_l: calcn_l (0.06352368 -0.0081 -0.00425753)
            Marker latmid_l: calcn_l (0.05485657 -0.0081 -0.02356847)
            Marker medmid_l: calcn_l (0.0696819 -0.0081 0.01748628)
            Marker mh1_l: calcn_l (0.1383697 -0.0081 0.01748628)
            Marker mh3_l: calcn_l (0.1260533 -0.0081 -0.008819169)
            Marker mh5_l: calcn_l (0.1087191 -0.0081 -0.02813011)
            Marker hallux_l: toes_l (0.04272735 -0.0081 0.01376094)
            Marker othertoes_l: toes_l (0.03352805 -0.0081 -0.01839861)
          ContactGeometrySet:
            ContactHalfSpace floor: socket_frame=/ground location=(0 0 0) orientation=(0 0 -1.570796)
            ContactSphere heel_r: socket_frame=/bodyset/calcn_r location=(0.0009940782 -0.0081 0) radius=0.015
            ContactSphere latheel_r: socket_frame=/bodyset/calcn_r location=(0.01619954 -0.0081 0.01900683)
                radius=0.015
            ContactSphere medheel_r: socket_frame=/bodyset/calcn_r location=(0.01619954 -0.0081 -0.01900683)
                radius=0.015
            ContactSphere mid_r: socket_frame=/bodyset/calcn_r location=(0.06352368 -0.0081 0.00425753) radius=0.015
            ContactSphere latmid_r: socket_frame=/bodyset/calcn_r location=(0.05485657 -0.0081 0.02356847) radius=0.015
            ContactSphere medmid_r: socket_frame=/bodyset/calcn_r location=(0.0696819 -0.0081 -0.01748628) radius=0.015
            ContactSphere mh1_r: socket_frame=/bodyset/calcn_r location=(0.1383697 -0.0081 -0.01748628) radius=0.015
            ContactSphere mh3_r: socket_frame=/bodyset/calcn_r location=(0.1260533 -0.0081 0.008819169) radius=0.015
            ContactSphere mh5_r: socket_frame=/bodyset/calcn_r location=(0.1087191 -0.0081 0.02813011) radius=0.015
            ContactSphere hallux_r: socket_frame=/bodyset/toes_r location=(0.04272735 -0.0081 -0.01376094) radius=0.015
            ContactSphere othertoes_r: socket_frame=/bodyset/toes_r location=(0.03352805 -0.0081 0.01839861)
                radius=0.015
            ContactSphere heel_l: socket_frame=/bodyset/calcn_l location=(0.0009940782 -0.0081 0) radius=0.015
            ContactSphere latheel_l: socket_frame=/bodyset/calcn_l location=(0.01619954 -0.0081 -0.01900683)
                radius=0.015
            ContactSphere medheel_l: socket_frame=/bodyset/calcn_l location=(0.01619954 -0.0081 0.01900683)
                radius=0.015
            ContactSphere mid_l: socket_frame=/bodyset/calcn_l location=(0.06352368 -0.0081 -0.00425753) radius=0.015
            ContactSphere latmid_l: socket_frame=/bodyset/calcn_l location=(0.05485657 -0.0081 -0.02356847)
                radius=0.015
            ContactSphere medmid_l: socket_frame=/bodyset/calcn_l location=(0.0696819 -0.0081 0.01748628) radius=0.015
            ContactSphere mh1_l: socket_frame=/bodyset/calcn_l location=(0.1383697 -0.0081 0.01748628) radius=0.015
            ContactSphere mh3_l: socket_frame=/bodyset/calcn_l location=(0.1260533 -0.0081 -0.008819169) radius=0.015
            ContactSphere mh5_l: socket_frame=/bodyset/calcn_l location=(0.1087191 -0.0081 -0.02813011) radius=0.015
            ContactSphere hallux_l: socket_frame=/bodyset/toes_l location=(0.04272735 -0.0081 0.01376094) radius=0.015
            ContactSphere othertoes_l: socket_frame=/bodyset/toes_l location=(0.03352805 -0.0081 -0.01839861)
                radius=0.015
          ComponentSet:
            IMU torso_imu_offset_imu: socket_frame=/bodyset/torso/torso_imu_offset
            IMU pelvis_imu_offset_imu: socket_frame=/bodyset/pelvis/pelvis_imu_offset
            IMU femur_r_imu_offset_imu: socket_frame=/bodyset/femur_r/femur_r_imu_offset
            IMU tibia_r_imu_offset_imu: socket_frame=/bodyset/tibia_r/tibia_r_imu_offset
            IMU toes_r_imu_offset_imu: socket_frame=/bodyset/toes_r/toes_r_imu_offset
            IMU femur_l_imu_offset_imu: socket_frame=/bodyset/femur_l/femur_l_imu_offset
            IMU tibia_l_imu_offset_imu: socket_frame=/bodyset/tibia_l/tibia_l_imu_offset
            IMU toes_l_imu_offset_imu: socket_frame=/bodyset/toes_l/toes_l_imu_offset
      MocoInitialBounds time_initial_bounds: bounds=23.141
      MocoFinalBounds time_final_bounds: bounds=23.854
      state_infos:
        MocoVariableInfo /jointset/ground_pelvis/pelvis_tx/speed: bounds=(2.083333 5.555556)
        MocoVariableInfo /jointset/ground_pelvis/pelvis_tilt/value: bounds=(-0.4363323 0.4363323)
        MocoVariableInfo /jointset/ground_pelvis/pelvis_list/value: bounds=(-0.3490659 0.3490659)
        MocoVariableInfo /jointset/ground_pelvis/pelvis_rotation/value: bounds=(-0.3490659 0.3490659)
        MocoVariableInfo /jointset/ground_pelvis/pelvis_tx/value: bounds=(0 6) initial_bounds=0
        MocoVariableInfo /jointset/hip_l/hip_flexion_l/value: bounds=(-0.7853982 1.396263)
            initial_bounds=(-0.7853982 0.3490659)
        MocoVariableInfo /jointset/hip_l/hip_adduction_l/value: bounds=(-0.3490659 0.3490659)
            initial_bounds=(-0.1745329 0.1745329)
        MocoVariableInfo /jointset/hip_l/hip_rotation_l/value: bounds=(-0.4363323 0.4363323)
        MocoVariableInfo /jointset/hip_r/hip_flexion_r/value: bounds=(-0.7853982 1.396263) initial_bounds=(0 0.6108652)
        MocoVariableInfo /jointset/hip_r/hip_adduction_r/value: bounds=(-0.3490659 0.3490659)
            initial_bounds=(0 0.3490659)
        MocoVariableInfo /jointset/hip_r/hip_rotation_r/value: bounds=(-0.4363323 0.4363323)
            initial_bounds=(-0.1745329 0.1745329)
        MocoVariableInfo /jointset/knee_l/knee_angle_l/value: bounds=(-0.08726646 2.792527)
            initial_bounds=(0.6981317 2.70526)
        MocoVariableInfo /jointset/knee_r/knee_angle_r/value: bounds=(-0.08726646 2.70526)
            initial_bounds=(-0.08726646 0.6981317)
        MocoVariableInfo /jointset/ankle_l/ankle_angle_l/value: bounds=(-0.6981317 0.5235988)
            initial_bounds=(-0.5235988 0)
        MocoVariableInfo /jointset/ankle_r/ankle_angle_r/value: bounds=(-0.6981317 0.5235988)
            initial_bounds=(-0.3490659 0.3490659)
        MocoVariableInfo /jointset/subtalar_l/subtalar_angle_l/value: bounds=(-0.2094395 0.2094395)
            initial_bounds=(-0.1745329 0.1745329)
        MocoVariableInfo /jointset/subtalar_r/subtalar_angle_r/value: bounds=(-0.2094395 0.2094395)
            initial_bounds=(-0.1745329 0.1745329)
        MocoVariableInfo /jointset/mtp_l/mtp_angle_l/value: bounds=(-0.5235988 0.5235988)
            initial_bounds=(-0.1794652 0.1696007)
        MocoVariableInfo /jointset/mtp_r/mtp_angle_r/value: bounds=(-0.5235988 0.5235988)
            initial_bounds=(-0.1652882 0.09651123)
        MocoVariableInfo /jointset/lumbar/lumbar_ext/value: bounds=(-0.6981317 0.5235988) initial_bounds=(-0.6981317 0)
        MocoVariableInfo /jointset/lumbar/lumbar_bend/value: bounds=(-0.4363323 0.5235988)
            initial_bounds=(0.09477958 0.2693125)
        MocoVariableInfo /jointset/lumbar/lumbar_rota/value: bounds=(-0.5235988 0.5235988)
            initial_bounds=(-0.3593607 -0.1848277)
        MocoVariableInfo /jointset/ankle_l/ankle_angle_l/speed: bounds=(-87.26646 87.26646)
        MocoVariableInfo /jointset/ankle_r/ankle_angle_r/speed: bounds=(-87.26646 87.26646)
        MocoVariableInfo /jointset/ground_pelvis/pelvis_list/speed: bounds=(-87.26646 87.26646)
        MocoVariableInfo /jointset/ground_pelvis/pelvis_rotation/speed: bounds=(-87.26646 87.26646)
        MocoVariableInfo /jointset/ground_pelvis/pelvis_tilt/speed: bounds=(-34.90659 34.90659)
        MocoVariableInfo /jointset/hip_l/hip_adduction_l/speed: bounds=(-87.26646 87.26646)
        MocoVariableInfo /jointset/hip_l/hip_rotation_l/speed: bounds=(-87.26646 87.26646)
        MocoVariableInfo /jointset/hip_r/hip_adduction_r/speed: bounds=(-87.26646 87.26646)
        MocoVariableInfo /jointset/hip_r/hip_rotation_r/speed: bounds=(-87.26646 87.26646)
        MocoVariableInfo /jointset/lumbar/lumbar_bend/speed: bounds=(-87.26646 87.26646)
        MocoVariableInfo /jointset/lumbar/lumbar_rota/speed: bounds=(-87.26646 87.26646)
        MocoVariableInfo /jointset/lumbar/lumbar_ext/speed: bounds=(-87.26646 87.26646)
        MocoVariableInfo /jointset/ground_pelvis/pelvis_ty/value: bounds=(0.7986172 1.25)
            initial_bounds=(0.8886172 1.198617)
      goals:
        MocoStateTrackingGoal state_tracking: weight=0.5 allow_unused_references=true scale_weights_with_range=false
          TableProcessor reference
          MocoWeightSet state_weights:
            MocoWeight /jointset/ground_pelvis/pelvis_tilt/value: weight=0
            MocoWeight /jointset/ground_pelvis/pelvis_tilt/speed: weight=0
            MocoWeight /jointset/ground_pelvis/pelvis_list/value: weight=0
            MocoWeight /jointset/ground_pelvis/pelvis_list/speed: weight=0
            MocoWeight /jointset/ground_pelvis/pelvis_rotation/value: weight=0
            MocoWeight /jointset/ground_pelvis/pelvis_rotation/speed: weight=0
            MocoWeight /jointset/ground_pelvis/pelvis_tx/value: weight=0
            MocoWeight /jointset/ground_pelvis/pelvis_tx/speed: weight=0
            MocoWeight /jointset/ground_pelvis/pelvis_ty/value: weight=0
            MocoWeight /jointset/ground_pelvis/pelvis_ty/speed: weight=0
            MocoWeight /jointset/ground_pelvis/pelvis_tz/value: weight=0
            MocoWeight /jointset/ground_pelvis/pelvis_tz/speed: weight=0
            MocoWeight /jointset/hip_r/hip_flexion_r/value: weight=1
            MocoWeight /jointset/hip_r/hip_flexion_r/speed: weight=0.0001
            MocoWeight /jointset/hip_r/hip_adduction_r/value: weight=0
            MocoWeight /jointset/hip_r/hip_adduction_r/speed: weight=0
            MocoWeight /jointset/hip_r/hip_rotation_r/value: weight=0
            MocoWeight /jointset/hip_r/hip_rotation_r/speed: weight=0
            MocoWeight /jointset/knee_r/knee_angle_r/value: weight=1
            MocoWeight /jointset/knee_r/knee_angle_r/speed: weight=0.0001
            MocoWeight /jointset/patellofemoral_r/knee_angle_r_beta/value: weight=1
            MocoWeight /jointset/patellofemoral_r/knee_angle_r_beta/speed: weight=0.0001
            MocoWeight /jointset/ankle_r/ankle_angle_r/value: weight=0
            MocoWeight /jointset/ankle_r/ankle_angle_r/speed: weight=0
            MocoWeight /jointset/subtalar_r/subtalar_angle_r/value: weight=0
            MocoWeight /jointset/subtalar_r/subtalar_angle_r/speed: weight=0
            MocoWeight /jointset/mtp_r/mtp_angle_r/value: weight=0
            MocoWeight /jointset/mtp_r/mtp_angle_r/speed: weight=0
            MocoWeight /jointset/hip_l/hip_flexion_l/value: weight=1
            MocoWeight /jointset/hip_l/hip_flexion_l/speed: weight=0.0001
            MocoWeight /jointset/hip_l/hip_adduction_l/value: weight=0
            MocoWeight /jointset/hip_l/hip_adduction_l/speed: weight=0
            MocoWeight /jointset/hip_l/hip_rotation_l/value: weight=0
            MocoWeight /jointset/hip_l/hip_rotation_l/speed: weight=0
            MocoWeight /jointset/knee_l/knee_angle_l/value: weight=1
            MocoWeight /jointset/knee_l/knee_angle_l/speed: weight=0.0001
            MocoWeight /jointset/patellofemoral_l/knee_angle_l_beta/value: weight=1
            MocoWeight /jointset/patellofemoral_l/knee_angle_l_beta/speed: weight=0.0001
            MocoWeight /jointset/ankle_l/ankle_angle_l/value: weight=0
            MocoWeight /jointset/ankle_l/ankle_angle_l/speed: weight=0
            MocoWeight /jointset/subtalar_l/subtalar_angle_l/value: weight=0
            MocoWeight /jointset/subtalar_l/subtalar_angle_l/speed: weight=0
            MocoWeight /jointset/mtp_l/mtp_angle_l/value: weight=0
            MocoWeight /jointset/mtp_l/mtp_angle_l/speed: weight=0
            MocoWeight /jointset/lumbar/lumbar_ext/value: weight=0
            MocoWeight /jointset/lumbar/lumbar_ext/speed: weight=0
            MocoWeight /jointset/lumbar/lumbar_bend/value: weight=0
            MocoWeight /jointset/lumbar/lumbar_bend/speed: weight=0
            MocoWeight /jointset/lumbar/lumbar_rota/value: weight=0
            MocoWeight /jointset/lumbar/lumbar_rota/speed: weight=0
        MocoControlGoal control_effort: weight=0.05263158 exponent=3 divide_by_displacement=true
          MocoWeightSet control_weights:
            MocoWeight /forceset/res_pelvis_ty: weight=100
            MocoWeight /forceset/res_pelvis_tilt: weight=100
            MocoWeight /forceset/res_pelvis_list: weight=100
            MocoWeight /forceset/res_pelvis_rotation: weight=100
        MocoStateTrackingGoal track2: weight=0.5
          TableProcessor reference
          MocoWeightSet state_weights:
            MocoWeight /jointset/ground_pelvis/pelvis_tilt/speed: weight=0.0001
            MocoWeight /jointset/ground_pelvis/pelvis_list/speed: weight=0.0001
            MocoWeight /jointset/ground_pelvis/pelvis_rotation/speed: weight=0.0001
            MocoWeight /jointset/ground_pelvis/pelvis_tx/value: weight=0
            MocoWeight /jointset/ground_pelvis/pelvis_tx/speed: weight=0
            MocoWeight /jointset/ground_pelvis/pelvis_ty/value: weight=0
            MocoWeight /jointset/ground_pelvis/pelvis_ty/speed: weight=0
            MocoWeight /jointset/ground_pelvis/pelvis_tz/value: weight=0
            MocoWeight /jointset/ground_pelvis/pelvis_tz/speed: weight=0
            MocoWeight /jointset/hip_r/hip_flexion_r/speed: weight=0.0001
            MocoWeight /jointset/hip_r/hip_adduction_r/speed: weight=0.0001
            MocoWeight /jointset/hip_r/hip_rotation_r/speed: weight=0.0001
            MocoWeight /jointset/knee_r/knee_angle_r/speed: weight=0.0001
            MocoWeight /jointset/patellofemoral_r/knee_angle_r_beta/value: weight=0
            MocoWeight /jointset/patellofemoral_r/knee_angle_r_beta/speed: weight=0
            MocoWeight /jointset/ankle_r/ankle_angle_r/value: weight=10
            MocoWeight /jointset/ankle_r/ankle_angle_r/speed: weight=0.0001
            MocoWeight /jointset/subtalar_r/subtalar_angle_r/value: weight=0
            MocoWeight /jointset/subtalar_r/subtalar_angle_r/speed: weight=0.0001
            MocoWeight /jointset/mtp_r/mtp_angle_r/value: weight=0
            MocoWeight /jointset/mtp_r/mtp_angle_r/speed: weight=0.0001
            MocoWeight /jointset/hip_l/hip_flexion_l/speed: weight=0.0001
            MocoWeight /jointset/hip_l/hip_adduction_l/speed: weight=0.0001
            MocoWeight /jointset/hip_l/hip_rotation_l/speed: weight=0.0001
            MocoWeight /jointset/knee_l/knee_angle_l/speed: weight=0.0001
            MocoWeight /jointset/patellofemoral_l/knee_angle_l_beta/value: weight=0
            MocoWeight /jointset/patellofemoral_l/knee_angle_l_beta/speed: weight=0
            MocoWeight /jointset/ankle_l/ankle_angle_l/value: weight=10
            MocoWeight /jointset/ankle_l/ankle_angle_l/speed: weight=0.0001
            MocoWeight /jointset/subtalar_l/subtalar_angle_l/value: weight=0
            MocoWeight /jointset/subtalar_l/subtalar_angle_l/speed: weight=0.0001
            MocoWeight /jointset/mtp_l/mtp_angle_l/value: weight=0
            MocoWeight /jointset/mtp_l/mtp_angle_l/speed: weight=0.0001
            MocoWeight /jointset/lumbar/lumbar_ext/speed: weight=0.0001
            MocoWeight /jointset/lumbar/lumbar_bend/speed: weight=0.0001
            MocoWeight /jointset/lumbar/lumbar_rota/speed: weight=0.0001
        MocoPeriodicityGoal symmetryGoal: weight=0.001 mode=endpoint_constraint
          state_pairs:
            MocoPeriodicityGoalPair: initial_variable=/jointset/ground_pelvis/pelvis_tilt/value
                final_variable=/jointset/ground_pelvis/pelvis_tilt/value
            MocoPeriodicityGoalPair: initial_variable=/jointset/ground_pelvis/pelvis_tilt/speed
                final_variable=/jointset/ground_pelvis/pelvis_tilt/speed
            MocoPeriodicityGoalPair: initial_variable=/jointset/ground_pelvis/pelvis_list/value
                final_variable=/jointset/ground_pelvis/pelvis_list/value
            MocoPeriodicityGoalPair: initial_variable=/jointset/ground_pelvis/pelvis_list/speed
                final_variable=/jointset/ground_pelvis/pelvis_list/speed
            MocoPeriodicityGoalPair: initial_variable=/jointset/ground_pelvis/pelvis_rotation/value
                final_variable=/jointset/ground_pelvis/pelvis_rotation/value
            MocoPeriodicityGoalPair: initial_variable=/jointset/ground_pelvis/pelvis_rotation/speed
                final_variable=/jointset/ground_pelvis/pelvis_rotation/speed
            MocoPeriodicityGoalPair: initial_variable=/jointset/ground_pelvis/pelvis_tx/speed
                final_variable=/jointset/ground_pelvis/pelvis_tx/speed
            MocoPeriodicityGoalPair: initial_variable=/jointset/ground_pelvis/pelvis_ty/value
                final_variable=/jointset/ground_pelvis/pelvis_ty/value
            MocoPeriodicityGoalPair: initial_variable=/jointset/ground_pelvis/pelvis_ty/speed
                final_variable=/jointset/ground_pelvis/pelvis_ty/speed
            MocoPeriodicityGoalPair: initial_variable=/jointset/ground_pelvis/pelvis_tz/value
                final_variable=/jointset/ground_pelvis/pelvis_tz/value
            MocoPeriodicityGoalPair: initial_variable=/jointset/ground_pelvis/pelvis_tz/speed
                final_variable=/jointset/ground_pelvis/pelvis_tz/speed
            MocoPeriodicityGoalPair: initial_variable=/jointset/hip_r/hip_flexion_r/value
                final_variable=/jointset/hip_r/hip_flexion_r/value
            MocoPeriodicityGoalPair: initial_variable=/jointset/hip_r/hip_flexion_r/speed
                final_variable=/jointset/hip_r/hip_flexion_r/speed
            MocoPeriodicityGoalPair: initial_variable=/jointset/hip_r/hip_adduction_r/value
                final_variable=/jointset/hip_r/hip_adduction_r/value
            MocoPeriodicityGoalPair: initial_variable=/jointset/hip_r/hip_adduction_r/speed
                final_variable=/jointset/hip_r/hip_adduction_r/speed
            MocoPeriodicityGoalPair: initial_variable=/jointset/hip_r/hip_rotation_r/value
                final_variable=/jointset/hip_r/hip_rotation_r/value
            MocoPeriodicityGoalPair: initial_variable=/jointset/hip_r/hip_rotation_r/speed
                final_variable=/jointset/hip_r/hip_rotation_r/speed
            MocoPeriodicityGoalPair: initial_variable=/jointset/knee_r/knee_angle_r/value
                final_variable=/jointset/knee_r/knee_angle_r/value
            MocoPeriodicityGoalPair: initial_variable=/jointset/knee_r/knee_angle_r/speed
                final_variable=/jointset/knee_r/knee_angle_r/speed
            MocoPeriodicityGoalPair: initial_variable=/jointset/patellofemoral_r/knee_angle_r_beta/value
                final_variable=/jointset/patellofemoral_r/knee_angle_r_beta/value
            MocoPeriodicityGoalPair: initial_variable=/jointset/patellofemoral_r/knee_angle_r_beta/speed
                final_variable=/jointset/patellofemoral_r/knee_angle_r_beta/speed
            MocoPeriodicityGoalPair: initial_variable=/jointset/ankle_r/ankle_angle_r/value
                final_variable=/jointset/ankle_r/ankle_angle_r/value
            MocoPeriodicityGoalPair: initial_variable=/jointset/ankle_r/ankle_angle_r/speed
                final_variable=/jointset/ankle_r/ankle_angle_r/speed
            MocoPeriodicityGoalPair: initial_variable=/jointset/subtalar_r/subtalar_angle_r/value
                final_variable=/jointset/subtalar_r/subtalar_angle_r/value
            MocoPeriodicityGoalPair: initial_variable=/jointset/subtalar_r/subtalar_angle_r/speed
                final_variable=/jointset/subtalar_r/subtalar_angle_r/speed
            MocoPeriodicityGoalPair: initial_variable=/jointset/mtp_r/mtp_angle_r/value
                final_variable=/jointset/mtp_r/mtp_angle_r/value
            MocoPeriodicityGoalPair: initial_variable=/jointset/mtp_r/mtp_angle_r/speed
                final_variable=/jointset/mtp_r/mtp_angle_r/speed
            MocoPeriodicityGoalPair: initial_variable=/jointset/hip_l/hip_flexion_l/value
                final_variable=/jointset/hip_l/hip_flexion_l/value
            MocoPeriodicityGoalPair: initial_variable=/jointset/hip_l/hip_flexion_l/speed
                final_variable=/jointset/hip_l/hip_flexion_l/speed
            MocoPeriodicityGoalPair: initial_variable=/jointset/hip_l/hip_adduction_l/value
                final_variable=/jointset/hip_l/hip_adduction_l/value
            MocoPeriodicityGoalPair: initial_variable=/jointset/hip_l/hip_adduction_l/speed
                final_variable=/jointset/hip_l/hip_adduction_l/speed
            MocoPeriodicityGoalPair: initial_variable=/jointset/hip_l/hip_rotation_l/value
                final_variable=/jointset/hip_l/hip_rotation_l/value
            MocoPeriodicityGoalPair: initial_variable=/jointset/hip_l/hip_rotation_l/speed
                final_variable=/jointset/hip_l/hip_rotation_l/speed
            MocoPeriodicityGoalPair: initial_variable=/jointset/knee_l/knee_angle_l/value
                final_variable=/jointset/knee_l/knee_angle_l/value
            MocoPeriodicityGoalPair: initial_variable=/jointset/knee_l/knee_angle_l/speed
                final_variable=/jointset/knee_l/knee_angle_l/speed
            MocoPeriodicityGoalPair: initial_variable=/jointset/patellofemoral_l/knee_angle_l_beta/value
                final_variable=/jointset/patellofemoral_l/knee_angle_l_beta/value
            MocoPeriodicityGoalPair: initial_variable=/jointset/patellofemoral_l/knee_angle_l_beta/speed
                final_variable=/jointset/patellofemoral_l/knee_angle_l_beta/speed
            MocoPeriodicityGoalPair: initial_variable=/jointset/ankle_l/ankle_angle_l/value
                final_variable=/jointset/ankle_l/ankle_angle_l/value
            MocoPeriodicityGoalPair: initial_variable=/jointset/ankle_l/ankle_angle_l/speed
                final_variable=/jointset/ankle_l/ankle_angle_l/speed
            MocoPeriodicityGoalPair: initial_variable=/jointset/subtalar_l/subtalar_angle_l/value
                final_variable=/jointset/subtalar_l/subtalar_angle_l/value
            MocoPeriodicityGoalPair: initial_variable=/jointset/subtalar_l/subtalar_angle_l/speed
                final_variable=/jointset/subtalar_l/subtalar_angle_l/speed
            MocoPeriodicityGoalPair: initial_variable=/jointset/mtp_l/mtp_angle_l/value
                final_variable=/jointset/mtp_l/mtp_angle_l/value
            MocoPeriodicityGoalPair: initial_variable=/jointset/mtp_l/mtp_angle_l/speed
                final_variable=/jointset/mtp_l/mtp_angle_l/speed
            MocoPeriodicityGoalPair: initial_variable=/jointset/lumbar/lumbar_ext/value
                final_variable=/jointset/lumbar/lumbar_ext/value
            MocoPeriodicityGoalPair: initial_variable=/jointset/lumbar/lumbar_ext/speed
                final_variable=/jointset/lumbar/lumbar_ext/speed
            MocoPeriodicityGoalPair: initial_variable=/jointset/lumbar/lumbar_bend/value
                final_variable=/jointset/lumbar/lumbar_bend/value
            MocoPeriodicityGoalPair: initial_variable=/jointset/lumbar/lumbar_bend/speed
                final_variable=/jointset/lumbar/lumbar_bend/speed
            MocoPeriodicityGoalPair: initial_variable=/jointset/lumbar/lumbar_rota/value
                final_variable=/jointset/lumbar/lumbar_rota/value
            MocoPeriodicityGoalPair: initial_variable=/jointset/lumbar/lumbar_rota/speed
                final_variable=/jointset/lumbar/lumbar_rota/speed
            MocoPeriodicityGoalPair: initial_variable=/forceset/tau_hip_flexion_r/activation
                final_variable=/forceset/tau_hip_flexion_r/activation
            MocoPeriodicityGoalPair: initial_variable=/forceset/tau_hip_adduction_r/activation
                final_variable=/forceset/tau_hip_adduction_r/activation
            MocoPeriodicityGoalPair: initial_variable=/forceset/tau_hip_rotation_r/activation
                final_variable=/forceset/tau_hip_rotation_r/activation
            MocoPeriodicityGoalPair: initial_variable=/forceset/tau_knee_angle_r/activation
                final_variable=/forceset/tau_knee_angle_r/activation
            MocoPeriodicityGoalPair: initial_variable=/forceset/tau_ankle_angle_r/activation
                final_variable=/forceset/tau_ankle_angle_r/activation
            MocoPeriodicityGoalPair: initial_variable=/forceset/tau_hip_flexion_l/activation
                final_variable=/forceset/tau_hip_flexion_l/activation
            MocoPeriodicityGoalPair: initial_variable=/forceset/tau_hip_adduction_l/activation
                final_variable=/forceset/tau_hip_adduction_l/activation
            MocoPeriodicityGoalPair: initial_variable=/forceset/tau_hip_rotation_l/activation
                final_variable=/forceset/tau_hip_rotation_l/activation
            MocoPeriodicityGoalPair: initial_variable=/forceset/tau_knee_angle_l/activation
                final_variable=/forceset/tau_knee_angle_l/activation
            MocoPeriodicityGoalPair: initial_variable=/forceset/tau_ankle_angle_l/activation
                final_variable=/forceset/tau_ankle_angle_l/activation
            MocoPeriodicityGoalPair: initial_variable=/forceset/tau_subtalar_angle_r/activation
                final_variable=/forceset/tau_subtalar_angle_r/activation
            MocoPeriodicityGoalPair: initial_variable=/forceset/tau_subtalar_angle_l/activation
                final_variable=/forceset/tau_subtalar_angle_l/activation
            MocoPeriodicityGoalPair: initial_variable=/forceset/tau_lumbar_bend/activation
                final_variable=/forceset/tau_lumbar_bend/activation
            MocoPeriodicityGoalPair: initial_variable=/forceset/tau_lumbar_ext/activation
                final_variable=/forceset/tau_lumbar_ext/activation
            MocoPeriodicityGoalPair: initial_variable=/forceset/tau_lumbar_rota/activation
                final_variable=/forceset/tau_lumbar_rota/activation
          control_pairs:
            MocoPeriodicityGoalPair: initial_variable=/forceset/tau_lumbar_ext final_variable=/forceset/tau_lumbar_ext
            MocoPeriodicityGoalPair: initial_variable=/forceset/tau_lumbar_bend
                final_variable=/forceset/tau_lumbar_bend
            MocoPeriodicityGoalPair: initial_variable=/forceset/tau_subtalar_angle_l
                final_variable=/forceset/tau_subtalar_angle_l
            MocoPeriodicityGoalPair: initial_variable=/forceset/tau_knee_angle_r
                final_variable=/forceset/tau_knee_angle_r
            MocoPeriodicityGoalPair: initial_variable=/forceset/tau_ankle_angle_r
                final_variable=/forceset/tau_ankle_angle_r
            MocoPeriodicityGoalPair: initial_variable=/forceset/tau_knee_angle_l
                final_variable=/forceset/tau_knee_angle_l
            MocoPeriodicityGoalPair: initial_variable=/forceset/tau_lumbar_rota
                final_variable=/forceset/tau_lumbar_rota
            MocoPeriodicityGoalPair: initial_variable=/forceset/tau_ankle_angle_l
                final_variable=/forceset/tau_ankle_angle_l
            MocoPeriodicityGoalPair: initial_variable=/forceset/tau_hip_flexion_r
                final_variable=/forceset/tau_hip_flexion_r
            MocoPeriodicityGoalPair: initial_variable=/forceset/tau_hip_adduction_r
                final_variable=/forceset/tau_hip_adduction_r
            MocoPeriodicityGoalPair: initial_variable=/forceset/tau_hip_rotation_r
                final_variable=/forceset/tau_hip_rotation_r
            MocoPeriodicityGoalPair: initial_variable=/forceset/tau_subtalar_angle_r
                final_variable=/forceset/tau_subtalar_angle_r
            MocoPeriodicityGoalPair: initial_variable=/forceset/tau_hip_flexion_l
                final_variable=/forceset/tau_hip_flexion_l
            MocoPeriodicityGoalPair: initial_variable=/forceset/tau_hip_rotation_l
                final_variable=/forceset/tau_hip_rotation_l
            MocoPeriodicityGoalPair: initial_variable=/forceset/tau_hip_adduction_l
                final_variable=/forceset/tau_hip_adduction_l
        MocoAccelerationTrackingGoal acceleration_tracking: weight=0.00025
            frame_paths=(/bodyset/torso/torso_imu_offset /bodyset/pelvis/pelvis_imu_offset /bodyset/femur_r/femur_r_imu_offset /bodyset/tibia_r/tibia_r_imu_offset /bodyset/toes_r/toes_r_imu_offset /bodyset/femur_l/femur_l_imu_offset /bodyset/tibia_l/tibia_l_imu_offset /bodyset/toes_l/toes_l_imu_offset)
            gravity_offset=true express_accelerations_in_tracking_frames=true
          MocoWeightSet acceleration_weights:
            MocoWeight /bodyset/torso/torso_imu_offset: weight=7.54347
            MocoWeight /bodyset/pelvis/pelvis_imu_offset: weight=76.39864
            MocoWeight /bodyset/femur_r/femur_r_imu_offset: weight=9.266798
            MocoWeight /bodyset/tibia_r/tibia_r_imu_offset: weight=11.63949
            MocoWeight /bodyset/toes_r/toes_r_imu_offset: weight=0.5732473
            MocoWeight /bodyset/femur_l/femur_l_imu_offset: weight=9.266798
            MocoWeight /bodyset/tibia_l/tibia_l_imu_offset: weight=11.63949
            MocoWeight /bodyset/toes_l/toes_l_imu_offset: weight=0.5732473
        MocoAngularVelocityTrackingGoal AngularVelocity_tracking: weight=0.00125
            frame_paths=(/bodyset/torso/torso_imu_offset /bodyset/pelvis/pelvis_imu_offset /bodyset/femur_r/femur_r_imu_offset /bodyset/tibia_r/tibia_r_imu_offset /bodyset/toes_r/toes_r_imu_offset /bodyset/femur_l/femur_l_imu_offset /bodyset/tibia_l/tibia_l_imu_offset /bodyset/toes_l/toes_l_imu_offset)
          TableProcessor states_reference
          MocoWeightSet angular_velocity_weights:
            MocoWeight /bodyset/torso/torso_imu_offset: weight=1.467596
            MocoWeight /bodyset/pelvis/pelvis_imu_offset: weight=3.084825
            MocoWeight /bodyset/femur_r/femur_r_imu_offset: weight=11.5326
            MocoWeight /bodyset/tibia_r/tibia_r_imu_offset: weight=5.773988
            MocoWeight /bodyset/toes_r/toes_r_imu_offset: weight=1.053624
            MocoWeight /bodyset/femur_l/femur_l_imu_offset: weight=11.5326
            MocoWeight /bodyset/tibia_l/tibia_l_imu_offset: weight=5.773988
            MocoWeight /bodyset/toes_l/toes_l_imu_offset: weight=1.053624
        MocoOrientationTrackingGoal IMU_Orientation_tracking: weight=0.375
            frame_paths=(/bodyset/torso/torso_imu_offset /bodyset/pelvis/pelvis_imu_offset /bodyset/femur_r/femur_r_imu_offset /bodyset/tibia_r/tibia_r_imu_offset /bodyset/toes_r/toes_r_imu_offset /bodyset/femur_l/femur_l_imu_offset /bodyset/tibia_l/tibia_l_imu_offset /bodyset/toes_l/toes_l_imu_offset)
          TableProcessor states_reference
          MocoWeightSet rotation_weights:
            MocoWeight /bodyset/torso/torso_imu_offset: weight=50.35137
            MocoWeight /bodyset/pelvis/pelvis_imu_offset: weight=26.96312
            MocoWeight /bodyset/femur_r/femur_r_imu_offset: weight=14.49981
            MocoWeight /bodyset/tibia_r/tibia_r_imu_offset: weight=14.74587
            MocoWeight /bodyset/toes_r/toes_r_imu_offset: weight=0
            MocoWeight /bodyset/femur_l/femur_l_imu_offset: weight=14.49981
            MocoWeight /bodyset/tibia_l/tibia_l_imu_offset: weight=14.74587
            MocoWeight /bodyset/toes_l/toes_l_imu_offset: weight=0
        MocoContactTrackingGoal contactGoalVert: weight=1000 external_loads_file=refGRF_edit_S4.xml projection=vector
            projection_vector=(0 1 0) normalize_tracking_error=true
          contact_groups:
            MocoContactTrackingGoalGroup: contact_force_paths=(forceset/SmoothSphereHalfSpaceForce_mh1_r forceset/SmoothSphereHalfSpaceForce_mh3_r forceset/SmoothSphereHalfSpaceForce_mh5_r forceset/SmoothSphereHalfSpaceForce_heel_r forceset/SmoothSphereHalfSpaceForce_hallux_r forceset/SmoothSphereHalfSpaceForce_othertoes_r forceset/SmoothSphereHalfSpaceForce_latheel_r forceset/SmoothSphereHalfSpaceForce_medheel_r forceset/SmoothSphereHalfSpaceForce_mid_r forceset/SmoothSphereHalfSpaceForce_latmid_r forceset/SmoothSphereHalfSpaceForce_medmid_r)
                external_force_name=RightGRF alternative_frame_paths=/bodyset/toes_r
            MocoContactTrackingGoalGroup: contact_force_paths=(forceset/SmoothSphereHalfSpaceForce_mh1_l forceset/SmoothSphereHalfSpaceForce_mh3_l forceset/SmoothSphereHalfSpaceForce_mh5_l forceset/SmoothSphereHalfSpaceForce_heel_l forceset/SmoothSphereHalfSpaceForce_hallux_l forceset/SmoothSphereHalfSpaceForce_othertoes_l forceset/SmoothSphereHalfSpaceForce_latheel_l forceset/SmoothSphereHalfSpaceForce_medheel_l forceset/SmoothSphereHalfSpaceForce_mid_l forceset/SmoothSphereHalfSpaceForce_latmid_l forceset/SmoothSphereHalfSpaceForce_medmid_l)
                external_force_name=LeftGRF alternative_frame_paths=/bodyset/toes_l
        MocoContactTrackingGoal contactGoalHor: weight=1000 external_loads_file=refGRF_edit_S4.xml projection=vector
            projection_vector=(1 0 0) normalize_tracking_error=true
          contact_groups:
            MocoContactTrackingGoalGroup: contact_force_paths=(forceset/SmoothSphereHalfSpaceForce_mh1_r forceset/SmoothSphereHalfSpaceForce_mh3_r forceset/SmoothSphereHalfSpaceForce_mh5_r forceset/SmoothSphereHalfSpaceForce_heel_r forceset/SmoothSphereHalfSpaceForce_hallux_r forceset/SmoothSphereHalfSpaceForce_othertoes_r forceset/SmoothSphereHalfSpaceForce_latheel_r forceset/SmoothSphereHalfSpaceForce_medheel_r forceset/SmoothSphereHalfSpaceForce_mid_r forceset/SmoothSphereHalfSpaceForce_latmid_r forceset/SmoothSphereHalfSpaceForce_medmid_r)
                external_force_name=RightGRF alternative_frame_paths=/bodyset/toes_r
            MocoContactTrackingGoalGroup: contact_force_paths=(forceset/SmoothSphereHalfSpaceForce_mh1_l forceset/SmoothSphereHalfSpaceForce_mh3_l forceset/SmoothSphereHalfSpaceForce_mh5_l forceset/SmoothSphereHalfSpaceForce_heel_l forceset/SmoothSphereHalfSpaceForce_hallux_l forceset/SmoothSphereHalfSpaceForce_othertoes_l forceset/SmoothSphereHalfSpaceForce_latheel_l forceset/SmoothSphereHalfSpaceForce_medheel_l forceset/SmoothSphereHalfSpaceForce_mid_l forceset/SmoothSphereHalfSpaceForce_latmid_l forceset/SmoothSphereHalfSpaceForce_medmid_l)
                external_force_name=LeftGRF alternative_frame_paths=/bodyset/toes_l
  MocoCasADiSolver solver:
    num_mesh_intervals: 200
    verbosity: 2
    multibody_dynamics_mode: explicit
    optim_max_iterations: 7000
    optim_convergence_tolerance: 0.001
    optim_constraint_tolerance: 0.005
    optim_ipopt_print_level: 5
    guess_file: RE_Pre_11TP_1_timepoint1_S42610_guess2.sto
    optim_finite_difference_scheme: forward
    parallel: 1
