# OpenSim document version 40500
Model SEModel:
  gravity: 0 -9.80665 0
  length_units: meters
  force_units: N
  credits:
    Rajagopal et al. (2016), Lai et al. (2017), Uhlrich et al. (2022) Notes: P. van den Bos changed the fiber-damping from 0.01 to default of 0.1 as suggested in M. Millard (2013) "Flexing Computational Muscle: Modeling and Simulation of Musculotendon Dynamics".
  publications:
    Rajagopal, A., Dembia, C.L., DeMers, M.S., Delp, D.D., Hicks, J.L., Delp, S.L. (2016) Full-body musculoskeletal model for muscle-driven simulation of human gait. IEEE Transactions on Biomedical Engineering.
  Ground
  BodySet:
    Body pelvis: mass=9.642672 [kg] mass_center=(-0.06163202 0 0) inertia=(0.09904296 0.09904296 0.03956802 0 0 0)
        meshes=(r_pelvis.vtp l_pelvis.vtp sacrum.vtp)
      WrapCylinder Gmax1_at_pelvis_r: xyz_body_rotation=(-0.6 0.45 0) translation=(-0.06712398 -0.09478755 0.0698389)
          quadrant=-x radius=0.0387536 length=0.1576573
      WrapCylinder Gmax2_at_pelvis_r: xyz_body_rotation=(-0.75 0.39 0) translation=(-0.0697392 -0.07946835 0.0778532)
          quadrant=all radius=0.03900869 length=0.1036597
      WrapCylinder Gmax3_at_pelvis_r: xyz_body_rotation=(-0.1 0 0) translation=(-0.07235442 -0.0842556 0.0778532)
          quadrant=all radius=0.03662478 length=0.1143183
      WrapCylinder Gmax1_at_pelvis_l: xyz_body_rotation=(0.6 -0.45 0) translation=(-0.06712398 -0.09478755 -0.0698389)
          quadrant=-x radius=0.0387536 length=0.1576573
      WrapCylinder Gmax2_at_pelvis_l: xyz_body_rotation=(0.75 -0.39 0) translation=(-0.0697392 -0.07946835 -0.0778532)
          quadrant=all radius=0.03900869 length=0.1036597
      WrapCylinder Gmax3_at_pelvis_l: xyz_body_rotation=(0.1 0 0) translation=(-0.07235442 -0.0842556 -0.0778532)
          quadrant=all radius=0.03662478 length=0.1143183
      WrapCylinder PS_at_brim_r: xyz_body_rotation=(-0.25 -0.27 0.1) translation=(-0.06450876 -0.057447 0.07510544)
          quadrant=-y radius=0.04656945 length=0.1117676
      WrapCylinder PS_at_brim_l: xyz_body_rotation=(0.25 0.27 0.1) translation=(-0.06450876 -0.057447 -0.07510544)
          quadrant=-y radius=0.04656945 length=0.1117676
      WrapCylinder IL_at_brim_r: xyz_body_rotation=(-0.32 -0.24 0.9) translation=(-0.06189354 -0.06223425 0.08655444)
          quadrant=-y radius=0.05127377 length=0.1114845
      WrapCylinder IL_at_brim_l: xyz_body_rotation=(0.32 0.24 0.9) translation=(-0.06189354 -0.06223425 -0.08655444)
          quadrant=-y radius=0.05127377 length=0.1114845
    Body femur_r: mass=7.615721 mass_center=(0 -0.1617873 0) inertia=(0.1025233 0.03248274 0.1025233 0 0 0)
        meshes=r_femur.vtp
      WrapCylinder GasLat_at_condyles_r: translation=(0.005132 -0.3901929 0) quadrant=all radius=0.02571517
          length=0.11012
      WrapCylinder GasMed_at_condyles_r: translation=(0.005132 -0.3901929 0) quadrant=all radius=0.02472613
          length=0.11012
      WrapCylinder KnExt_at_fem_r: xyz_body_rotation=(-0.0623366 0.0507601 0)
          translation=(0.003683011 -0.383276 0.00230273) quadrant=all radius=0.02473642 length=0.1100474
      WrapCylinder KnExtVL_at_fem_r: xyz_body_rotation=(-0.0623366 0.0507601 0)
          translation=(0.001938131 -0.383276 0.00230273) quadrant=all radius=0.02473642 length=0.1100474
      WrapCylinder AB_at_femshaft_r: xyz_body_rotation=(1.66157 0.186644 0)
          translation=(0.01502999 -0.1071555 0.02572954) quadrant=all radius=0.01752312 length=0.06689443
      WrapCylinder AL_at_femshaft_r: xyz_body_rotation=(1.77711 0.136489 0)
          translation=(0.03154404 -0.2207055 0.01664321) quadrant=all radius=0.02131121 length=0.09597352
      WrapCylinder AMprox_at_femshaft_r: xyz_body_rotation=(1.61126 0.18656 0)
          translation=(0.005319821 -0.06937325 0.02797378) quadrant=all radius=0.0224177 length=0.0668228
      WrapCylinder AMmid_at_femshaft_r: xyz_body_rotation=(1.61139 0.13656 0)
          translation=(0.02362003 -0.1529471 0.02266732) quadrant=all radius=0.02274863 length=0.1144066
      WrapCylinder AMdist_at_femshaft_r: xyz_body_rotation=(1.71188 0.186636 0)
          translation=(0.03244091 -0.2481398 0.0103123) quadrant=all radius=0.02313483 length=0.1914849
      WrapCylinder AMisch_at_condyles_r: xyz_body_rotation=(1.71115 -0.463363 0)
          translation=(-0.02324909 -0.3586263 -0.003473592) quadrant=all radius=0.04221956 length=0.232694
      WrapCylinder PECT_at_femshaft_r: xyz_body_rotation=(1.81295 0.276344 0)
          translation=(0.006246393 -0.08042056 0.03352108) quadrant=all radius=0.0158612 length=0.04829726
    Body tibia_r: mass=3.035595 mass_center=(0 -0.1780427 0) inertia=(0.03729437 0.003330597 0.03729437 0 0 0)
        meshes=(r_tibia.vtp r_fibula.vtp)
      WrapCylinder GasLat_at_shank_r: xyz_body_rotation=(2.96723 -0.279725 -1.47812)
          translation=(-0.006759308 -0.07056862 -0.002881593) quadrant=-y radius=0.05120378 length=0.08786673
      WrapCylinder GasMed_at_shank_r: xyz_body_rotation=(2.96723 0.0279725 -1.47812)
          translation=(-0.006759308 -0.07056862 -0.002881593) quadrant=-y radius=0.05500896 length=0.08757682
      WrapCylinder GR_at_condyles_r: xyz_body_rotation=(0 -0.4 0) translation=(-0.00274026 -0.0190726 0) quadrant=all
          radius=0.0334992 length=0.0879426
      WrapCylinder SM_at_condyles_r: xyz_body_rotation=(0 -0.1 0) translation=(-0.00091342 -0.0190726 0) quadrant=all
          radius=0.03219985 length=0.08736199
      WrapCylinder ST_at_condyles_r: xyz_body_rotation=(0 -0.2 0) translation=(-0.00182684 -0.01954942 0) quadrant=all
          radius=0.0396418 length=0.08748321
      WrapCylinder BF_at_gastroc_r: translation=(-0.03562338 -0.0572178 0) quadrant=y radius=0.02707222
          length=0.1309815
    Body patella_r: mass=0.0705781 mass_center=(0.0018 0.0264 0) inertia=(2.349874e-6 1.073409e-5 1.073409e-5 0 0 0)
        meshes=r_patella.vtp
    Body talus_r: mass=0.08187715 mass_center=(0 0 0) inertia=(0.0004401299 0.0004401299 0.0004401299 0 0 0)
        meshes=r_talus.vtp
    Body calcn_r: mass=1.023464 mass_center=(0.07331774 0.02199532 0)
        inertia=(0.0006161819 0.001716507 0.001804533 0 0 0) meshes=r_foot.vtp
    Body toes_r: mass=0.1773459 mass_center=(0.02536794 0.004399065 -0.01283061)
        inertia=(4.401299e-5 8.802598e-5 0.0004401299 0 0 0) meshes=r_bofoot.vtp
    Body femur_l: mass=7.615721 mass_center=(0 -0.1617873 0) inertia=(0.1025233 0.03248274 0.1025233 0 0 0)
        meshes=l_femur.vtp
      WrapCylinder GasLat_at_condyles_l: translation=(0.005132 -0.3901929 0) quadrant=all radius=0.02571517
          length=0.11012
      WrapCylinder GasMed_at_condyles_l: translation=(0.005132 -0.3901929 0) quadrant=all radius=0.02472613
          length=0.11012
      WrapCylinder KnExt_at_fem_l: xyz_body_rotation=(0.0623366 -0.0507601 0)
          translation=(0.003683011 -0.383276 -0.00230273) quadrant=all radius=0.02473642 length=0.1100474
      WrapCylinder KnExtVL_at_fem_l: xyz_body_rotation=(0.0623366 -0.0507601 0)
          translation=(0.001938131 -0.383276 -0.00230273) quadrant=all radius=0.02473642 length=0.1100474
      WrapCylinder AB_at_femshaft_l: xyz_body_rotation=(-1.66157 -0.186644 0)
          translation=(0.01502999 -0.1071555 -0.02572954) quadrant=all radius=0.01752312 length=0.06689443
      WrapCylinder AL_at_femshaft_l: xyz_body_rotation=(-1.77711 -0.136489 0)
          translation=(0.03154404 -0.2207055 -0.01664321) quadrant=all radius=0.02131121 length=0.09597352
      WrapCylinder AMprox_at_femshaft_l: xyz_body_rotation=(-1.61126 -0.18656 0)
          translation=(0.005319821 -0.06937325 -0.02797378) quadrant=all radius=0.0224177 length=0.0668228
      WrapCylinder AMmid_at_femshaft_l: xyz_body_rotation=(-1.61139 -0.13656 0)
          translation=(0.02362003 -0.1529471 -0.02266732) quadrant=all radius=0.02274863 length=0.1144066
      WrapCylinder AMdist_at_femshaft_l: xyz_body_rotation=(-1.71188 -0.186636 0)
          translation=(0.03244091 -0.2481398 -0.0103123) quadrant=all radius=0.02313483 length=0.1914849
      WrapCylinder AMisch_at_condyles_l: xyz_body_rotation=(-1.71115 0.463363 0)
          translation=(-0.02324909 -0.3586263 0.003473592) quadrant=all radius=0.04221956 length=0.232694
      WrapCylinder PECT_at_femshaft_l: xyz_body_rotation=(-1.81295 -0.276344 0)
          translation=(0.006246393 -0.08042056 -0.03352108) quadrant=all radius=0.0158612 length=0.04829726
    Body tibia_l: mass=3.035595 mass_center=(0 -0.1780427 0) inertia=(0.03729437 0.003330597 0.03729437 0 0 0)
        meshes=(l_tibia.vtp l_fibula.vtp)
      WrapCylinder GasLat_at_shank_l: xyz_body_rotation=(-2.96723 0.279725 -1.47812)
          translation=(-0.006759308 -0.07056862 0.002881593) quadrant=-y radius=0.05120378 length=0.08786673
      WrapCylinder GasMed_at_shank_l: xyz_body_rotation=(-2.96723 -0.0279725 -1.47812)
          translation=(-0.006759308 -0.07056862 0.002881593) quadrant=-y radius=0.05500896 length=0.08757682
      WrapCylinder GR_at_condyles_l: xyz_body_rotation=(0 0.4 0) translation=(-0.00274026 -0.0190726 0) quadrant=all
          radius=0.0334992 length=0.0879426
      WrapCylinder SM_at_condyles_l: xyz_body_rotation=(0 0.1 0) translation=(-0.00091342 -0.0190726 0) quadrant=all
          radius=0.03219985 length=0.08736199
      WrapCylinder ST_at_condyles_l: xyz_body_rotation=(0 0.2 0) translation=(-0.00182684 -0.01954942 0) quadrant=all
          radius=0.0396418 length=0.08748321
      WrapCylinder BF_at_gastroc_l: translation=(-0.03562338 -0.0572178 0) quadrant=all radius=0.02707222
          length=0.1309815
    Body patella_l: mass=0.0705781 mass_center=(0.0018 0.0264 0) inertia=(2.349874e-6 1.073409e-5 1.073409e-5 0 0 0)
        meshes=l_patella.vtp
    Body talus_l: mass=0.08187715 mass_center=(0 0 0) inertia=(0.0004401299 0.0004401299 0.0004401299 0 0 0)
        meshes=l_talus.vtp
    Body calcn_l: mass=1.023464 mass_center=(0.07331774 0.02199532 0)
        inertia=(0.0006161819 0.001716507 0.001804533 0 0 0) meshes=l_foot.vtp
    Body toes_l: mass=0.1773459 mass_center=(0.02536794 0.004399065 0.01283061)
        inertia=(4.401299e-5 8.802598e-5 0.0004401299 0 0 0) meshes=l_bofoot.vtp
    Body torso: mass=27.74817 mass_center=(-0.02522983 0.2691182 0) inertia=(0.8538736 0.4375053 0.8289146 0 0 0)
        meshes=(hat_spine.vtp hat_jaw.vtp hat_skull.vtp hat_ribs_scap.vtp)
  JointSet:
    CustomJoint ground_pelvis: socket_parent_frame=ground_offset socket_child_frame=pelvis_offset
      Coordinate pelvis_tilt: default_value=0 range=(-1.570796 1.570796) clamped=true
      Coordinate pelvis_list: default_value=0 range=(-1.570796 1.570796) clamped=true
      Coordinate pelvis_rotation: default_value=0 range=(-6.283185 6.283185) clamped=true
      Coordinate pelvis_tx: default_value=0 range=(-50 50) clamped=true
      Coordinate pelvis_ty: default_value=0.94 range=(-1 2) clamped=true
      Coordinate pelvis_tz: default_value=0 range=(-3 3) clamped=true
      PhysicalOffsetFrame ground_offset: socket_parent=/ground translation=(0 0 0) [meters]
      PhysicalOffsetFrame pelvis_offset: socket_parent=/bodyset/pelvis translation=(0 0 0)
      SpatialTransform:
        TransformAxis rotation1: coordinates=pelvis_tilt axis=(0 0 1) LinearFunction(coefficients=1 0)
        TransformAxis rotation2: coordinates=pelvis_list axis=(1 0 0) LinearFunction(coefficients=1 0)
        TransformAxis rotation3: coordinates=pelvis_rotation axis=(0 1 0) LinearFunction(coefficients=1 0)
        TransformAxis translation1: coordinates=pelvis_tx axis=(1 0 0) LinearFunction(coefficients=1 0)
        TransformAxis translation2: coordinates=pelvis_ty axis=(0 1 0) LinearFunction(coefficients=1 0)
        TransformAxis translation3: coordinates=pelvis_tz axis=(0 0 1) LinearFunction(coefficients=1 0)
    CustomJoint hip_r: socket_parent_frame=pelvis_offset socket_child_frame=femur_r_offset
      Coordinate hip_flexion_r: default_value=0 range=(-0.5235988 2.094395) clamped=true
      Coordinate hip_adduction_r: default_value=0 range=(-0.8726646 0.5235988) clamped=true
      Coordinate hip_rotation_r: default_value=0 range=(-0.6981317 0.6981317) clamped=true
      PhysicalOffsetFrame pelvis_offset: socket_parent=/bodyset/pelvis translation=(-0.04905804 -0.07515025 0.08845497)
      PhysicalOffsetFrame femur_r_offset: socket_parent=/bodyset/femur_r translation=(0 0 0)
      SpatialTransform: axes_held_at_zero=(translation1 translation2 translation3)
        TransformAxis rotation1: coordinates=hip_flexion_r axis=(0 0 1) LinearFunction(coefficients=1 0)
        TransformAxis rotation2: coordinates=hip_adduction_r axis=(1 0 0) LinearFunction(coefficients=1 0)
        TransformAxis rotation3: coordinates=hip_rotation_r axis=(0 1 0) LinearFunction(coefficients=1 0)
    CustomJoint knee_r: socket_parent_frame=femur_r_offset socket_child_frame=tibia_r_offset
      Coordinate knee_angle_r: default_value=0 range=(0 2.443461) clamped=true
      PhysicalOffsetFrame femur_r_offset: socket_parent=/bodyset/femur_r translation=(-0.0046188 -0.3898122 -0.0019271)
          orientation=(-1.64157 1.44618 1.5708) [radians]
      PhysicalOffsetFrame tibia_r_offset: socket_parent=/bodyset/tibia_r
          translation=(-0.007389148 -0.003370891 -0.00129649) orientation=(-1.64157 1.44618 1.5708)
      SpatialTransform:
        TransformAxis rotation1: coordinates=knee_angle_r axis=(1 0 0) LinearFunction(coefficients=1 0)
        TransformAxis rotation2: coordinates=knee_angle_r axis=(0 0 1)
          PolynomialFunction: coefficients=(0.01083209 -0.02521833 -0.03284781 0.07910001 -1.473252e-8)
        TransformAxis rotation3: coordinates=knee_angle_r axis=(0 1 0)
          PolynomialFunction: coefficients=(0.02516576 -0.1694801 0.3694993 -4.430358e-8)
        TransformAxis translation1: coordinates=knee_angle_r axis=(1 0 0)
          MultiplierFunction: scale=1.0264
            PolynomialFunction: coefficients=(0.0001590448 -0.00101515 0.001817511 2.641427e-5 -7.746564e-7)
        TransformAxis translation2: coordinates=knee_angle_r axis=(0 1 0)
          MultiplierFunction: scale=0.95169
            PolynomialFunction: coefficients=(-0.0005796878 0.005079766 -0.01144238 0.003936909 -2.51635e-5)
        TransformAxis translation3: coordinates=knee_angle_r axis=(0 0 1)
          MultiplierFunction: scale=1.1012
            PolynomialFunction: coefficients=(0.001208087 -0.004453611 0.0006116494 0.00626543 -1.461913e-5)
    CustomJoint patellofemoral_r: socket_parent_frame=femur_r_offset socket_child_frame=patella_r_offset
      Coordinate knee_angle_r_beta: default_value=0 range=(-99999.9 99999.9) clamped=false
      PhysicalOffsetFrame femur_r_offset: socket_parent=/bodyset/femur_r
          translation=(-0.008303576 -0.3882515 -0.0030283)
      PhysicalOffsetFrame patella_r_offset: socket_parent=/bodyset/patella_r translation=(0 0 0)
      SpatialTransform: axes_held_at_zero=(rotation2 rotation3)
        TransformAxis rotation1: coordinates=knee_angle_r_beta axis=(0 0 1)
          SimmSpline: x=(0 0.174533 0.349066 0.523599 0.698132 0.872665 1.0472 1.22173 1.39626 1.5708 1.74533 1.91986 2.0944)
              y=(0.00113686 -0.00629212 -0.105582 -0.253683 -0.414245 -0.579047 -0.747244 -0.91799 -1.09044 -1.26379 -1.43763 -1.61186 -1.78634)
        TransformAxis translation1: coordinates=knee_angle_r_beta axis=(1 0 0)
          MultiplierFunction: scale=1.0264
            SimmSpline: x=(0 0.174533 0.349066 0.523599 0.698132 0.872665 1.0472 1.22173 1.39626 1.5708 1.74533 1.91986 2.0944)
                y=(0.0524 0.0488 0.0437 0.0371 0.0296 0.0216 0.0136 0.0057 -0.0019 -0.0088 -0.0148 -0.0196 -0.0227)
        TransformAxis translation2: coordinates=knee_angle_r_beta axis=(0 1 0)
          MultiplierFunction: scale=0.95169
            SimmSpline: x=(0 0.174533 0.349066 0.523599 0.698132 0.872665 1.0472 1.22173 1.39626 1.5708 1.74533 1.91986 2.0944)
                y=(-0.0108 -0.019 -0.0263 -0.0322 -0.0367 -0.0395 -0.0408 -0.0404 -0.0384 -0.0349 -0.0301 -0.0245 -0.0187)
        TransformAxis translation3: axis=(0 0 1) MultiplierFunction(scale=1.1012, Constant(value=0.00275))
    PinJoint ankle_r: socket_parent_frame=tibia_r_offset socket_child_frame=talus_r_offset
      Coordinate ankle_angle_r: default_value=0 range=(-0.8726646 0.8726646) clamped=true
      PhysicalOffsetFrame tibia_r_offset: socket_parent=/bodyset/tibia_r translation=(-0.0091342 -0.381452 0)
          orientation=(0.175895 -0.105208 0.0186622)
      PhysicalOffsetFrame talus_r_offset: socket_parent=/bodyset/talus_r translation=(0 0 0)
          orientation=(0.175895 -0.105208 0.0186622)
    PinJoint subtalar_r: socket_parent_frame=talus_r_offset socket_child_frame=calcn_r_offset
      Coordinate subtalar_angle_r: default_value=0 range=(-0.6108652 0.6108652) clamped=true
      PhysicalOffsetFrame talus_r_offset: socket_parent=/bodyset/talus_r
          translation=(-0.03575706 -0.03075679 0.005806765) orientation=(-1.76819 0.906223 1.8196)
      PhysicalOffsetFrame calcn_r_offset: socket_parent=/bodyset/calcn_r translation=(0 0 0)
          orientation=(-1.76819 0.906223 1.8196)
    PinJoint mtp_r: socket_parent_frame=calcn_r_offset socket_child_frame=toes_r_offset
      Coordinate mtp_angle_r: default_value=0 range=(-0.7853982 0.5235988) clamped=true
      PhysicalOffsetFrame calcn_r_offset: socket_parent=/bodyset/calcn_r
          translation=(0.1310921 -0.001466355 0.0007918316) orientation=(-3.14159 0.619901 0)
      PhysicalOffsetFrame toes_r_offset: socket_parent=/bodyset/toes_r translation=(0 0 0)
          orientation=(-3.14159 0.619901 0)
    CustomJoint hip_l: socket_parent_frame=pelvis_offset socket_child_frame=femur_l_offset
      Coordinate hip_flexion_l: default_value=0 range=(-0.5235988 2.094395) clamped=true
      Coordinate hip_adduction_l: default_value=0 range=(-0.8726646 0.5235988) clamped=true
      Coordinate hip_rotation_l: default_value=0 range=(-0.6981317 0.6981317) clamped=true
      PhysicalOffsetFrame pelvis_offset: socket_parent=/bodyset/pelvis
          translation=(-0.04905804 -0.07515025 -0.08845497)
      PhysicalOffsetFrame femur_l_offset: socket_parent=/bodyset/femur_l translation=(0 0 0)
      SpatialTransform: axes_held_at_zero=(translation1 translation2 translation3)
        TransformAxis rotation1: coordinates=hip_flexion_l axis=(0 0 1) LinearFunction(coefficients=1 0)
        TransformAxis rotation2: coordinates=hip_adduction_l axis=(1 0 0) LinearFunction(coefficients=-1 0)
        TransformAxis rotation3: coordinates=hip_rotation_l axis=(0 1 0) LinearFunction(coefficients=-1 0)
    CustomJoint knee_l: socket_parent_frame=femur_l_offset socket_child_frame=tibia_l_offset
      Coordinate knee_angle_l: default_value=0 range=(0 2.443461) clamped=true
      PhysicalOffsetFrame femur_l_offset: socket_parent=/bodyset/femur_l translation=(-0.0046188 -0.3898122 0.0019271)
          orientation=(1.64157 -1.44618 1.5708)
      PhysicalOffsetFrame tibia_l_offset: socket_parent=/bodyset/tibia_l
          translation=(-0.007389148 -0.003370891 0.00129649) orientation=(1.64157 -1.44618 1.5708)
      SpatialTransform:
        TransformAxis rotation1: coordinates=knee_angle_l axis=(-1 0 0) LinearFunction(coefficients=1 0)
        TransformAxis rotation2: coordinates=knee_angle_l axis=(0 0 1)
          PolynomialFunction: coefficients=(0.01083209 -0.02521833 -0.03284781 0.07910001 -1.473252e-8)
        TransformAxis rotation3: coordinates=knee_angle_l axis=(0 1 0)
          PolynomialFunction: coefficients=(-0.02516576 0.1694801 -0.3694993 4.430358e-8)
        TransformAxis translation1: coordinates=knee_angle_l axis=(1 0 0)
          MultiplierFunction: scale=1.0264
            PolynomialFunction: coefficients=(0.0001590448 -0.00101515 0.001817511 2.641427e-5 -7.746564e-7)
        TransformAxis translation2: coordinates=knee_angle_l axis=(0 1 0)
          MultiplierFunction: scale=0.95169
            PolynomialFunction: coefficients=(-0.0005796878 0.005079766 -0.01144238 0.003936909 -2.51635e-5)
        TransformAxis translation3: coordinates=knee_angle_l axis=(0 0 1)
          MultiplierFunction: scale=1.1012
            PolynomialFunction: coefficients=(-0.001208087 0.004453611 -0.0006116494 -0.00626543 1.461913e-5)
    CustomJoint patellofemoral_l: socket_parent_frame=femur_l_offset socket_child_frame=patella_l_offset
      Coordinate knee_angle_l_beta: default_value=0 range=(-99999.9 99999.9) clamped=false
      PhysicalOffsetFrame femur_l_offset: socket_parent=/bodyset/femur_l
          translation=(-0.008303576 -0.3882515 0.0030283)
      PhysicalOffsetFrame patella_l_offset: socket_parent=/bodyset/patella_l translation=(0 0 0)
      SpatialTransform: axes_held_at_zero=(rotation2 rotation3)
        TransformAxis rotation1: coordinates=knee_angle_l_beta axis=(0 0 1)
          SimmSpline: x=(0 0.174533 0.349066 0.523599 0.698132 0.872665 1.0472 1.22173 1.39626 1.5708 1.74533 1.91986 2.0944)
              y=(0.00113686 -0.00629212 -0.105582 -0.253683 -0.414245 -0.579047 -0.747244 -0.91799 -1.09044 -1.26379 -1.43763 -1.61186 -1.78634)
        TransformAxis translation1: coordinates=knee_angle_l_beta axis=(1 0 0)
          MultiplierFunction: scale=1.0264
            SimmSpline: x=(0 0.174533 0.349066 0.523599 0.698132 0.872665 1.0472 1.22173 1.39626 1.5708 1.74533 1.91986 2.0944)
                y=(0.0524 0.0488 0.0437 0.0371 0.0296 0.0216 0.0136 0.0057 -0.0019 -0.0088 -0.0148 -0.0196 -0.0227)
        TransformAxis translation2: coordinates=knee_angle_l_beta axis=(0 1 0)
          MultiplierFunction: scale=0.95169
            SimmSpline: x=(0 0.174533 0.349066 0.523599 0.698132 0.872665 1.0472 1.22173 1.39626 1.5708 1.74533 1.91986 2.0944)
                y=(-0.0108 -0.019 -0.0263 -0.0322 -0.0367 -0.0395 -0.0408 -0.0404 -0.0384 -0.0349 -0.0301 -0.0245 -0.0187)
        TransformAxis translation3: axis=(0 0 1) MultiplierFunction(scale=1.1012, Constant(value=-0.00275))
    PinJoint ankle_l: socket_parent_frame=tibia_l_offset socket_child_frame=talus_l_offset
      Coordinate ankle_angle_l: default_value=0 range=(-0.8726646 0.8726646) clamped=true
      PhysicalOffsetFrame tibia_l_offset: socket_parent=/bodyset/tibia_l translation=(-0.0091342 -0.381452 0)
          orientation=(-0.175895 0.105208 0.0186622)
      PhysicalOffsetFrame talus_l_offset: socket_parent=/bodyset/talus_l translation=(0 0 0)
          orientation=(-0.175895 0.105208 0.0186622)
    PinJoint subtalar_l: socket_parent_frame=talus_l_offset socket_child_frame=calcn_l_offset
      Coordinate subtalar_angle_l: default_value=0 range=(-0.6108652 0.6108652) clamped=true
      PhysicalOffsetFrame talus_l_offset: socket_parent=/bodyset/talus_l
          translation=(-0.03575706 -0.03075679 -0.005806765) orientation=(1.76819 -0.906223 1.8196)
      PhysicalOffsetFrame calcn_l_offset: socket_parent=/bodyset/calcn_l translation=(0 0 0)
          orientation=(1.76819 -0.906223 1.8196)
    PinJoint mtp_l: socket_parent_frame=calcn_l_offset socket_child_frame=toes_l_offset
      Coordinate mtp_angle_l: default_value=0 range=(-0.7853982 0.5235988) clamped=true
      PhysicalOffsetFrame calcn_l_offset: socket_parent=/bodyset/calcn_l
          translation=(0.1310921 -0.001466355 -0.0007918316) orientation=(-3.14159 -0.619901 0)
      PhysicalOffsetFrame toes_l_offset: socket_parent=/bodyset/toes_l translation=(0 0 0)
          orientation=(-3.14159 -0.619901 0)
    CustomJoint lumbar: socket_parent_frame=pelvis_offset socket_child_frame=torso_offset
      Coordinate lumbar_ext: default_value=0 range=(-1.570796 1.570796) clamped=true
      Coordinate lumbar_bend: default_value=0 range=(-1.570796 1.570796) clamped=true
      Coordinate lumbar_rota: default_value=0 range=(-1.570796 1.570796) clamped=true
      PhysicalOffsetFrame pelvis_offset: socket_parent=/bodyset/pelvis translation=(-0.08778422 0.07803218 0)
      PhysicalOffsetFrame torso_offset: socket_parent=/bodyset/torso translation=(0 0 0)
      SpatialTransform: axes_held_at_zero=(translation1 translation2 translation3)
        TransformAxis rotation1: coordinates=lumbar_ext axis=(0 0 1) LinearFunction(coefficients=1 0)
        TransformAxis rotation2: coordinates=lumbar_bend axis=(1 0 0) LinearFunction(coefficients=1 0)
        TransformAxis rotation3: coordinates=lumbar_rota axis=(0 1 0) LinearFunction(coefficients=1 0)
  ConstraintSet:
    CoordinateCouplerConstraint patellofemoral_knee_angle_r_con: independent_coordinate_names=knee_angle_r
        dependent_coordinate_name=knee_angle_r_beta scale_factor=1
        coupled_coordinates_function=LinearFunction(coefficients=1 0)
    CoordinateCouplerConstraint patellofemoral_knee_angle_l_con: independent_coordinate_names=knee_angle_l
        dependent_coordinate_name=knee_angle_l_beta scale_factor=1
        coupled_coordinates_function=LinearFunction(coefficients=1 0)
  ForceSet:
    ExpressionBasedCoordinateForce SubtalarDamping_r: coordinate=subtalar_angle_r
        expression=-60.21*exp(16.32*(q-0.65))+60.21*exp(-16.32*(q+0.65))-0.1*qdot
    ExpressionBasedCoordinateForce SubtalarDamping_l: coordinate=subtalar_angle_l
        expression=-60.21*exp(16.32*(q-0.65))+60.21*exp(-16.32*(q+0.65))-0.1*qdot
    ExpressionBasedCoordinateForce PassiveHipDampingX_r: coordinate=hip_flexion_r
        expression=-2.44*exp(5.05*(q-1.81))+1.51*exp(-21.88*(q+0.47))-0.1*qdot
    ExpressionBasedCoordinateForce PassiveHipDampingY_r: coordinate=hip_adduction_r
        expression=-0.03*exp(14.94*(q-0.50))+0.03*exp(-14.94*(q+0.50))-0.1*qdot
    ExpressionBasedCoordinateForce PassiveHipDampingZ_r: coordinate=hip_rotation_r
        expression=-0.03*exp(14.94*(q-0.92))+0.03*exp(-14.94*(q+0.92))-0.1*qdot
    ExpressionBasedCoordinateForce PassiveHipDampingX_l: coordinate=hip_flexion_l
        expression=-2.44*exp(5.05*(q-1.81))+1.51*exp(-21.88*(q+0.47))-0.1*qdot
    ExpressionBasedCoordinateForce PassiveHipDampingY_l: coordinate=hip_adduction_l
        expression=-0.03*exp(14.94*(q-0.50))+0.03*exp(-14.94*(q+0.50))-0.1*qdot
    ExpressionBasedCoordinateForce PassiveHipDampingZ_l: coordinate=hip_rotation_l
        expression=-0.03*exp(14.94*(q-0.92))+0.03*exp(-14.94*(q+0.92))-0.1*qdot
    ExpressionBasedCoordinateForce PassiveKneeDamping_r: coordinate=knee_angle_r
        expression=6.09*exp(33.94*(-q-0.13))-11.03*exp(-11.33*(-q+2.40))-0.1*qdot
    ExpressionBasedCoordinateForce PassiveKneeDamping_l: coordinate=knee_angle_l
        expression=6.09*exp(33.94*(-q-0.13))-11.03*exp(-11.33*(-q+2.40))-0.1*qdot
    ExpressionBasedBushingForce PassiveAnkleBushing_r: socket_frame1=/bodyset/tibia_r socket_frame2=/bodyset/calcn_r
        Mx_expression=9.52095038*theta_x-29.57608094*theta_x^2+169.01588105*theta_x^3
        My_expression=3.61796125*theta_y-10.1612135*theta_y^2+64.5279144*theta_y^3
        Mz_expression=5.98187224*theta_z+15.74951827*theta_z^2+33.6780792*theta_z^3 Fx_expression=0 Fy_expression=0
        Fz_expression=0 rotational_damping=(2 2 2) translational_damping=(0 0 0) moment_visual_scale=1
        force_visual_scale=1 visual_aspect_ratio=1
      PhysicalOffsetFrame tibia_r_offset_bushing: socket_parent=/bodyset/tibia_r translation=(-0.0091342 -0.381452 0)
          orientation=(0.175895 -0.105208 0.0186622)
      PhysicalOffsetFrame calcn_r_offset_bushing: socket_parent=/bodyset/calcn_r
          translation=(0.03575706 0.03075679 -0.005806765) orientation=(0.175895 -0.105208 0.0186622)
    ExpressionBasedBushingForce PassiveAnkleBushing_l: socket_frame1=/bodyset/tibia_l socket_frame2=/bodyset/calcn_l
        Mx_expression=9.52095038*theta_x+29.57608094*theta_x^2+169.01588105*theta_x^3
        My_expression=3.61796125*theta_y+10.1612135*theta_y^2+64.5279144*theta_y^3
        Mz_expression=5.98187224*theta_z+15.74951827*theta_z^2+33.6780792*theta_z^3 Fx_expression=0 Fy_expression=0
        Fz_expression=0 rotational_damping=(2 2 2) translational_damping=(0 0 0) moment_visual_scale=1
        force_visual_scale=1 visual_aspect_ratio=1
      PhysicalOffsetFrame tibia_l_offset_bushing: socket_parent=/bodyset/tibia_l translation=(-0.0091342 -0.381452 0)
          orientation=(-0.175895 0.105208 0.0186622)
      PhysicalOffsetFrame calcn_l_offset_bushing: socket_parent=/bodyset/calcn_l
          translation=(0.03575706 0.03075679 0.005806765) orientation=(-0.175895 0.105208 0.0186622)
    ExpressionBasedCoordinateForce PassiveToeDamping_r: coordinate=mtp_angle_r expression=-25.0*q-2.0*qdot
    ExpressionBasedCoordinateForce PassiveToeDamping_l: coordinate=mtp_angle_l expression=-25.0*q-2.0*qdot
    SmoothSphereHalfSpaceForce [values shared by the 22 below unless stated]: socket_half_space=/contactgeometryset/floor
        stiffness=1000000 [N/m^2] dissipation=2 [s/m] static_friction=0.8 dynamic_friction=0.8 viscous_friction=0.5
        transition_velocity=0.2 [m/s]
    SmoothSphereHalfSpaceForce SmoothSphereHalfSpaceForce_heel_r: socket_sphere=/contactgeometryset/heel_r
    SmoothSphereHalfSpaceForce SmoothSphereHalfSpaceForce_mh1_r: socket_sphere=/contactgeometryset/mh1_r
    SmoothSphereHalfSpaceForce SmoothSphereHalfSpaceForce_mh3_r: socket_sphere=/contactgeometryset/mh3_r
    SmoothSphereHalfSpaceForce SmoothSphereHalfSpaceForce_mh5_r: socket_sphere=/contactgeometryset/mh5_r
    SmoothSphereHalfSpaceForce SmoothSphereHalfSpaceForce_hallux_r: socket_sphere=/contactgeometryset/hallux_r
    SmoothSphereHalfSpaceForce SmoothSphereHalfSpaceForce_othertoes_r: socket_sphere=/contactgeometryset/othertoes_r
    SmoothSphereHalfSpaceForce SmoothSphereHalfSpaceForce_latheel_r: socket_sphere=/contactgeometryset/latheel_r
    SmoothSphereHalfSpaceForce SmoothSphereHalfSpaceForce_medheel_r: socket_sphere=/contactgeometryset/medheel_r
    SmoothSphereHalfSpaceForce SmoothSphereHalfSpaceForce_mid_r: socket_sphere=/contactgeometryset/mid_r
    SmoothSphereHalfSpaceForce SmoothSphereHalfSpaceForce_latmid_r: socket_sphere=/contactgeometryset/latmid_r
    SmoothSphereHalfSpaceForce SmoothSphereHalfSpaceForce_latmid_l: socket_sphere=/contactgeometryset/latmid_l
    SmoothSphereHalfSpaceForce SmoothSphereHalfSpaceForce_medmid_r: socket_sphere=/contactgeometryset/medmid_r
    SmoothSphereHalfSpaceForce SmoothSphereHalfSpaceForce_medmid_l: socket_sphere=/contactgeometryset/medmid_l
    SmoothSphereHalfSpaceForce SmoothSphereHalfSpaceForce_heel_l: socket_sphere=/contactgeometryset/heel_l
    SmoothSphereHalfSpaceForce SmoothSphereHalfSpaceForce_mh1_l: socket_sphere=/contactgeometryset/mh1_l
    SmoothSphereHalfSpaceForce SmoothSphereHalfSpaceForce_mh3_l: socket_sphere=/contactgeometryset/mh3_l
    SmoothSphereHalfSpaceForce SmoothSphereHalfSpaceForce_mh5_l: socket_sphere=/contactgeometryset/mh5_l
    SmoothSphereHalfSpaceForce SmoothSphereHalfSpaceForce_hallux_l: socket_sphere=/contactgeometryset/hallux_l
    SmoothSphereHalfSpaceForce SmoothSphereHalfSpaceForce_othertoes_l: socket_sphere=/contactgeometryset/othertoes_l
    SmoothSphereHalfSpaceForce SmoothSphereHalfSpaceForce_latheel_l: socket_sphere=/contactgeometryset/latheel_l
    SmoothSphereHalfSpaceForce SmoothSphereHalfSpaceForce_medheel_l: socket_sphere=/contactgeometryset/medheel_l
    SmoothSphereHalfSpaceForce SmoothSphereHalfSpaceForce_mid_l: socket_sphere=/contactgeometryset/mid_l
    Millard2012EquilibriumMuscle [values shared by the 80 below unless stated]: fiber_damping=0.1
        default_activation=0.01 minimum_activation=0.01
      ActiveForceLengthCurve: min_norm_active_fiber_length=0.25 transition_norm_fiber_length=0.77
          max_norm_active_fiber_length=1.9 shallow_ascending_slope=0.75 minimum_value=0
      ForceVelocityCurve: concentric_slope_at_vmax=0 concentric_slope_near_vmax=0.25 isometric_slope=5
          eccentric_slope_at_vmax=0 eccentric_slope_near_vmax=0.15 max_eccentric_velocity_force_multiplier=1.4
      TendonForceLengthCurve
    Millard2012EquilibriumMuscle addbrev_r: max_isometric_force=625.8197 optimal_fiber_length=0.1051211
        tendon_slack_length=0.03614523 pennation_angle_at_optimal=0.1147809 [radians]
      PathPoint P1: pelvis (-0.01665023 -0.0900003 0.01763146)
      PathPoint P2: femur_r (-0.0020528 -0.1122994 0.02741988)
      PathWrap: wrap_object=AB_at_femshaft_r method=hybrid
      FiberForceLengthCurve: strain_at_zero_force=-0.1844454 strain_at_one_norm_force=0.5059595
          stiffness_at_low_force=0.2 stiffness_at_one_norm_force=2.896851 curviness=0.75
    Millard2012EquilibriumMuscle addlong_r: max_isometric_force=916.8 optimal_fiber_length=0.1044567
        tendon_slack_length=0.1272396 pennation_angle_at_optimal=0.1377704
      PathPoint P1: pelvis (-0.006607789 -0.08511731 0.02161571)
      PathPoint P2: femur_r (0.01155726 -0.227806 0.017432)
      PathWrap: wrap_object=AL_at_femshaft_r method=hybrid
      FiberForceLengthCurve: strain_at_zero_force=-0.1942012 strain_at_one_norm_force=0.5013184
          stiffness_at_low_force=0.2 stiffness_at_one_norm_force=2.875548 curviness=0.75
    Millard2012EquilibriumMuscle addmagDist_r: max_isometric_force=597.2951 optimal_fiber_length=0.1707542
        tendon_slack_length=0.08420215 pennation_angle_at_optimal=0.194705
      PathPoint P1: pelvis (-0.06454363 -0.1222376 0.04558992)
      PathPoint P2: femur_r (0.011547 -0.2498186 0.02125316)
      PathWrap: wrap_object=AMdist_at_femshaft_r method=hybrid
      FiberForceLengthCurve: strain_at_zero_force=9.713794e-8 strain_at_one_norm_force=0.7000001
          stiffness_at_low_force=0.2 stiffness_at_one_norm_force=2.857143 curviness=0.75
    Millard2012EquilibriumMuscle addmagIsch_r: max_isometric_force=597.2951 optimal_fiber_length=0.148333
        tendon_slack_length=0.2054469 pennation_angle_at_optimal=0.1680443
      PathPoint P1: pelvis (-0.07812534 -0.1242387 0.04775378)
      PathPoint P2: femur_r (0.004936984 -0.3692272 -0.03604228)
      PathWrap: wrap_object=AMisch_at_condyles_r method=hybrid
      FiberForceLengthCurve: strain_at_zero_force=0.005651991 strain_at_one_norm_force=0.7000408
          stiffness_at_low_force=0.2 stiffness_at_one_norm_force=2.880231 curviness=0.75
    Millard2012EquilibriumMuscle addmagMid_r: max_isometric_force=597.2951 optimal_fiber_length=0.1386906
        tendon_slack_length=0.04696314 pennation_angle_at_optimal=0.2073076
      PathPoint P1: pelvis (-0.04590583 -0.1156121 0.03267545)
      PathPoint P2: femur_r (0.002483888 -0.1545545 0.03217706)
      PathWrap: wrap_object=AMmid_at_femshaft_r method=hybrid
      FiberForceLengthCurve: strain_at_zero_force=1.776572e-8 strain_at_one_norm_force=0.7000001
          stiffness_at_low_force=0.2 stiffness_at_one_norm_force=2.857143 curviness=0.75
    Millard2012EquilibriumMuscle addmagProx_r: max_isometric_force=597.2951 optimal_fiber_length=0.1135317
        tendon_slack_length=0.04335286 pennation_angle_at_optimal=0.3114833
      PathPoint P1: pelvis (-0.02700651 -0.1029737 0.01562789)
      PathPoint P2: femur_r (-0.01567313 -0.07505027 0.03526042)
      PathWrap: wrap_object=AMprox_at_femshaft_r method=hybrid
      FiberForceLengthCurve: strain_at_zero_force=8.055312e-8 strain_at_one_norm_force=0.7000001
          stiffness_at_low_force=0.2 stiffness_at_one_norm_force=2.857143 curviness=0.75
    Millard2012EquilibriumMuscle bflh_r: max_isometric_force=1313.184 optimal_fiber_length=0.09280416
        tendon_slack_length=0.3161601 pennation_angle_at_optimal=0.1759182
      PathPoint P1: pelvis (-0.09066096 -0.1140323 0.06709114)
      PathPoint P2: tibia_r (-0.03138511 -0.03478842 0.03159274)
      PathPoint P3: tibia_r (-0.02469888 -0.04775779 0.03035278)
      FiberForceLengthCurve: strain_at_zero_force=0.1368428 strain_at_one_norm_force=0.7054016
          stiffness_at_low_force=0.2 stiffness_at_one_norm_force=3.517666 curviness=0.75
    Millard2012EquilibriumMuscle bfsh_r: max_isometric_force=557.1148 optimal_fiber_length=0.1049276
        tendon_slack_length=0.1006632 pennation_angle_at_optimal=0.2642232
      PathPoint P1: femur_r (0.005132 -0.2009018 0.02576808)
      PathPoint P2: tibia_r (-0.02617862 -0.03131721 0.02797765)
      PathWrap: wrap_object=BF_at_gastroc_r method=hybrid
      FiberForceLengthCurve: strain_at_zero_force=0.04380442 strain_at_one_norm_force=0.6994891
          stiffness_at_low_force=0.2 stiffness_at_one_norm_force=3.050247 curviness=0.75
    Millard2012EquilibriumMuscle edl_r: max_isometric_force=603.4982 optimal_fiber_length=0.0604646
        tendon_slack_length=0.3218455 pennation_angle_at_optimal=0.2182582
      PathPoint P1: tibia_r (-0.01461472 -0.110335 0.01790081)
      PathPoint P2: tibia_r (0.01498009 -0.3585649 0.009779952)
      PathPoint P3: calcn_r (0.06737901 0.02639439 0.0005865419)
      PathPoint P4: calcn_r (0.1184815 0.004032476 0.009531307)
      PathPoint P5: toes_r (0.0002199532 0.003445934 0.01121761)
      PathPoint P6: toes_r (0.03247976 -0.000293271 0.01832944)
      FiberForceLengthCurve: strain_at_zero_force=0.1015352 strain_at_one_norm_force=0.7074931
          stiffness_at_low_force=0.2 stiffness_at_one_norm_force=3.30056 curviness=0.75
    Millard2012EquilibriumMuscle ehl_r: max_isometric_force=285.8675 optimal_fiber_length=0.06444671
        tendon_slack_length=0.2815626 pennation_angle_at_optimal=0.1972681
      PathPoint P1: tibia_r (-0.01278788 -0.1478126 0.01650367)
      PathPoint P2: tibia_r (0.006485282 -0.277411 0.01432064)
      PathPoint P3: tibia_r (0.0182684 -0.3521756 -0.002444988)
      PathPoint P4: calcn_r (0.07111821 0.0285206 -0.01547004)
      PathPoint P5: calcn_r (0.09479984 0.02265518 -0.01884266)
      PathPoint P6: calcn_r (0.127133 0.01019117 -0.02052897)
      PathPoint P7: toes_r (0.02184869 0.003006027 -0.01796285)
      PathPoint P8: toes_r (0.04127789 0.002492803 -0.0136371)
      FiberForceLengthCurve: strain_at_zero_force=0.08168779 strain_at_one_norm_force=0.7147756
          stiffness_at_low_force=0.2 stiffness_at_one_norm_force=3.159119 curviness=0.75
    Millard2012EquilibriumMuscle fdl_r: max_isometric_force=423.177 optimal_fiber_length=0.03771691
        tendon_slack_length=0.3203171 pennation_angle_at_optimal=0.2248391
      PathPoint P1: tibia_r (-0.002100866 -0.174705 -0.001571778)
      PathPoint P2: tibia_r (-0.01607619 -0.3475981 -0.0108278)
      PathPoint P3: calcn_r (0.03196654 0.02309509 -0.02052897)
      PathPoint P4: calcn_r (0.05190896 0.01290392 -0.01928257)
      PathPoint P5: calcn_r (0.1215608 -0.005938737 0.008504858)
      PathPoint P6: toes_r (-0.001393037 -0.005718784 0.01077771)
      PathPoint P7: toes_r (0.02089556 -0.00520556 0.01576331)
      PathPoint P8: toes_r (0.03233312 -0.004399065 0.01774289)
      FiberForceLengthCurve: strain_at_zero_force=-0.006468795 strain_at_one_norm_force=0.6998542
          stiffness_at_low_force=0.2 stiffness_at_one_norm_force=2.831566 curviness=0.75
    Millard2012EquilibriumMuscle fhl_r: max_isometric_force=907.8393 optimal_fiber_length=0.04393002
        tendon_slack_length=0.2953728 pennation_angle_at_optimal=0.2580255
      PathPoint P1: tibia_r (-0.02831602 -0.2062702 0.0174642)
      PathPoint P2: tibia_r (-0.02210476 -0.3500776 -0.006636396)
      PathPoint P3: calcn_r (0.02742084 0.0202357 -0.01766958)
      PathPoint P4: calcn_r (0.07610382 0.004985607 -0.01876934)
      PathPoint P5: calcn_r (0.1265464 -0.00388584 -0.01972247)
      PathPoint P6: toes_r (0.01136425 -0.004692336 -0.0194292)
      PathPoint P7: toes_r (0.04120457 -0.00747841 -0.01327051)
      FiberForceLengthCurve: strain_at_zero_force=0.007614866 strain_at_one_norm_force=0.7001852
          stiffness_at_low_force=0.2 stiffness_at_one_norm_force=2.887793 curviness=0.75
    Millard2012EquilibriumMuscle gaslat_r: max_isometric_force=1575.059 optimal_fiber_length=0.06529828
        tendon_slack_length=0.3539356 pennation_angle_at_optimal=0.2102268
      PathPoint P1: femur_r (0.0020528 -0.3625939 0.02267371)
      PathPoint P2: calcn_r (0.003225981 0.0227285 -0.00388584)
      PathWrap: wrap_object=GasLat_at_shank_r method=hybrid
      PathWrap pathwrap_0: wrap_object=GasLat_at_condyles_r method=hybrid
      FiberForceLengthCurve: strain_at_zero_force=-0.1932361 strain_at_one_norm_force=0.6636807
          stiffness_at_low_force=0.2 stiffness_at_one_norm_force=2.333949 curviness=0.75
    Millard2012EquilibriumMuscle gasmed_r: max_isometric_force=3115.515 optimal_fiber_length=0.05662716
        tendon_slack_length=0.3714358 pennation_angle_at_optimal=0.1656816
      PathPoint P1: femur_r (0.0061584 -0.3664007 -0.0242264)
      PathPoint P2: calcn_r (0.003225981 0.0227285 -0.00388584)
      PathWrap: wrap_object=GasMed_at_shank_r method=hybrid
      PathWrap pathwrap_0: wrap_object=GasMed_at_condyles_r method=hybrid
      FiberForceLengthCurve: strain_at_zero_force=0.1506325 strain_at_one_norm_force=0.550636
          stiffness_at_low_force=0.2 stiffness_at_one_norm_force=4.999956 curviness=0.75
    Millard2012EquilibriumMuscle glmax1_r: max_isometric_force=983.7836 optimal_fiber_length=0.1427078
        tendon_slack_length=0.08475097 pennation_angle_at_optimal=0.3540118
      PathPoint P1: pelvis (-0.1073112 0.03303203 0.06445787)
      PathPoint P2: pelvis (-0.1095777 -0.02317029 0.08918771)
      PathPoint P3: femur_r (-0.04557216 -0.03102509 0.03325624)
      PathPoint P4: femur_r (-0.02843128 -0.05386565 0.0517564)
      PathWrap: wrap_object=Gmax1_at_pelvis_r method=hybrid
      FiberForceLengthCurve: strain_at_zero_force=2.229005e-7 strain_at_one_norm_force=0.6999999
          stiffness_at_low_force=0.2 stiffness_at_one_norm_force=2.857144 curviness=0.75
    Millard2012EquilibriumMuscle glmax2_r: max_isometric_force=1406.046 optimal_fiber_length=0.1518073
        tendon_slack_length=0.1053949 pennation_angle_at_optimal=0.3673821
      PathPoint P1: pelvis (-0.1148082 0.008329815 0.05289438)
      PathPoint P2: pelvis (-0.1171619 -0.05830871 0.09308037)
      PathPoint P3: femur_r (-0.046188 -0.0555787 0.02775024)
      PathPoint P4: femur_r (-0.01601184 -0.0966917 0.04614028)
      PathWrap: wrap_object=Gmax2_at_pelvis_r method=hybrid
      FiberForceLengthCurve: strain_at_zero_force=1.628612e-7 strain_at_one_norm_force=0.7000001
          stiffness_at_low_force=0.2 stiffness_at_one_norm_force=2.857143 curviness=0.75
    Millard2012EquilibriumMuscle glmax3_r: max_isometric_force=947.7541 optimal_fiber_length=0.1650222
        tendon_slack_length=0.1017801 pennation_angle_at_optimal=0.3824161
      PathPoint P1: pelvis (-0.1133262 -0.05026613 0.0103041)
      PathPoint P2: pelvis (-0.1109725 -0.1209259 0.04980315)
      PathPoint P3: femur_r (-0.02884184 -0.1070651 0.01035128)
      PathPoint P4: femur_r (-0.0061584 -0.1350448 0.04525932)
      PathWrap: wrap_object=Gmax3_at_pelvis_r method=hybrid
      FiberForceLengthCurve: strain_at_zero_force=0.03977768 strain_at_one_norm_force=0.7004988
          stiffness_at_low_force=0.2 stiffness_at_one_norm_force=3.026996 curviness=0.75
    Millard2012EquilibriumMuscle glmed1_r: max_isometric_force=1093.467 optimal_fiber_length=0.07336783
        tendon_slack_length=0.05610481 pennation_angle_at_optimal=0.3165559
      PathPoint P1: pelvis (-0.04271526 0.0248937 0.1316635)
      PathPoint P2_0: femur_r (-0.0143696 -0.01713042 0.0649708)
      FiberForceLengthCurve: strain_at_zero_force=6.185261e-8 strain_at_one_norm_force=0.7000001
          stiffness_at_low_force=0.2 stiffness_at_one_norm_force=2.857143 curviness=0.75
    Millard2012EquilibriumMuscle glmed2_r: max_isometric_force=765.0917 optimal_fiber_length=0.08174077
        tendon_slack_length=0.07342072 pennation_angle_at_optimal=0.3165559
      PathPoint P1: pelvis (-0.0740979 0.05265975 0.0938818)
      PathPoint P2_0: femur_r (-0.0225808 -0.0095169 0.0616672)
      FiberForceLengthCurve: strain_at_zero_force=-0.1329608 strain_at_one_norm_force=0.6904088
          stiffness_at_low_force=0.2 stiffness_at_one_norm_force=2.429043 curviness=0.75
    Millard2012EquilibriumMuscle glmed3_r: max_isometric_force=871.1993 optimal_fiber_length=0.07819689
        tendon_slack_length=0.04846005 pennation_angle_at_optimal=0.3165559
      PathPoint P1: pelvis (-0.087174 0.0153192 0.0732736)
      PathPoint P2_0: femur_r (-0.03171576 -0.004472943 0.05704216)
      FiberForceLengthCurve: strain_at_zero_force=-0.1914236 strain_at_one_norm_force=0.6558113
          stiffness_at_low_force=0.2 stiffness_at_one_norm_force=2.360621 curviness=0.75
    Millard2012EquilibriumMuscle glmin1_r: max_isometric_force=374.0459 optimal_fiber_length=0.07737867
        tendon_slack_length=0.01836911 pennation_angle_at_optimal=0.1745329
      PathPoint P1: pelvis (-0.0261522 0 0.1350982)
      PathPoint P2: femur_r (0.005132 -0.01427535 0.0616672)
      FiberForceLengthCurve: strain_at_zero_force=-8.172674e-8 strain_at_one_norm_force=0.7000001
          stiffness_at_low_force=0.2 stiffness_at_one_norm_force=2.857142 curviness=0.75
    Millard2012EquilibriumMuscle glmin2_r: max_isometric_force=394.8197 optimal_fiber_length=0.06632693
        tendon_slack_length=0.03091395 pennation_angle_at_optimal=0
      PathPoint P1: pelvis (-0.05369918 0.0095745 0.1156349)
      PathPoint P2: femur_r (0.0041056 -0.00856521 0.0572624)
      FiberForceLengthCurve: strain_at_zero_force=0.001146607 strain_at_one_norm_force=0.6999804
          stiffness_at_low_force=0.2 stiffness_at_one_norm_force=2.861911 curviness=0.75
    Millard2012EquilibriumMuscle glmin3_r: max_isometric_force=446.7738 optimal_fiber_length=0.03541108
        tendon_slack_length=0.04734853 pennation_angle_at_optimal=0.01745329
      PathPoint P1: pelvis (-0.06878029 -0.01484048 0.09136302)
      PathPoint P2: femur_r (-0.0041056 -0.00095169 0.0561612)
      FiberForceLengthCurve: strain_at_zero_force=-0.0351512 strain_at_one_norm_force=0.6990981
          stiffness_at_low_force=0.2 stiffness_at_one_norm_force=2.723871 curviness=0.75
    Millard2012EquilibriumMuscle grac_r: max_isometric_force=281.3115 optimal_fiber_length=0.2167616
        tendon_slack_length=0.1636786 pennation_angle_at_optimal=0.1720016
      PathPoint P1: pelvis (-0.04128561 -0.1238174 0.02811874)
      PathPoint P2: tibia_r (-0.0168252 -0.04534511 -0.02585575)
      PathPoint P3: tibia_r (0.001625888 -0.06639172 -0.01373559)
      PathWrap: wrap_object=GR_at_condyles_r method=hybrid
      FiberForceLengthCurve: strain_at_zero_force=-0.1885953 strain_at_one_norm_force=0.7244614
          stiffness_at_low_force=0.2 stiffness_at_one_norm_force=2.190445 curviness=0.75
    Millard2012EquilibriumMuscle iliacus_r: max_isometric_force=1021.141 optimal_fiber_length=0.09949831
        tendon_slack_length=0.08971715 pennation_angle_at_optimal=0.279914
      PathPoint P1: pelvis (-0.05274027 0.0295852 0.09651507)
      PathPoint P2: pelvis (-0.01176849 -0.05332997 0.08655444)
      PathPoint P3: femur_r (-0.00236072 -0.05377049 0.01530668)
      PathPoint P4: femur_r (-0.01252208 -0.06062265 0.02158352)
      PathWrap: wrap_object=IL_at_brim_r method=hybrid range=(2 3)
      FiberForceLengthCurve: strain_at_zero_force=-0.1607227 strain_at_one_norm_force=0.5020882
          stiffness_at_low_force=0.2 stiffness_at_one_norm_force=3.017452 curviness=0.75
    Millard2012EquilibriumMuscle perbrev_r: max_isometric_force=521.2016 optimal_fiber_length=0.04135114
        tendon_slack_length=0.1343707 pennation_angle_at_optimal=0.2052361
      PathPoint P1: tibia_r (-0.02219611 -0.2414591 0.02191757)
      PathPoint P2: tibia_r (-0.03096494 -0.3712482 0.02174293)
      PathPoint P3: tibia_r (-0.02603247 -0.3818335 0.02226685)
      PathPoint P4: calcn_r (0.03453266 0.01979579 0.01708303)
      PathPoint P5: calcn_r (0.04963611 0.01605659 0.02514799)
      FiberForceLengthCurve: strain_at_zero_force=-0.02868018 strain_at_one_norm_force=0.6992207
          stiffness_at_low_force=0.2 stiffness_at_one_norm_force=2.747627 curviness=0.75
    Millard2012EquilibriumMuscle perlong_r: max_isometric_force=1115.371 optimal_fiber_length=0.0450827
        tendon_slack_length=0.2948309 pennation_angle_at_optimal=0.2479525
      PathPoint P1: tibia_r (-0.0182684 -0.1309334 0.02462452)
      PathPoint P2: tibia_r (-0.02895541 -0.3719157 0.02069508)
      PathPoint P3: tibia_r (-0.02484502 -0.3827871 0.02095704)
      PathPoint P4: calcn_r (0.03211317 0.01686308 0.01620322)
      PathPoint P5: calcn_r (0.04992938 0.007771681 0.02082224)
      PathPoint P6: calcn_r (0.06246672 0.005058924 0.008651494)
      PathPoint P7: calcn_r (0.08820125 0.006232008 -0.01349046)
      FiberForceLengthCurve: strain_at_zero_force=-0.08769079 strain_at_one_norm_force=0.6966414
          stiffness_at_low_force=0.2 stiffness_at_one_norm_force=2.54994 curviness=0.75
    Millard2012EquilibriumMuscle piri_r: max_isometric_force=1029.787 optimal_fiber_length=0.02741043
        tendon_slack_length=0.1211396 pennation_angle_at_optimal=0.1745329
      PathPoint P1: pelvis (-0.08875185 -0.006252149 0.0154676)
      PathPoint P2: pelvis (-0.08893491 -0.02935542 0.06974731)
      PathPoint P3: femur_r (-0.01519072 -0.003426084 0.04812244)
      FiberForceLengthCurve: strain_at_zero_force=-0.1828826 strain_at_one_norm_force=0.7031405
          stiffness_at_low_force=0.2 stiffness_at_one_norm_force=2.257277 curviness=0.75
    Millard2012EquilibriumMuscle psoas_r: max_isometric_force=1426.79 optimal_fiber_length=0.1113624
        tendon_slack_length=0.09482775 pennation_angle_at_optimal=0.2155251
      PathPoint P1: pelvis (-0.05282744 0.0593619 0.0446511)
      PathPoint P2: pelvis (-0.01787067 -0.06261723 0.07510544)
      PathPoint P3: femur_r (-0.01354848 -0.04444392 0.00506552)
      PathPoint P4: femur_r (-0.0241204 -0.04986856 0.00969056)
      PathWrap: wrap_object=PS_at_brim_r method=hybrid range=(2 3)
      FiberForceLengthCurve: strain_at_zero_force=-0.07629291 strain_at_one_norm_force=0.5032605
          stiffness_at_low_force=0.2 stiffness_at_one_norm_force=3.450933 curviness=0.75
    Millard2012EquilibriumMuscle recfem_r: max_isometric_force=2191.741 optimal_fiber_length=0.07260261
        tendon_slack_length=0.4308358 pennation_angle_at_optimal=0.2170149
      PathPoint P1: pelvis (-0.02092176 -0.03714906 0.1068192)
      PathPoint P2: patella_r (0.01 0.049 0.0007)
      PathPoint P3: patella_r (0.0121 0.0437 -0.001)
      PathPoint P4: patella_r (0.005 0.00247 3e-5)
      PathPoint P5: tibia_r (0.02977749 -0.06019313 -0.0004104087)
      PathWrap: wrap_object=KnExt_at_fem_r method=hybrid
      FiberForceLengthCurve: strain_at_zero_force=0.1997943 strain_at_one_norm_force=0.8997465
          stiffness_at_low_force=0.2 stiffness_at_one_norm_force=2.857338 curviness=0.75
    Millard2012EquilibriumMuscle sart_r: max_isometric_force=249.4131 optimal_fiber_length=0.3841874
        tendon_slack_length=0.1182114 pennation_angle_at_optimal=0.02613542
      PathPoint P1: pelvis (-0.01699893 -0.01493622 0.1209014)
      PathPoint P2: femur_r (-0.0030792 -0.339563 -0.04636052)
      PathPoint P3: tibia_r (-0.02292684 -0.03824056 -0.03187217)
      PathPoint P4: tibia_r (-0.01452338 -0.05712244 -0.02305274)
      PathPoint P5: tibia_r (0.01242251 -0.07724403 -0.002270346)
      FiberForceLengthCurve: strain_at_zero_force=-0.07294162 strain_at_one_norm_force=0.7021361
          stiffness_at_low_force=0.2 stiffness_at_one_norm_force=2.580386 curviness=0.75
    Millard2012EquilibriumMuscle semimem_r: max_isometric_force=2200.987 optimal_fiber_length=0.08184339
        tendon_slack_length=0.3188086 pennation_angle_at_optimal=0.2545615
      PathPoint P1: pelvis (-0.08604074 -0.1091493 0.07029686)
      PathPoint P2: tibia_r (-0.02466234 -0.03909883 -0.01711492)
      PathWrap: wrap_object=SM_at_condyles_r method=hybrid
      FiberForceLengthCurve: strain_at_zero_force=0.1537347 strain_at_one_norm_force=0.7044745
          stiffness_at_low_force=0.2 stiffness_at_one_norm_force=3.631479 curviness=0.75
    Millard2012EquilibriumMuscle semiten_r: max_isometric_force=591.2951 optimal_fiber_length=0.1832172
        tendon_slack_length=0.2346689 pennation_angle_at_optimal=0.241295
      PathPoint P1: pelvis (-0.09048661 -0.1199685 0.05896235)
      PathPoint P2: tibia_r (-0.0284987 -0.0484444 -0.01999651)
      PathPoint P3: tibia_r (0.001735498 -0.0737156 -0.01021656)
      PathWrap: wrap_object=ST_at_condyles_r method=hybrid
      FiberForceLengthCurve: strain_at_zero_force=0.114169 strain_at_one_norm_force=0.7136122
          stiffness_at_low_force=0.2 stiffness_at_one_norm_force=3.336429 curviness=0.75
    Millard2012EquilibriumMuscle soleus_r: max_isometric_force=6194.843 optimal_fiber_length=0.0414585
        tendon_slack_length=0.2650988 pennation_angle_at_optimal=0.3814289
      PathPoint P1: tibia_r (-0.006941992 -0.08735251 0.008557458)
      PathPoint P2: calcn_r (0.003225981 0.0227285 -0.00388584)
      FiberForceLengthCurve: strain_at_zero_force=0.04016445 strain_at_one_norm_force=0.7659521
          stiffness_at_low_force=0.2 stiffness_at_one_norm_force=2.755627 curviness=0.75
    Millard2012EquilibriumMuscle tfl_r: max_isometric_force=411.2066 optimal_fiber_length=0.08885916
        tendon_slack_length=0.4204474 pennation_angle_at_optimal=0.05235988
      PathPoint P1: pelvis (-0.0174348 0.01053195 0.1476921)
      PathPoint P2: femur_r (0.03017616 -0.09469316 0.06574164)
      PathPoint P3: femur_r (0.01098248 -0.3854345 0.03567888)
      PathPoint P4: tibia_r (0.009864936 -0.03909883 0.03021307)
      FiberForceLengthCurve: strain_at_zero_force=0.1571908 strain_at_one_norm_force=0.6394004
          stiffness_at_low_force=0.2 stiffness_at_one_norm_force=4.147574 curviness=0.75
    Millard2012EquilibriumMuscle tibant_r: max_isometric_force=1227.452 optimal_fiber_length=0.06256103
        tendon_slack_length=0.2202561 pennation_angle_at_optimal=0.1951828
      PathPoint P1: tibia_r (0.01406667 -0.1251163 0.014146)
      PathPoint P2: tibia_r (0.02292684 -0.1817619 0.01117709)
      PathPoint P3: tibia_r (0.02128269 -0.3489332 -0.01152637)
      PathPoint P4: calcn_r (0.08548849 0.01305056 -0.02236191)
      FiberForceLengthCurve: strain_at_zero_force=0.1588072 strain_at_one_norm_force=0.7083715
          stiffness_at_low_force=0.2 stiffness_at_one_norm_force=3.639246 curviness=0.75
    Millard2012EquilibriumMuscle tibpost_r: max_isometric_force=1730.154 optimal_fiber_length=0.03474727
        tendon_slack_length=0.2581039 pennation_angle_at_optimal=0.2264891
      PathPoint P1: tibia_r (-0.003745022 -0.1243534 0.008994063)
      PathPoint P2: tibia_r (-0.01498009 -0.3485518 -0.01528118)
      PathPoint P3: calcn_r (0.0305735 0.02448813 -0.02096887)
      PathPoint P4: calcn_r (0.0566013 0.01165752 -0.02060229)
      FiberForceLengthCurve: strain_at_zero_force=-0.07310113 strain_at_one_norm_force=0.698029
          stiffness_at_low_force=0.2 stiffness_at_one_norm_force=2.593596 curviness=0.75
    Millard2012EquilibriumMuscle vasint_r: max_isometric_force=1697.361 optimal_fiber_length=0.1125103
        tendon_slack_length=0.1971334 pennation_angle_at_optimal=0.06309973
      PathPoint P1: femur_r (0.0297656 -0.1831052 0.0341372)
      PathPoint P2: femur_r (0.0343844 -0.1983322 0.0313842)
      PathPoint P3: patella_r (0.0058 0.048 -0.0006)
      PathPoint P4: patella_r (0.005 0.00247 -0.00039)
      PathPoint P5: tibia_r (0.02975009 -0.06026942 0.0003754803)
      PathWrap: wrap_object=KnExt_at_fem_r method=hybrid
      FiberForceLengthCurve: strain_at_zero_force=0.1756531 strain_at_one_norm_force=0.7074754
          stiffness_at_low_force=0.2 stiffness_at_one_norm_force=3.760655 curviness=0.75
    Millard2012EquilibriumMuscle vaslat_r: max_isometric_force=5148.767 optimal_fiber_length=0.1129992
        tendon_slack_length=0.213443 pennation_angle_at_optimal=0.2528673
      PathPoint P1: femur_r (0.00492672 -0.1764433 0.03843188)
      PathPoint P2: femur_r (0.02761016 -0.2465829 0.04503908)
      PathPoint P3: patella_r (0.0103 0.0423 0.0141)
      PathPoint P4: patella_r (0.005 0.00247 0.00733)
      PathPoint P5: tibia_r (0.02972269 -0.06044107 0.004462103)
      PathWrap: wrap_object=KnExtVL_at_fem_r method=hybrid
      FiberForceLengthCurve: strain_at_zero_force=0.1934746 strain_at_one_norm_force=0.711135
          stiffness_at_low_force=0.2 stiffness_at_one_norm_force=3.863536 curviness=0.75
    Millard2012EquilibriumMuscle vasmed_r: max_isometric_force=2747.823 optimal_fiber_length=0.1060529
        tendon_slack_length=0.2005364 pennation_angle_at_optimal=0.4222225
      PathPoint P1: femur_r (0.0143696 -0.1997597 0.02070256)
      PathPoint P2: femur_r (0.03653984 -0.263523 0.00099108)
      PathPoint P3: patella_r (0.0063 0.0445 -0.017)
      PathPoint P4: patella_r (0.005 0.00247 -0.0085)
      PathPoint P5: tibia_r (0.0291381 -0.06062226 -0.005920364)
      PathWrap: wrap_object=KnExt_at_fem_r method=hybrid
      FiberForceLengthCurve: strain_at_zero_force=0.1780858 strain_at_one_norm_force=0.706013
          stiffness_at_low_force=0.2 stiffness_at_one_norm_force=3.788401 curviness=0.75
    Millard2012EquilibriumMuscle addbrev_l: max_isometric_force=625.8197 optimal_fiber_length=0.1051211
        tendon_slack_length=0.03614523 pennation_angle_at_optimal=0.1147809
      PathPoint P1: pelvis (-0.01665023 -0.0900003 -0.01763146)
      PathPoint P2: femur_l (-0.0020528 -0.1122994 -0.02741988)
      PathWrap: wrap_object=AB_at_femshaft_l method=hybrid
      FiberForceLengthCurve: strain_at_zero_force=-0.1844454 strain_at_one_norm_force=0.5059595
          stiffness_at_low_force=0.2 stiffness_at_one_norm_force=2.896851 curviness=0.75
    Millard2012EquilibriumMuscle addlong_l: max_isometric_force=916.8 optimal_fiber_length=0.1044567
        tendon_slack_length=0.1272396 pennation_angle_at_optimal=0.1377704
      PathPoint P1: pelvis (-0.006607789 -0.08511731 -0.02161571)
      PathPoint P2: femur_l (0.01155726 -0.227806 -0.017432)
      PathWrap: wrap_object=AL_at_femshaft_l method=hybrid
      FiberForceLengthCurve: strain_at_zero_force=-0.1942012 strain_at_one_norm_force=0.5013184
          stiffness_at_low_force=0.2 stiffness_at_one_norm_force=2.875548 curviness=0.75
    Millard2012EquilibriumMuscle addmagDist_l: max_isometric_force=597.2951 optimal_fiber_length=0.1707542
        tendon_slack_length=0.08420215 pennation_angle_at_optimal=0.194705
      PathPoint P1: pelvis (-0.06454363 -0.1222376 -0.04558992)
      PathPoint P2: femur_l (0.011547 -0.2498186 -0.02125316)
      PathWrap: wrap_object=AMdist_at_femshaft_l method=hybrid
      FiberForceLengthCurve: strain_at_zero_force=9.713794e-8 strain_at_one_norm_force=0.7000001
          stiffness_at_low_force=0.2 stiffness_at_one_norm_force=2.857143 curviness=0.75
    Millard2012EquilibriumMuscle addmagIsch_l: max_isometric_force=597.2951 optimal_fiber_length=0.148333
        tendon_slack_length=0.2054469 pennation_angle_at_optimal=0.1680443
      PathPoint P1: pelvis (-0.07812534 -0.1242387 -0.04775378)
      PathPoint P2: femur_l (0.004936984 -0.3692272 0.03604228)
      PathWrap: wrap_object=AMisch_at_condyles_l method=hybrid
      FiberForceLengthCurve: strain_at_zero_force=0.005651991 strain_at_one_norm_force=0.7000408
          stiffness_at_low_force=0.2 stiffness_at_one_norm_force=2.880231 curviness=0.75
    Millard2012EquilibriumMuscle addmagMid_l: max_isometric_force=597.2951 optimal_fiber_length=0.1386906
        tendon_slack_length=0.04696314 pennation_angle_at_optimal=0.2073076
      PathPoint P1: pelvis (-0.04590583 -0.1156121 -0.03267545)
      PathPoint P2: femur_l (0.002483888 -0.1545545 -0.03217706)
      PathWrap: wrap_object=AMmid_at_femshaft_l method=hybrid
      FiberForceLengthCurve: strain_at_zero_force=1.776572e-8 strain_at_one_norm_force=0.7000001
          stiffness_at_low_force=0.2 stiffness_at_one_norm_force=2.857143 curviness=0.75
    Millard2012EquilibriumMuscle addmagProx_l: max_isometric_force=597.2951 optimal_fiber_length=0.1135317
        tendon_slack_length=0.04335286 pennation_angle_at_optimal=0.3114833
      PathPoint P1: pelvis (-0.02700651 -0.1029737 -0.01562789)
      PathPoint P2: femur_l (-0.01567313 -0.07505027 -0.03526042)
      PathWrap: wrap_object=AMprox_at_femshaft_l method=hybrid
      FiberForceLengthCurve: strain_at_zero_force=8.055312e-8 strain_at_one_norm_force=0.7000001
          stiffness_at_low_force=0.2 stiffness_at_one_norm_force=2.857143 curviness=0.75
    Millard2012EquilibriumMuscle bflh_l: max_isometric_force=1313.184 optimal_fiber_length=0.09280401
        tendon_slack_length=0.3161601 pennation_angle_at_optimal=0.1759182
      PathPoint P1: pelvis (-0.09066096 -0.1140323 -0.06709114)
      PathPoint P2: tibia_l (-0.03138511 -0.03478842 -0.03159274)
      PathPoint P3: tibia_l (-0.02469888 -0.04775779 -0.03035278)
      FiberForceLengthCurve: strain_at_zero_force=0.1368428 strain_at_one_norm_force=0.7054016
          stiffness_at_low_force=0.2 stiffness_at_one_norm_force=3.517666 curviness=0.75
    Millard2012EquilibriumMuscle bfsh_l: max_isometric_force=557.1148 optimal_fiber_length=0.1049274
        tendon_slack_length=0.100663 pennation_angle_at_optimal=0.2642232
      PathPoint P1: femur_l (0.005132 -0.2009018 -0.02576808)
      PathPoint P2: tibia_l (-0.02617862 -0.03131721 -0.02797765)
      PathWrap: wrap_object=BF_at_gastroc_l method=hybrid
      FiberForceLengthCurve: strain_at_zero_force=0.04380442 strain_at_one_norm_force=0.6994891
          stiffness_at_low_force=0.2 stiffness_at_one_norm_force=3.050247 curviness=0.75
    Millard2012EquilibriumMuscle edl_l: max_isometric_force=603.4982 optimal_fiber_length=0.0604646
        tendon_slack_length=0.3218455 pennation_angle_at_optimal=0.2182582
      PathPoint P1: tibia_l (-0.01461472 -0.110335 -0.01790081)
      PathPoint P2: tibia_l (0.01498009 -0.3585649 -0.009779952)
      PathPoint P3: calcn_l (0.06737901 0.02639439 -0.0005865419)
      PathPoint P4: calcn_l (0.1184815 0.004032476 -0.009531307)
      PathPoint P5: toes_l (0.0002199532 0.003445934 -0.01121761)
      PathPoint P6: toes_l (0.03247976 -0.000293271 -0.01832944)
      FiberForceLengthCurve: strain_at_zero_force=0.1015352 strain_at_one_norm_force=0.7074931
          stiffness_at_low_force=0.2 stiffness_at_one_norm_force=3.30056 curviness=0.75
    Millard2012EquilibriumMuscle ehl_l: max_isometric_force=285.8675 optimal_fiber_length=0.06444671
        tendon_slack_length=0.2815626 pennation_angle_at_optimal=0.1972681
      PathPoint P1: tibia_l (-0.01278788 -0.1478126 -0.01650367)
      PathPoint P2: tibia_l (0.006485282 -0.277411 -0.01432064)
      PathPoint P3: tibia_l (0.0182684 -0.3521756 0.002444988)
      PathPoint P4: calcn_l (0.07111821 0.0285206 0.01547004)
      PathPoint P5: calcn_l (0.09479984 0.02265518 0.01884266)
      PathPoint P6: calcn_l (0.127133 0.01019117 0.02052897)
      PathPoint P7: toes_l (0.02184869 0.003006027 0.01796285)
      PathPoint P8: toes_l (0.04127789 0.002492803 0.0136371)
      FiberForceLengthCurve: strain_at_zero_force=0.08168779 strain_at_one_norm_force=0.7147756
          stiffness_at_low_force=0.2 stiffness_at_one_norm_force=3.159119 curviness=0.75
    Millard2012EquilibriumMuscle fdl_l: max_isometric_force=423.177 optimal_fiber_length=0.03771691
        tendon_slack_length=0.3203171 pennation_angle_at_optimal=0.2248391
      PathPoint P1: tibia_l (-0.002100866 -0.174705 0.001571778)
      PathPoint P2: tibia_l (-0.01607619 -0.3475981 0.0108278)
      PathPoint P3: calcn_l (0.03196654 0.02309509 0.02052897)
      PathPoint P4: calcn_l (0.05190896 0.01290392 0.01928257)
      PathPoint P5: calcn_l (0.1215608 -0.005938737 -0.008504858)
      PathPoint P6: toes_l (-0.001393037 -0.005718784 -0.01077771)
      PathPoint P7: toes_l (0.02089556 -0.00520556 -0.01576331)
      PathPoint P8: toes_l (0.03233312 -0.004399065 -0.01774289)
      FiberForceLengthCurve: strain_at_zero_force=-0.006468795 strain_at_one_norm_force=0.6998542
          stiffness_at_low_force=0.2 stiffness_at_one_norm_force=2.831566 curviness=0.75
    Millard2012EquilibriumMuscle fhl_l: max_isometric_force=907.8393 optimal_fiber_length=0.04393002
        tendon_slack_length=0.2953728 pennation_angle_at_optimal=0.2580255
      PathPoint P1: tibia_l (-0.02831602 -0.2062702 -0.0174642)
      PathPoint P2: tibia_l (-0.02210476 -0.3500776 0.006636396)
      PathPoint P3: calcn_l (0.02742084 0.0202357 0.01766958)
      PathPoint P4: calcn_l (0.07610382 0.004985607 0.01876934)
      PathPoint P5: calcn_l (0.1265464 -0.00388584 0.01972247)
      PathPoint P6: toes_l (0.01136425 -0.004692336 0.0194292)
      PathPoint P7: toes_l (0.04120457 -0.00747841 0.01327051)
      FiberForceLengthCurve: strain_at_zero_force=0.007614866 strain_at_one_norm_force=0.7001852
          stiffness_at_low_force=0.2 stiffness_at_one_norm_force=2.887793 curviness=0.75
    Millard2012EquilibriumMuscle gaslat_l: max_isometric_force=1575.059 optimal_fiber_length=0.06529828
        tendon_slack_length=0.3539356 pennation_angle_at_optimal=0.2102268
      PathPoint P1: femur_l (0.0020528 -0.3625939 -0.02267371)
      PathPoint P2: calcn_l (0.003225981 0.0227285 0.00388584)
      PathWrap: wrap_object=GasLat_at_shank_l method=hybrid
      PathWrap pathwrap_0: wrap_object=GasLat_at_condyles_l method=hybrid
      FiberForceLengthCurve: strain_at_zero_force=-0.1932361 strain_at_one_norm_force=0.6636807
          stiffness_at_low_force=0.2 stiffness_at_one_norm_force=2.333949 curviness=0.75
    Millard2012EquilibriumMuscle gasmed_l: max_isometric_force=3115.515 optimal_fiber_length=0.05662716
        tendon_slack_length=0.3714358 pennation_angle_at_optimal=0.1656816
      PathPoint P1: femur_l (0.0061584 -0.3664007 0.0242264)
      PathPoint P2: calcn_l (0.003225981 0.0227285 0.00388584)
      PathWrap: wrap_object=GasMed_at_shank_l method=hybrid
      PathWrap pathwrap_0: wrap_object=GasMed_at_condyles_l method=hybrid
      FiberForceLengthCurve: strain_at_zero_force=0.1506325 strain_at_one_norm_force=0.550636
          stiffness_at_low_force=0.2 stiffness_at_one_norm_force=4.999956 curviness=0.75
    Millard2012EquilibriumMuscle glmax1_l: max_isometric_force=983.7836 optimal_fiber_length=0.1427078
        tendon_slack_length=0.08475097 pennation_angle_at_optimal=0.3540118
      PathPoint P1: pelvis (-0.1073112 0.03303203 -0.06445787)
      PathPoint P2: pelvis (-0.1095777 -0.02317029 -0.08918771)
      PathPoint P3: femur_l (-0.04557216 -0.03102509 -0.03325624)
      PathPoint P4: femur_l (-0.02843128 -0.05386565 -0.0517564)
      PathWrap: wrap_object=Gmax1_at_pelvis_l method=hybrid
      FiberForceLengthCurve: strain_at_zero_force=2.229005e-7 strain_at_one_norm_force=0.6999999
          stiffness_at_low_force=0.2 stiffness_at_one_norm_force=2.857144 curviness=0.75
    Millard2012EquilibriumMuscle glmax2_l: max_isometric_force=1406.046 optimal_fiber_length=0.1518073
        tendon_slack_length=0.1053949 pennation_angle_at_optimal=0.3673821
      PathPoint P1: pelvis (-0.1148082 0.008329815 -0.05289438)
      PathPoint P2: pelvis (-0.1171619 -0.05830871 -0.09308037)
      PathPoint P3: femur_l (-0.046188 -0.0555787 -0.02775024)
      PathPoint P4: femur_l (-0.01601184 -0.0966917 -0.04614028)
      PathWrap: wrap_object=Gmax2_at_pelvis_l method=hybrid
      FiberForceLengthCurve: strain_at_zero_force=1.628612e-7 strain_at_one_norm_force=0.7000001
          stiffness_at_low_force=0.2 stiffness_at_one_norm_force=2.857143 curviness=0.75
    Millard2012EquilibriumMuscle glmax3_l: max_isometric_force=947.7541 optimal_fiber_length=0.1650222
        tendon_slack_length=0.1017801 pennation_angle_at_optimal=0.3824161
      PathPoint P1: pelvis (-0.1133262 -0.05026613 -0.0103041)
      PathPoint P2: pelvis (-0.1109725 -0.1209259 -0.04980315)
      PathPoint P3: femur_l (-0.02884184 -0.1070651 -0.01035128)
      PathPoint P4: femur_l (-0.0061584 -0.1350448 -0.04525932)
      PathWrap: wrap_object=Gmax3_at_pelvis_l method=hybrid
      FiberForceLengthCurve: strain_at_zero_force=0.03977768 strain_at_one_norm_force=0.7004988
          stiffness_at_low_force=0.2 stiffness_at_one_norm_force=3.026996 curviness=0.75
    Millard2012EquilibriumMuscle glmed1_l: max_isometric_force=1093.467 optimal_fiber_length=0.07336783
        tendon_slack_length=0.05610481 pennation_angle_at_optimal=0.3165559
      PathPoint P1: pelvis (-0.04271526 0.0248937 -0.1316635)
      PathPoint P2: femur_l (-0.0143696 -0.01713042 -0.0649708)
      FiberForceLengthCurve: strain_at_zero_force=6.185261e-8 strain_at_one_norm_force=0.7000001
          stiffness_at_low_force=0.2 stiffness_at_one_norm_force=2.857143 curviness=0.75
    Millard2012EquilibriumMuscle glmed2_l: max_isometric_force=765.0917 optimal_fiber_length=0.08174077
        tendon_slack_length=0.07342072 pennation_angle_at_optimal=0.3165559
      PathPoint P1: pelvis (-0.0740979 0.05265975 -0.0938818)
      PathPoint P2: femur_l (-0.0225808 -0.0095169 -0.0616672)
      FiberForceLengthCurve: strain_at_zero_force=-0.1329608 strain_at_one_norm_force=0.6904088
          stiffness_at_low_force=0.2 stiffness_at_one_norm_force=2.429043 curviness=0.75
    Millard2012EquilibriumMuscle glmed3_l: max_isometric_force=871.1993 optimal_fiber_length=0.07819689
        tendon_slack_length=0.04846005 pennation_angle_at_optimal=0.3165559
      PathPoint P1: pelvis (-0.087174 0.0153192 -0.0732736)
      PathPoint P2: femur_l (-0.03171576 -0.004472943 -0.05704216)
      FiberForceLengthCurve: strain_at_zero_force=-0.1914236 strain_at_one_norm_force=0.6558113
          stiffness_at_low_force=0.2 stiffness_at_one_norm_force=2.360621 curviness=0.75
    Millard2012EquilibriumMuscle glmin1_l: max_isometric_force=374.0459 optimal_fiber_length=0.07737867
        tendon_slack_length=0.01836911 pennation_angle_at_optimal=0.1745329
      PathPoint P1: pelvis (-0.0261522 0 -0.1350982)
      PathPoint P2: femur_l (0.005132 -0.01427535 -0.0616672)
      FiberForceLengthCurve: strain_at_zero_force=-8.172674e-8 strain_at_one_norm_force=0.7000001
          stiffness_at_low_force=0.2 stiffness_at_one_norm_force=2.857142 curviness=0.75
    Millard2012EquilibriumMuscle glmin2_l: max_isometric_force=394.8197 optimal_fiber_length=0.06632693
        tendon_slack_length=0.03091395 pennation_angle_at_optimal=0
      PathPoint P1: pelvis (-0.05369918 0.0095745 -0.1156349)
      PathPoint P2: femur_l (0.0041056 -0.00856521 -0.0572624)
      FiberForceLengthCurve: strain_at_zero_force=0.001146607 strain_at_one_norm_force=0.6999804
          stiffness_at_low_force=0.2 stiffness_at_one_norm_force=2.861911 curviness=0.75
    Millard2012EquilibriumMuscle glmin3_l: max_isometric_force=446.7738 optimal_fiber_length=0.03541108
        tendon_slack_length=0.04734853 pennation_angle_at_optimal=0.01745329
      PathPoint P1: pelvis (-0.06878029 -0.01484048 -0.09136302)
      PathPoint P2: femur_l (-0.0041056 -0.00095169 -0.0561612)
      FiberForceLengthCurve: strain_at_zero_force=-0.0351512 strain_at_one_norm_force=0.6990981
          stiffness_at_low_force=0.2 stiffness_at_one_norm_force=2.723871 curviness=0.75
    Millard2012EquilibriumMuscle grac_l: max_isometric_force=281.3115 optimal_fiber_length=0.2167613
        tendon_slack_length=0.1636784 pennation_angle_at_optimal=0.1720016
      PathPoint P1: pelvis (-0.04128561 -0.1238174 -0.02811874)
      PathPoint P2: tibia_l (-0.0168252 -0.04534511 0.02585575)
      PathPoint P3: tibia_l (0.001625888 -0.06639172 0.01373559)
      PathWrap: wrap_object=GR_at_condyles_l method=hybrid
      FiberForceLengthCurve: strain_at_zero_force=-0.1885953 strain_at_one_norm_force=0.7244614
          stiffness_at_low_force=0.2 stiffness_at_one_norm_force=2.190445 curviness=0.75
    Millard2012EquilibriumMuscle iliacus_l: max_isometric_force=1021.141 optimal_fiber_length=0.09949831
        tendon_slack_length=0.08971715 pennation_angle_at_optimal=0.279914
      PathPoint P1: pelvis (-0.05274027 0.0295852 -0.09651507)
      PathPoint P2: pelvis (-0.01176849 -0.05332997 -0.08655444)
      PathPoint P3: femur_l (-0.00236072 -0.05377049 -0.01530668)
      PathPoint P4: femur_l (-0.01252208 -0.06062265 -0.02158352)
      PathWrap: wrap_object=IL_at_brim_l method=hybrid range=(2 3)
      FiberForceLengthCurve: strain_at_zero_force=-0.1607227 strain_at_one_norm_force=0.5020882
          stiffness_at_low_force=0.2 stiffness_at_one_norm_force=3.017452 curviness=0.75
    Millard2012EquilibriumMuscle perbrev_l: max_isometric_force=521.2016 optimal_fiber_length=0.04135114
        tendon_slack_length=0.1343707 pennation_angle_at_optimal=0.2052361
      PathPoint P1: tibia_l (-0.02219611 -0.2414591 -0.02191757)
      PathPoint P2: tibia_l (-0.03096494 -0.3712482 -0.02174293)
      PathPoint P3: tibia_l (-0.02603247 -0.3818335 -0.02226685)
      PathPoint P4: calcn_l (0.03453266 0.01979579 -0.01708303)
      PathPoint P5: calcn_l (0.04963611 0.01605659 -0.02514799)
      FiberForceLengthCurve: strain_at_zero_force=-0.02868018 strain_at_one_norm_force=0.6992207
          stiffness_at_low_force=0.2 stiffness_at_one_norm_force=2.747627 curviness=0.75
    Millard2012EquilibriumMuscle perlong_l: max_isometric_force=1115.371 optimal_fiber_length=0.0450827
        tendon_slack_length=0.2948309 pennation_angle_at_optimal=0.2479525
      PathPoint P1: tibia_l (-0.0182684 -0.1309334 -0.02462452)
      PathPoint P2: tibia_l (-0.02895541 -0.3719157 -0.02069508)
      PathPoint P3: tibia_l (-0.02484502 -0.3827871 -0.02095704)
      PathPoint P4: calcn_l (0.03211317 0.01686308 -0.01620322)
      PathPoint P5: calcn_l (0.04992938 0.007771681 -0.02082224)
      PathPoint P6: calcn_l (0.06246672 0.005058924 -0.008651494)
      PathPoint P7: calcn_l (0.08820125 0.006232008 0.01349046)
      FiberForceLengthCurve: strain_at_zero_force=-0.08769079 strain_at_one_norm_force=0.6966414
          stiffness_at_low_force=0.2 stiffness_at_one_norm_force=2.54994 curviness=0.75
    Millard2012EquilibriumMuscle piri_l: max_isometric_force=1029.787 optimal_fiber_length=0.02741043
        tendon_slack_length=0.1211396 pennation_angle_at_optimal=0.1745329
      PathPoint P1: pelvis (-0.08875185 -0.006252149 -0.0154676)
      PathPoint P2: pelvis (-0.08893491 -0.02935542 -0.06974731)
      PathPoint P3: femur_l (-0.01519072 -0.003426084 -0.04812244)
      FiberForceLengthCurve: strain_at_zero_force=-0.1828826 strain_at_one_norm_force=0.7031405
          stiffness_at_low_force=0.2 stiffness_at_one_norm_force=2.257277 curviness=0.75
    Millard2012EquilibriumMuscle psoas_l: max_isometric_force=1426.79 optimal_fiber_length=0.1113624
        tendon_slack_length=0.09482775 pennation_angle_at_optimal=0.2155251
      PathPoint P1: pelvis (-0.05282744 0.0593619 -0.0446511)
      PathPoint P2: pelvis (-0.01787067 -0.06261723 -0.07510544)
      PathPoint P3: femur_l (-0.01354848 -0.04444392 -0.00506552)
      PathPoint P4: femur_l (-0.0241204 -0.04986856 -0.00969056)
      PathWrap: wrap_object=PS_at_brim_l method=hybrid range=(2 3)
      FiberForceLengthCurve: strain_at_zero_force=-0.07629291 strain_at_one_norm_force=0.5032605
          stiffness_at_low_force=0.2 stiffness_at_one_norm_force=3.450933 curviness=0.75
    Millard2012EquilibriumMuscle recfem_l: max_isometric_force=2191.741 optimal_fiber_length=0.07260277
        tendon_slack_length=0.4308358 pennation_angle_at_optimal=0.2170149
      PathPoint P1: pelvis (-0.02092176 -0.03714906 -0.1068192)
      PathPoint P2: patella_l (0.01 0.049 -0.0007)
      PathPoint P3: patella_l (0.0121 0.0437 0.001)
      PathPoint P4: patella_l (0.005 0.00247 -3e-5)
      PathPoint P5: tibia_l (0.02977749 -0.06019313 0.0004104087)
      PathWrap: wrap_object=KnExt_at_fem_l method=hybrid
      FiberForceLengthCurve: strain_at_zero_force=0.1997943 strain_at_one_norm_force=0.8997465
          stiffness_at_low_force=0.2 stiffness_at_one_norm_force=2.857338 curviness=0.75
    Millard2012EquilibriumMuscle sart_l: max_isometric_force=249.4131 optimal_fiber_length=0.3841872
        tendon_slack_length=0.1182113 pennation_angle_at_optimal=0.02613542
      PathPoint P1: pelvis (-0.01699893 -0.01493622 -0.1209014)
      PathPoint P2: femur_l (-0.0030792 -0.339563 0.04636052)
      PathPoint P3: tibia_l (-0.02292684 -0.03824056 0.03187217)
      PathPoint P4: tibia_l (-0.01452338 -0.05712244 0.02305274)
      PathPoint P5: tibia_l (0.01242251 -0.07724403 0.002270346)
      FiberForceLengthCurve: strain_at_zero_force=-0.07294162 strain_at_one_norm_force=0.7021361
          stiffness_at_low_force=0.2 stiffness_at_one_norm_force=2.580386 curviness=0.75
    Millard2012EquilibriumMuscle semimem_l: max_isometric_force=2200.987 optimal_fiber_length=0.08184339
        tendon_slack_length=0.3188086 pennation_angle_at_optimal=0.2545615
      PathPoint P1: pelvis (-0.08604074 -0.1091493 -0.07029686)
      PathPoint P2: tibia_l (-0.02466234 -0.03909883 0.01711492)
      PathWrap: wrap_object=SM_at_condyles_l method=hybrid
      FiberForceLengthCurve: strain_at_zero_force=0.1537347 strain_at_one_norm_force=0.7044745
          stiffness_at_low_force=0.2 stiffness_at_one_norm_force=3.631479 curviness=0.75
    Millard2012EquilibriumMuscle semiten_l: max_isometric_force=591.2951 optimal_fiber_length=0.1832169
        tendon_slack_length=0.2346685 pennation_angle_at_optimal=0.241295
      PathPoint P1: pelvis (-0.09048661 -0.1199685 -0.05896235)
      PathPoint P2: tibia_l (-0.0284987 -0.0484444 0.01999651)
      PathPoint P3: tibia_l (0.001735498 -0.0737156 0.01021656)
      PathWrap: wrap_object=ST_at_condyles_l method=hybrid
      FiberForceLengthCurve: strain_at_zero_force=0.114169 strain_at_one_norm_force=0.7136122
          stiffness_at_low_force=0.2 stiffness_at_one_norm_force=3.336429 curviness=0.75
    Millard2012EquilibriumMuscle soleus_l: max_isometric_force=6194.843 optimal_fiber_length=0.0414585
        tendon_slack_length=0.2650988 pennation_angle_at_optimal=0.3814289
      PathPoint P1: tibia_l (-0.006941992 -0.08735251 -0.008557458)
      PathPoint P2: calcn_l (0.003225981 0.0227285 0.00388584)
      FiberForceLengthCurve: strain_at_zero_force=0.04016445 strain_at_one_norm_force=0.7659521
          stiffness_at_low_force=0.2 stiffness_at_one_norm_force=2.755627 curviness=0.75
    Millard2012EquilibriumMuscle tfl_l: max_isometric_force=411.2066 optimal_fiber_length=0.08885916
        tendon_slack_length=0.4204474 pennation_angle_at_optimal=0.05235988
      PathPoint P1: pelvis (-0.0174348 0.01053195 -0.1476921)
      PathPoint P2: femur_l (0.03017616 -0.09469316 -0.06574164)
      PathPoint P3: femur_l (0.01098248 -0.3854345 -0.03567888)
      PathPoint P4: tibia_l (0.009864936 -0.03909883 -0.03021307)
      FiberForceLengthCurve: strain_at_zero_force=0.1571908 strain_at_one_norm_force=0.6394004
          stiffness_at_low_force=0.2 stiffness_at_one_norm_force=4.147574 curviness=0.75
    Millard2012EquilibriumMuscle tibant_l: max_isometric_force=1227.452 optimal_fiber_length=0.06256103
        tendon_slack_length=0.2202561 pennation_angle_at_optimal=0.1951828
      PathPoint P1: tibia_l (0.01406667 -0.1251163 -0.014146)
      PathPoint P2: tibia_l (0.02292684 -0.1817619 -0.01117709)
      PathPoint P3: tibia_l (0.02128269 -0.3489332 0.01152637)
      PathPoint P4: calcn_l (0.08548849 0.01305056 0.02236191)
      FiberForceLengthCurve: strain_at_zero_force=0.1588072 strain_at_one_norm_force=0.7083715
          stiffness_at_low_force=0.2 stiffness_at_one_norm_force=3.639246 curviness=0.75
    Millard2012EquilibriumMuscle tibpost_l: max_isometric_force=1730.154 optimal_fiber_length=0.03474727
        tendon_slack_length=0.2581039 pennation_angle_at_optimal=0.2264891
      PathPoint P1: tibia_l (-0.003745022 -0.1243534 -0.008994063)
      PathPoint P2: tibia_l (-0.01498009 -0.3485518 0.01528118)
      PathPoint P3: calcn_l (0.0305735 0.02448813 0.02096887)
      PathPoint P4: calcn_l (0.0566013 0.01165752 0.02060229)
      FiberForceLengthCurve: strain_at_zero_force=-0.07310113 strain_at_one_norm_force=0.698029
          stiffness_at_low_force=0.2 stiffness_at_one_norm_force=2.593596 curviness=0.75
    Millard2012EquilibriumMuscle vasint_l: max_isometric_force=1697.361 optimal_fiber_length=0.1125103
        tendon_slack_length=0.1971334 pennation_angle_at_optimal=0.06309973
      PathPoint P1: femur_l (0.0297656 -0.1831052 -0.0341372)
      PathPoint P2: femur_l (0.0343844 -0.1983322 -0.0313842)
      PathPoint P3: patella_l (0.0058 0.048 0.0006)
      PathPoint P4: patella_l (0.005 0.00247 0.00039)
      PathPoint P5: tibia_l (0.02975009 -0.06026942 -0.0003754803)
      PathWrap: wrap_object=KnExt_at_fem_l method=hybrid
      FiberForceLengthCurve: strain_at_zero_force=0.1756531 strain_at_one_norm_force=0.7074754
          stiffness_at_low_force=0.2 stiffness_at_one_norm_force=3.760655 curviness=0.75
    Millard2012EquilibriumMuscle vaslat_l: max_isometric_force=5148.767 optimal_fiber_length=0.1129992
        tendon_slack_length=0.213443 pennation_angle_at_optimal=0.2528673
      PathPoint P1: femur_l (0.00492672 -0.1764433 -0.03843188)
      PathPoint P2: femur_l (0.02761016 -0.2465829 -0.04503908)
      PathPoint P3: patella_l (0.0103 0.0423 -0.0141)
      PathPoint P4: patella_l (0.005 0.00247 -0.00733)
      PathPoint P5: tibia_l (0.02972269 -0.06044107 -0.004462103)
      PathWrap: wrap_object=KnExtVL_at_fem_l method=hybrid
      FiberForceLengthCurve: strain_at_zero_force=0.1934746 strain_at_one_norm_force=0.711135
          stiffness_at_low_force=0.2 stiffness_at_one_norm_force=3.863536 curviness=0.75
    Millard2012EquilibriumMuscle vasmed_l: max_isometric_force=2747.823 optimal_fiber_length=0.1060529
        tendon_slack_length=0.2005364 pennation_angle_at_optimal=0.4222225
      PathPoint P1: femur_l (0.0143696 -0.1997597 -0.02070256)
      PathPoint P2: femur_l (0.03653984 -0.263523 -0.00099108)
      PathPoint P3: patella_l (0.0063 0.0445 0.017)
      PathPoint P4: patella_l (0.005 0.00247 0.0085)
      PathPoint P5: tibia_l (0.0291381 -0.06062226 0.005920364)
      PathWrap: wrap_object=KnExt_at_fem_l method=hybrid
      FiberForceLengthCurve: strain_at_zero_force=0.1780858 strain_at_one_norm_force=0.706013
          stiffness_at_low_force=0.2 stiffness_at_one_norm_force=3.788401 curviness=0.75
    CoordinateActuator lumbar_ext: coordinate=lumbar_ext optimal_force=10
    CoordinateActuator lumbar_bend: coordinate=lumbar_bend optimal_force=10
    CoordinateActuator lumbar_rot: coordinate=lumbar_rota optimal_force=10
    ObjectGroup right_leg: members=(addbrev_r addlong_r addmagDist_r addmagIsch_r addmagMid_r addmagProx_r bflh_r bfsh_r edl_r ehl_r fdl_r fhl_r gaslat_r gasmed_r glmax1_r glmax2_r glmax3_r glmed1_r glmed2_r glmed3_r glmin1_r glmin2_r glmin3_r grac_r iliacus_r perbrev_r perlong_r piri_r psoas_r recfem_r sart_r semimem_r semiten_r soleus_r tfl_r tibant_r tibpost_r vasint_r vaslat_r vasmed_r)
    ObjectGroup left_leg: members=(addbrev_l addlong_l addmagDist_l addmagIsch_l addmagMid_l addmagProx_l bflh_l bfsh_l edl_l ehl_l fdl_l fhl_l gaslat_l gasmed_l glmax1_l glmax2_l glmax3_l glmed1_l glmed2_l glmed3_l glmin1_l glmin2_l glmin3_l grac_l iliacus_l perbrev_l perlong_l piri_l psoas_l recfem_l sart_l semimem_l semiten_l soleus_l tfl_l tibant_l tibpost_l vasint_l vaslat_l vasmed_l)
    ObjectGroup hip_add_r: members=(addbrev_r addlong_r addmagDist_r addmagIsch_r addmagMid_r addmagProx_r bflh_r grac_r semimem_r semiten_r)
    ObjectGroup hip_abd_r: members=(glmax1_r glmed1_r glmed2_r glmed3_r glmin1_r glmin2_r glmin3_r piri_r sart_r tfl_r)
    ObjectGroup hip_flex_r: members=(addbrev_r addlong_r glmin1_r grac_r iliacus_r psoas_r recfem_r sart_r tfl_r)
    ObjectGroup hip_ext_r: members=(addlong_r addmagDist_r addmagIsch_r addmagMid_r addmagProx_r bflh_r glmax1_r glmax2_r glmax3_r glmed1_r glmed2_r glmed3_r glmin3_r semimem_r semiten_r)
    ObjectGroup hip_inrot_r: members=(glmed1_r glmed2_r glmed3_r glmin1_r iliacus_r psoas_r tfl_r)
    ObjectGroup hip_exrot_r: members=(glmin3_r piri_r)
    ObjectGroup knee_flex_r: members=(bflh_r bfsh_r gaslat_r gasmed_r grac_r sart_r semimem_r semiten_r)
    ObjectGroup knee_ext_r: members=(recfem_r vasint_r vaslat_r vasmed_r)
    ObjectGroup ankle_df_r: members=(edl_r ehl_r tibant_r)
    ObjectGroup ankle_pf_r: members=(fdl_r fhl_r gaslat_r gasmed_r perbrev_r perlong_r soleus_r tibpost_r)
    ObjectGroup everter_r: members=(edl_r perbrev_r perlong_r)
    ObjectGroup inverter_r: members=(ehl_r fdl_r fhl_r tibant_r tibpost_r)
    ObjectGroup hip_add_l: members=(addbrev_l addlong_l addmagDist_l addmagIsch_l addmagMid_l addmagProx_l bflh_l grac_l semimem_l semiten_l)
    ObjectGroup hip_abd_l: members=(glmax1_l glmed1_l glmed2_l glmed3_l glmin1_l glmin2_l glmin3_l piri_l sart_l tfl_l)
    ObjectGroup hip_flex_l: members=(addbrev_l addlong_l glmin1_l grac_l iliacus_l psoas_l recfem_l sart_l tfl_l)
    ObjectGroup hip_ext_l: members=(addlong_l addmagDist_l addmagIsch_l addmagMid_l addmagProx_l bflh_l glmax1_l glmax2_l glmax3_l glmed1_l glmed2_l glmed3_l glmin3_l semimem_l semiten_l)
    ObjectGroup hip_exrot_l: members=(glmin3_l piri_l)
    ObjectGroup hip_inrot_l: members=(glmed1_l glmed2_l glmed3_l glmin1_l iliacus_l psoas_l tfl_l)
    ObjectGroup knee_flex_l: members=(bflh_l bfsh_l gaslat_l gasmed_l grac_l sart_l semimem_l semiten_l)
    ObjectGroup knee_ext_l: members=(recfem_l vasint_l vaslat_l vasmed_l)
    ObjectGroup ankle_df_l: members=(edl_l ehl_l tibant_l)
    ObjectGroup ankle_pf_l: members=(fdl_l fhl_l gaslat_l gasmed_l perbrev_l perlong_l soleus_l tibpost_l)
    ObjectGroup everter_l: members=(edl_l perbrev_l perlong_l)
    ObjectGroup inverter_l: members=(ehl_l fdl_l fhl_l tibant_l tibpost_l)
  MarkerSet:
    Marker C7: torso (-0.06330488 0.3717837 -6.693748e-9) fixed=true
    Marker R_GTROC: femur_r (-0.02435031 -0.01632167 0.09222814) fixed=true
    Marker L_GTROC: femur_l (-0.02435031 -0.01632167 -0.09222814) fixed=true
    Marker R_LAT_FEM_EPI: femur_r (0.005654643 -0.3879174 0.05572964) fixed=true
    Marker L_LAT_FEM_EPI: femur_l (0.005654643 -0.3879174 -0.05572964) fixed=true
    Marker R_PSIS: pelvis (-0.1422329 0.0305899 0.04842173) fixed=true
    Marker L_PSIS: pelvis (-0.1344116 0.03164393 -0.05048814) fixed=true
    Marker R_ACROMION: torso (-0.05940826 0.330779 0.1759469) fixed=true
    Marker L_ACROMION: torso (-0.05940828 0.3307789 -0.1759467) fixed=true
    Marker R_ASIS: pelvis (0.008314743 -0.001514198 0.148584) fixed=true
    Marker L_ASIS: pelvis (0.008314741 -0.001514201 -0.1485842) fixed=true
    Marker R_MED_FEM_EPI: femur_r (0.00558648 -0.3918098 -0.05920899) fixed=true
    Marker R_MED_MAL: tibia_r (0.004714553 -0.3680106 -0.03527838) fixed=true
    Marker R_CALC: calcn_r (-0.008355803 0.00838513 -0.006033882) fixed=true
    Marker R_5TH: toes_r (-0.0324596 0.003665887 0.03896897) fixed=true
    Marker R_1ST: toes_r (0.003665887 0.003665887 -0.03225981) fixed=true
    Marker L_MED_FEM_EPI: femur_l (0.00558648 -0.3918098 0.05920899) fixed=true
    Marker L_LAT_MAL: tibia_l (-0.005561001 -0.3940914 -0.04983174) fixed=true
    Marker R_LAT_MAL: tibia_r (-0.007459992 -0.3930872 0.04877629) fixed=true
    Marker L_CALC: calcn_l (-0.008530006 0.0131186 0.004497824) fixed=true
    Marker L_1ST: toes_l (0.003665887 0.003665887 0.03239779) fixed=true
    Marker R_DORSAL: calcn_r (0.1429808 0.01766007 0.01750023) fixed=true
    Marker L_DORSAL: calcn_l (0.1520165 0.02046577 -0.00695423) fixed=true
    Marker L_5TH: toes_l (-0.03226905 0.003665887 -0.03889096) fixed=true
    Marker L_MED_MAL: tibia_l (0.01324907 -0.3680058 0.03544412) fixed=true
  ContactGeometrySet:
    ContactHalfSpace floor: socket_frame=/ground location=(0 0 0) orientation=(0 0 -1.570796)
    ContactSphere heel_r: socket_frame=/bodyset/calcn_r location=(0.001307528 -0.0081 0) radius=0.015
    ContactSphere latheel_r: socket_frame=/bodyset/calcn_r location=(0.02130753 -0.0081 0.025) radius=0.015
    ContactSphere medheel_r: socket_frame=/bodyset/calcn_r location=(0.02130753 -0.0081 -0.025) radius=0.015
    ContactSphere mid_r: socket_frame=/bodyset/calcn_r location=(0.08355376 -0.0081 0.0056) radius=0.015
    ContactSphere latmid_r: socket_frame=/bodyset/calcn_r location=(0.07215376 -0.0081 0.031) radius=0.015
    ContactSphere medmid_r: socket_frame=/bodyset/calcn_r location=(0.09165376 -0.0081 -0.023) radius=0.015
    ContactSphere mh1_r: socket_frame=/bodyset/calcn_r location=(0.182 -0.0081 -0.023) radius=0.015
    ContactSphere mh3_r: socket_frame=/bodyset/calcn_r location=(0.1658 -0.0081 0.0116) radius=0.015
    ContactSphere mh5_r: socket_frame=/bodyset/calcn_r location=(0.143 -0.0081 0.037) radius=0.015
    ContactSphere hallux_r: socket_frame=/bodyset/toes_r location=(0.0562 -0.006 -0.0181) radius=0.015
    ContactSphere othertoes_r: socket_frame=/bodyset/toes_r location=(0.0441 -0.006 0.0242) radius=0.015
    ContactSphere heel_l: socket_frame=/bodyset/calcn_l location=(0.001307528 -0.0081 0) radius=0.015
    ContactSphere latheel_l: socket_frame=/bodyset/calcn_l location=(0.02130753 -0.0081 -0.025) radius=0.015
    ContactSphere medheel_l: socket_frame=/bodyset/calcn_l location=(0.02130753 -0.0081 0.025) radius=0.015
    ContactSphere mid_l: socket_frame=/bodyset/calcn_l location=(0.08355376 -0.0081 -0.0056) radius=0.015
    ContactSphere latmid_l: socket_frame=/bodyset/calcn_l location=(0.07215376 -0.0081 -0.031) radius=0.015
    ContactSphere medmid_l: socket_frame=/bodyset/calcn_l location=(0.09165376 -0.0081 0.023) radius=0.015
    ContactSphere mh1_l: socket_frame=/bodyset/calcn_l location=(0.182 -0.0081 0.023) radius=0.015
    ContactSphere mh3_l: socket_frame=/bodyset/calcn_l location=(0.1658 -0.0081 -0.0116) radius=0.015
    ContactSphere mh5_l: socket_frame=/bodyset/calcn_l location=(0.143 -0.0081 -0.037) radius=0.015
    ContactSphere hallux_l: socket_frame=/bodyset/toes_l location=(0.0562 -0.006 0.0181) radius=0.015
    ContactSphere othertoes_l: socket_frame=/bodyset/toes_l location=(0.0441 -0.006 -0.0242) radius=0.015
