# OpenSim document version 40000
Model SEModel:
  gravity: 0 -9.80665 0
  length_units: meters
  force_units: N
  credits:
    Rajagopal Model w/ torso, updated knee, modified for movements involving high hip and knee flexion
  publications:
    Lai,A.K.M., Arnold, A.S., Wakeling, J.M. (2017) Why are antagonist muscles co-activated in my simulation? A musculoskeletal model for analysing human locomotor tasks. Annals of Biomedical Engineering
  Ground
  BodySet:
    Body pelvis: mass=12.89189 [kg] mass_center=(-0.06228293 0 0) inertia=(0.1475924 0.1475924 0.06251764 0 0 0)
        meshes=(r_pelvis.vtp l_pelvis.vtp sacrum.vtp)
      PhysicalOffsetFrame pelvis_imu_offset: socket_parent=.. translation=(-0.1459988 0.03257778 -0.001046833) [meters]
          orientation=(-1.737307 0.5195713 0.05064171) [radians]
      WrapCylinder Gmax1_at_pelvis_r: xyz_body_rotation=(-0.6 0.45 0) translation=(-0.06783289 -0.08085236 0.06626901)
          quadrant=-x radius=0.03630718 length=0.1473304
      WrapCylinder Gmax2_at_pelvis_r: xyz_body_rotation=(-0.75 0.39 0) translation=(-0.07047573 -0.06778531 0.07387365)
          quadrant=all radius=0.03686174 length=0.09529826
      WrapCylinder Gmax3_at_pelvis_r: xyz_body_rotation=(-0.1 0 0) translation=(-0.07311857 -0.07186876 0.07387365)
          quadrant=all radius=0.03412523 length=0.108369
      WrapCylinder Gmax1_at_pelvis_l: xyz_body_rotation=(0.6 -0.45 0) translation=(-0.06783289 -0.08085236 -0.06626901)
          quadrant=-x radius=0.03630718 length=0.1473304
      WrapCylinder Gmax2_at_pelvis_l: xyz_body_rotation=(0.75 -0.39 0)
          translation=(-0.07047573 -0.06778531 -0.07387365) quadrant=all radius=0.03686174 length=0.09529826
      WrapCylinder Gmax3_at_pelvis_l: xyz_body_rotation=(0.1 0 0) translation=(-0.07311857 -0.07186876 -0.07387365)
          quadrant=all radius=0.03412523 length=0.108369
      WrapCylinder PS_at_brim_r: xyz_body_rotation=(-0.25 -0.27 0.1) translation=(-0.06519005 -0.04900143 0.07126634)
          quadrant=-y radius=0.04337679 length=0.1058332
      WrapCylinder PS_at_brim_l: xyz_body_rotation=(0.25 0.27 0.1) translation=(-0.06519005 -0.04900143 -0.07126634)
          quadrant=-y radius=0.04337679 length=0.1058332
      WrapCylinder IL_at_brim_r: xyz_body_rotation=(-0.32 -0.24 0.9) translation=(-0.06254721 -0.05308488 0.08213012)
          quadrant=-y radius=0.04796086 length=0.105112
      WrapCylinder IL_at_brim_l: xyz_body_rotation=(0.32 0.24 0.9) translation=(-0.06254721 -0.05308488 -0.08213012)
          quadrant=-y radius=0.04796086 length=0.105112
    Body femur_r: mass=10.18193 mass_center=(0 -0.204291 0) inertia=(0.1662789 0.05174058 0.1662789 0 0 0)
        meshes=r_femur.vtp
      PhysicalOffsetFrame femur_r_imu_offset: socket_parent=.. translation=(0.01246018 -0.3720758 0.07143893)
          orientation=(-1.35585 0.1225195 -0.02667517)
      WrapCylinder GasLat_at_condyles_r: translation=(0.006267619 -0.4927019 0) quadrant=all radius=0.03193217
          length=0.13361
      WrapCylinder GasMed_at_condyles_r: translation=(0.006267619 -0.4927019 0) quadrant=all radius=0.03070401
          length=0.13361
      WrapCylinder KnExt_at_fem_r: xyz_body_rotation=(-0.0623366 0.0507601 0)
          translation=(0.004497994 -0.4839678 0.002793932) quadrant=all radius=0.03071393 length=0.1335432
      WrapCylinder KnExtVL_at_fem_r: xyz_body_rotation=(-0.0623366 0.0507601 0)
          translation=(0.002367004 -0.4839678 0.002793932) quadrant=all radius=0.03071393 length=0.1335432
      WrapCylinder AB_at_femshaft_r: xyz_body_rotation=(1.66157 0.186644 0)
          translation=(0.01835585 -0.1353068 0.03121798) quadrant=all radius=0.02134359 length=0.08434105
      WrapCylinder AL_at_femshaft_r: xyz_body_rotation=(1.77711 0.136489 0)
          translation=(0.03852417 -0.2786878 0.02019342) quadrant=all radius=0.02596724 length=0.1208947
      WrapCylinder AMprox_at_femshaft_r: xyz_body_rotation=(1.61126 0.18656 0)
          translation=(0.006497001 -0.08759855 0.03394095) quadrant=all radius=0.027302 length=0.08427412
      WrapCylinder AMmid_at_femshaft_r: xyz_body_rotation=(1.61139 0.13656 0)
          translation=(0.02884672 -0.1931283 0.02750255) quadrant=all radius=0.02769788 length=0.144362
      WrapCylinder AMdist_at_femshaft_r: xyz_body_rotation=(1.71188 0.186636 0)
          translation=(0.0396195 -0.3133296 0.01251204) quadrant=all radius=0.02818475 length=0.2413088
      WrapCylinder AMisch_at_condyles_r: xyz_body_rotation=(1.71115 -0.463363 0)
          translation=(-0.02839369 -0.4528423 -0.004214554) quadrant=all radius=0.05157082 length=0.2916575
      WrapCylinder PECT_at_femshaft_r: xyz_body_rotation=(1.81295 0.276344 0)
          translation=(0.007628607 -0.1015481 0.04067156) quadrant=all radius=0.01934856 length=0.06069283
    Body tibia_r: mass=4.058477 mass_center=(0 -0.2132763 0) inertia=(0.06126089 0.005458094 0.06126089 0 0 0)
        meshes=(r_tibia.vtp r_fibula.vtp)
      PhysicalOffsetFrame tibia_r_imu_offset: socket_parent=.. translation=(0.00504953 -0.3455822 -0.02437575)
          orientation=(-1.685044 0.2003044 0.02282707)
      WrapCylinder GasLat_at_shank_r: xyz_body_rotation=(2.96723 -0.279725 -1.47812)
          translation=(-0.00740582 -0.08453372 -0.003154466) quadrant=-y radius=0.05865071 length=0.09645779
      WrapCylinder GasMed_at_shank_r: xyz_body_rotation=(2.96723 0.0279725 -1.47812)
          translation=(-0.00740582 -0.08453372 -0.003154466) quadrant=-y radius=0.06300212 length=0.09615417
      WrapCylinder GR_at_condyles_r: xyz_body_rotation=(0 -0.4 0) translation=(-0.00300236 -0.02284695 0) quadrant=all
          radius=0.03841333 length=0.09628405
      WrapCylinder SM_at_condyles_r: xyz_body_rotation=(0 -0.1 0) translation=(-0.001000787 -0.02284695 0) quadrant=all
          radius=0.03692538 length=0.09563566
      WrapCylinder ST_at_condyles_r: xyz_body_rotation=(0 -0.2 0) translation=(-0.002001573 -0.02341812 0) quadrant=all
          radius=0.04545897 length=0.09577104
      WrapCylinder BF140_at_gastroc_r: translation=(-0.03903068 -0.06854085 0) quadrant=y radius=0.03104536
          length=0.1433848
    Body patella_r: mass=0.09436027 mass_center=(0.002130485 0.03124711 0)
        inertia=(4.706872e-6 2.150073e-5 2.150073e-5 0 0 0) meshes=r_patella.vtp
    Body talus_r: mass=0.1094667 mass_center=(0 0 0) inertia=(0.001187097 0.001187097 0.001187097 0 0 0)
        meshes=r_talus.vtp
    Body calcn_r: mass=1.368333 mass_center=(0.09494419 0.04370331 0)
        inertia=(0.001661936 0.004629679 0.004867099 0 0 0) meshes=r_foot.vtp
    Body toes_r: mass=0.2371048 mass_center=(0.03285069 0.008740662 -0.02542413)
        inertia=(0.0001187097 0.0002374195 0.001187097 0 0 0) meshes=r_bofoot.vtp
      PhysicalOffsetFrame toes_r_imu_offset: socket_parent=.. translation=(0 0.01 0)
          orientation=(-1.308401 0.1890971 -0.118267)
    Body femur_l: mass=10.18193 mass_center=(0 -0.209848 0) inertia=(0.1662789 0.05174058 0.1662789 0 0 0)
        meshes=l_femur.vtp
      PhysicalOffsetFrame femur_l_imu_offset: socket_parent=.. translation=(0.0125093 -0.3849168 -0.07172052)
          orientation=(-1.702346 -0.06327222 -0.008365982)
      WrapCylinder GasLat_at_condyles_l: translation=(0.006292329 -0.5061041 0) quadrant=all radius=0.03243423
          length=0.1341368
      WrapCylinder GasMed_at_condyles_l: translation=(0.006292329 -0.5061041 0) quadrant=all radius=0.03118676
          length=0.1341368
      WrapCylinder KnExt_at_fem_l: xyz_body_rotation=(0.0623366 -0.0507601 0)
          translation=(0.004515727 -0.4971325 -0.002804947) quadrant=all radius=0.03119551 length=0.1340825
      WrapCylinder KnExtVL_at_fem_l: xyz_body_rotation=(0.0623366 -0.0507601 0)
          translation=(0.002376336 -0.4971325 -0.002804947) quadrant=all radius=0.03119551 length=0.1340825
      WrapCylinder AB_at_femshaft_l: xyz_body_rotation=(-1.66157 -0.186644 0)
          translation=(0.01842822 -0.1389873 -0.03134106) quadrant=all radius=0.02143892 length=0.08655702
      WrapCylinder AL_at_femshaft_l: xyz_body_rotation=(-1.77711 -0.136489 0)
          translation=(0.03867605 -0.2862685 -0.02027303) quadrant=all radius=0.02608879 length=0.1240251
      WrapCylinder AMprox_at_femshaft_l: xyz_body_rotation=(-1.61126 -0.18656 0)
          translation=(0.006522615 -0.08998136 -0.03407476) quadrant=all radius=0.02742179 length=0.08650015
      WrapCylinder AMmid_at_femshaft_l: xyz_body_rotation=(-1.61139 -0.13656 0)
          translation=(0.02896044 -0.1983817 -0.02761098) quadrant=all radius=0.02781399 length=0.1482253
      WrapCylinder AMdist_at_femshaft_l: xyz_body_rotation=(-1.71188 -0.186636 0)
          translation=(0.0397757 -0.3218526 -0.01256137) quadrant=all radius=0.02831452 length=0.2475898
      WrapCylinder AMisch_at_condyles_l: xyz_body_rotation=(-1.71115 0.463363 0)
          translation=(-0.02850563 -0.4651603 0.00423117) quadrant=all radius=0.05191045 length=0.2982008
      WrapCylinder PECT_at_femshaft_l: xyz_body_rotation=(-1.81295 -0.276344 0)
          translation=(0.007658683 -0.1043104 -0.0408319) quadrant=all radius=0.01945532 length=0.06217326
    Body tibia_l: mass=4.058477 mass_center=(0 -0.2114807 0) inertia=(0.06126089 0.005458094 0.06126089 0 0 0)
        meshes=(l_tibia.vtp l_fibula.vtp)
      PhysicalOffsetFrame tibia_l_imu_offset: socket_parent=.. translation=(0.01419042 -0.3373513 0.02609531)
          orientation=(-1.518099 0.1463335 -0.00769093)
      WrapCylinder GasLat_at_shank_l: xyz_body_rotation=(-2.96723 0.279725 -1.47812)
          translation=(-0.007372407 -0.08382203 0.003140234) quadrant=-y radius=0.05826901 length=0.09601017
      WrapCylinder GasMed_at_shank_l: xyz_body_rotation=(-2.96723 -0.0279725 -1.47812)
          translation=(-0.007372407 -0.08382203 0.003140234) quadrant=-y radius=0.0625926 length=0.09570696
      WrapCylinder GR_at_condyles_l: xyz_body_rotation=(0 0.4 0) translation=(-0.002988814 -0.0226546 0) quadrant=all
          radius=0.03816166 length=0.09584964
      WrapCylinder SM_at_condyles_l: xyz_body_rotation=(0 0.1 0) translation=(-0.0009962712 -0.0226546 0) quadrant=all
          radius=0.03668345 length=0.09520417
      WrapCylinder ST_at_condyles_l: xyz_body_rotation=(0 0.2 0) translation=(-0.001992542 -0.02322097 0) quadrant=all
          radius=0.04516113 length=0.09533894
      WrapCylinder BF140_at_gastroc_l: translation=(-0.03885458 -0.06796381 0) quadrant=all radius=0.03084196
          length=0.1427379
    Body patella_l: mass=0.09436027 mass_center=(0.002188437 0.03209708 0)
        inertia=(4.966422e-6 2.268634e-5 2.268634e-5 0 0 0) meshes=l_patella.vtp
    Body talus_l: mass=0.1094667 mass_center=(0 0 0) inertia=(0.001187097 0.001187097 0.001187097 0 0 0)
        meshes=l_talus.vtp
    Body calcn_l: mass=1.368333 mass_center=(0.09548436 0.04399346 0)
        inertia=(0.001661936 0.004629679 0.004867099 0 0 0) meshes=l_foot.vtp
    Body toes_l: mass=0.2371048 mass_center=(0.03303759 0.008798691 0.02560985)
        inertia=(0.0001187097 0.0002374195 0.001187097 0 0 0) meshes=l_bofoot.vtp
      PhysicalOffsetFrame toes_l_imu_offset: socket_parent=.. translation=(0 0.01 0)
          orientation=(-1.764703 0.1968666 0.08801202)
    Body torso: mass=37.10876 mass_center=(-0.1356557 0.3290397 -0.1019708) inertia=(1.83972 0.9426304 1.785945 0 0 0)
        meshes=(hat_spine.vtp hat_jaw.vtp hat_skull.vtp hat_ribs_scap.vtp)
      PhysicalOffsetFrame torso_imu_offset: socket_parent=.. translation=(0.03677547 0.3754018 -0.009260474)
          orientation=(-1.637798 -0.516746 -0.03313981)
  JointSet:
    CustomJoint ground_pelvis: socket_parent_frame=ground_offset socket_child_frame=pelvis_offset
      Coordinate pelvis_tilt: default_value=-0.2132258 range=(-1.570796 1.570796) clamped=true
      Coordinate pelvis_list: default_value=0 range=(-1.570796 1.570796) clamped=true
      Coordinate pelvis_rotation: default_value=0 range=(-1.570796 1.570796) clamped=true
      Coordinate pelvis_tx: default_value=0 range=(-5 5) clamped=true
      Coordinate pelvis_ty: default_value=0.93 range=(-1 2) clamped=true
      Coordinate pelvis_tz: default_value=0 range=(-3 3) clamped=true
      PhysicalOffsetFrame ground_offset: socket_parent=/ground translation=(0 0 0)
      PhysicalOffsetFrame pelvis_offset: socket_parent=/bodyset/pelvis translation=(0 0 0)
      SpatialTransform:
        TransformAxis rotation1: coordinates=pelvis_tilt axis=(0 0 1) LinearFunction(coefficients=1 0)
        TransformAxis rotation2: coordinates=pelvis_list axis=(1 0 0) LinearFunction(coefficients=1 0)
        TransformAxis rotation3: coordinates=pelvis_rotation axis=(0 1 0) LinearFunction(coefficients=1 0)
        TransformAxis translation1: coordinates=pelvis_tx axis=(1 0 0) LinearFunction(coefficients=1 0)
        TransformAxis translation2: coordinates=pelvis_ty axis=(0 1 0) LinearFunction(coefficients=1 0)
        TransformAxis translation3: coordinates=pelvis_tz axis=(0 0 1) LinearFunction(coefficients=1 0)
    CustomJoint hip_r: socket_parent_frame=pelvis_offset socket_child_frame=femur_r_offset
      Coordinate hip_flexion_r: default_value=0.2132258 range=(-0.5235988 2.094395) clamped=true
      Coordinate hip_adduction_r: default_value=-1.199293e-9 range=(-0.08726646 0.08726646) clamped=true
      Coordinate hip_rotation_r: default_value=0 range=(-0.1745329 0.1745329) clamped=true
      PhysicalOffsetFrame pelvis_offset: socket_parent=/bodyset/pelvis translation=(-0.04957615 -0.06410204 0.0839335)
      PhysicalOffsetFrame femur_r_offset: socket_parent=/bodyset/femur_r translation=(0 0 0)
      SpatialTransform: axes_held_at_zero=(translation1 translation2 translation3)
        TransformAxis rotation1: coordinates=hip_flexion_r axis=(0 0 1) LinearFunction(coefficients=1 0)
        TransformAxis rotation2: coordinates=hip_adduction_r axis=(1 0 0) LinearFunction(coefficients=1 0)
        TransformAxis rotation3: coordinates=hip_rotation_r axis=(0 1 0) LinearFunction(coefficients=1 0)
    CustomJoint knee_r: socket_parent_frame=femur_r_offset socket_child_frame=tibia_r_offset
      Coordinate knee_angle_r: default_value=4.877666e-5 range=(0 2.443461) clamped=true
      PhysicalOffsetFrame femur_r_offset: socket_parent=/bodyset/femur_r
          translation=(-0.005640857 -0.4922212 -0.002338175) orientation=(-1.64157 1.44618 1.5708)
      PhysicalOffsetFrame tibia_r_offset: socket_parent=/bodyset/tibia_r
          translation=(-0.008095903 -0.00403797 -0.001419261) orientation=(-1.64157 1.44618 1.5708)
      SpatialTransform:
        TransformAxis rotation1: coordinates=knee_angle_r axis=(1 0 0) LinearFunction(coefficients=1 0)
        TransformAxis rotation2: coordinates=knee_angle_r axis=(0 0 1)
          SimmSpline: x=(0 0.174533 0.349066 0.523599 0.698132 0.872665 1.0472 1.22173 1.39626 1.5708 1.74533 1.91986 2.0944)
              y=(0 0.0126809 0.0226969 0.0296054 0.0332049 0.0335354 0.0308779 0.0257548 0.0189295 0.011407 0.00443314 -0.00050475 -0.0016782)
        TransformAxis rotation3: coordinates=knee_angle_r axis=(0 1 0)
          SimmSpline: x=(0 0.174533 0.349066 0.523599 0.698132 0.872665 1.0472 1.22173 1.39626 1.5708 1.74533 1.91986 2.0944)
              y=(0 0.059461 0.109399 0.150618 0.18392 0.210107 0.229983 0.24435 0.254012 0.25977 0.262428 0.262788 0.261654)
        TransformAxis translation1: coordinates=knee_angle_r axis=(1 0 0)
          MultiplierFunction: scale=1.253524
            SimmSpline: x=(0 0.174533 0.349066 0.523599 0.698132 0.872665 1.0472 1.22173 1.39626 1.5708 1.74533 1.91986 2.0944)
                y=(0 5.3e-5 0.000188 0.000378 0.000597 0.000825 0.001045 0.001247 0.00142 0.001558 0.001661 0.001728 0.00176)
        TransformAxis translation2: coordinates=knee_angle_r axis=(0 1 0)
          MultiplierFunction: scale=1.201712
            SimmSpline: x=(0 0.174533 0.349066 0.523599 0.698132 0.872665 1.0472 1.22173 1.39626 1.5708 1.74533 1.91986 2.0944)
                y=(0 0.000301 0.000143 -0.000401 -0.001233 -0.002243 -0.003316 -0.004346 -0.005239 -0.005924 -0.006361 -0.006539 -0.00648)
        TransformAxis translation3: coordinates=knee_angle_r axis=(0 0 1)
          MultiplierFunction: scale=1.3361
            SimmSpline: x=(0 0.174533 0.349066 0.523599 0.698132 0.872665 1.0472 1.22173 1.39626 1.5708 1.74533 1.91986 2.0944)
                y=(0 0.001055 0.002061 0.00289 0.003447 0.003676 0.003559 0.00311 0.002373 0.001418 0.000329 -0.000805 -0.001898)
    CustomJoint patellofemoral_r: socket_parent_frame=femur_r_offset socket_child_frame=patella_r_offset
      Coordinate knee_angle_r_beta: default_value=4.877666e-5 range=(-99999.9 99999.9) clamped=false
      PhysicalOffsetFrame femur_r_offset: socket_parent=/bodyset/femur_r
          translation=(-0.01014101 -0.4902504 -0.003674276)
      PhysicalOffsetFrame patella_r_offset: socket_parent=/bodyset/patella_r translation=(0 0 0)
      SpatialTransform: axes_held_at_zero=(rotation2 rotation3)
        TransformAxis rotation1: coordinates=knee_angle_r_beta axis=(0 0 1)
          SimmSpline: x=(0 0.174533 0.349066 0.523599 0.698132 0.872665 1.0472 1.22173 1.39626 1.5708 1.74533 1.91986 2.0944)
              y=(0.00113686 -0.00629212 -0.105582 -0.253683 -0.414245 -0.579047 -0.747244 -0.91799 -1.09044 -1.26379 -1.43763 -1.61186 -1.78634)
        TransformAxis translation1: coordinates=knee_angle_r_beta axis=(1 0 0)
          MultiplierFunction: scale=1.253524
            SimmSpline: x=(0 0.174533 0.349066 0.523599 0.698132 0.872665 1.0472 1.22173 1.39626 1.5708 1.74533 1.91986 2.0944)
                y=(0.0524 0.0488 0.0437 0.0371 0.0296 0.0216 0.0136 0.0057 -0.0019 -0.0088 -0.0148 -0.0196 -0.0227)
        TransformAxis translation2: coordinates=knee_angle_r_beta axis=(0 1 0)
          MultiplierFunction: scale=1.201712
            SimmSpline: x=(0 0.174533 0.349066 0.523599 0.698132 0.872665 1.0472 1.22173 1.39626 1.5708 1.74533 1.91986 2.0944)
                y=(-0.0108 -0.019 -0.0263 -0.0322 -0.0367 -0.0395 -0.0408 -0.0404 -0.0384 -0.0349 -0.0301 -0.0245 -0.0187)
        TransformAxis translation3: axis=(0 0 1) MultiplierFunction(scale=1.3361, Constant(value=0.00275))
    PinJoint ankle_r: socket_parent_frame=tibia_r_offset socket_child_frame=talus_r_offset
      Coordinate ankle_angle_r: default_value=-0.2691675 range=(-0.6981317 0.5235988) clamped=true
      PhysicalOffsetFrame tibia_r_offset: socket_parent=/bodyset/tibia_r translation=(-0.01000787 -0.456939 0)
          orientation=(0.175895 -0.105208 0.0186622)
      PhysicalOffsetFrame talus_r_offset: socket_parent=/bodyset/talus_r translation=(0 0 0)
          orientation=(0.175895 -0.105208 0.0186622)
    CustomJoint subtalar_r: socket_parent_frame=talus_r_offset socket_child_frame=calcn_r_offset
      Coordinate subtalar_angle_r: default_value=0 range=(-0.5235988 0.5235988) clamped=false
      PhysicalOffsetFrame talus_r_offset: socket_parent=/bodyset/talus_r
          translation=(-0.04488353 -0.03860698 0.007288854)
      PhysicalOffsetFrame calcn_r_offset: socket_parent=/bodyset/calcn_r translation=(0 0 0)
      SpatialTransform: axes_held_at_zero=(rotation2 rotation3 translation1 translation2 translation3)
        TransformAxis rotation1: coordinates=subtalar_angle_r axis=(0.7871796 0.6047475 -0.1209495)
            LinearFunction(coefficients=1 0)
    PinJoint mtp_r: socket_parent_frame=calcn_r_offset socket_child_frame=toes_r_offset
      Coordinate mtp_angle_r: default_value=0 range=(-0.5235988 0.5235988) clamped=true
      PhysicalOffsetFrame calcn_r_offset: socket_parent=/bodyset/calcn_r
          translation=(0.1645518 -0.001840621 0.0009939345)
      PhysicalOffsetFrame toes_r_offset: socket_parent=/bodyset/toes_r translation=(0 0 0)
    CustomJoint hip_l: socket_parent_frame=pelvis_offset socket_child_frame=femur_l_offset
      Coordinate hip_flexion_l: default_value=0.2132258 range=(-0.5235988 2.094395) clamped=true
      Coordinate hip_adduction_l: default_value=-1.199293e-9 range=(-0.08726646 0.08726646) clamped=true
      Coordinate hip_rotation_l: default_value=0 range=(-0.1745329 0.1745329) clamped=true
      PhysicalOffsetFrame pelvis_offset: socket_parent=/bodyset/pelvis translation=(-0.04957615 -0.06410204 -0.0839335)
      PhysicalOffsetFrame femur_l_offset: socket_parent=/bodyset/femur_l translation=(0 0 0)
      SpatialTransform: axes_held_at_zero=(translation1 translation2 translation3)
        TransformAxis rotation1: coordinates=hip_flexion_l axis=(0 0 1) LinearFunction(coefficients=1 0)
        TransformAxis rotation2: coordinates=hip_adduction_l axis=(1 0 0) LinearFunction(coefficients=-1 0)
        TransformAxis rotation3: coordinates=hip_rotation_l axis=(0 1 0) LinearFunction(coefficients=-1 0)
    CustomJoint knee_l: socket_parent_frame=femur_l_offset socket_child_frame=tibia_l_offset
      Coordinate knee_angle_l: default_value=4.877992e-5 range=(0 2.443461) clamped=true
      PhysicalOffsetFrame femur_l_offset: socket_parent=/bodyset/femur_l
          translation=(-0.005663096 -0.5056103 0.002347394) orientation=(1.64157 -1.44618 1.5708)
      PhysicalOffsetFrame tibia_l_offset: socket_parent=/bodyset/tibia_l
          translation=(-0.008059375 -0.004003975 0.001412858) orientation=(1.64157 -1.44618 1.5708)
      SpatialTransform:
        TransformAxis rotation1: coordinates=knee_angle_l axis=(-1 0 0) LinearFunction(coefficients=1 0)
        TransformAxis rotation2: coordinates=knee_angle_l axis=(0 0 1)
          SimmSpline: x=(0 0.174533 0.349066 0.523599 0.698132 0.872665 1.0472 1.22173 1.39626 1.5708 1.74533 1.91986 2.0944)
              y=(0 0.0126809 0.0226969 0.0296054 0.0332049 0.0335354 0.0308779 0.0257548 0.0189295 0.011407 0.00443314 -0.00050475 -0.0016782)
        TransformAxis rotation3: coordinates=knee_angle_l axis=(0 1 0)
          SimmSpline: x=(0 0.174533 0.349066 0.523599 0.698132 0.872665 1.0472 1.22173 1.39626 1.5708 1.74533 1.91986 2.0944)
              y=(0 -0.059461 -0.109399 -0.150618 -0.18392 -0.210107 -0.229983 -0.24435 -0.254012 -0.25977 -0.262428 -0.262788 -0.261654)
        TransformAxis translation1: coordinates=knee_angle_l axis=(1 0 0)
          MultiplierFunction: scale=1.258466
            SimmSpline: x=(0 0.174533 0.349066 0.523599 0.698132 0.872665 1.0472 1.22173 1.39626 1.5708 1.74533 1.91986 2.0944)
                y=(0 5.3e-5 0.000188 0.000378 0.000597 0.000825 0.001045 0.001247 0.00142 0.001558 0.001661 0.001728 0.00176)
        TransformAxis translation2: coordinates=knee_angle_l axis=(0 1 0)
          MultiplierFunction: scale=1.2344
            SimmSpline: x=(0 0.174533 0.349066 0.523599 0.698132 0.872665 1.0472 1.22173 1.39626 1.5708 1.74533 1.91986 2.0944)
                y=(0 0.000301 0.000143 -0.000401 -0.001233 -0.002243 -0.003316 -0.004346 -0.005239 -0.005924 -0.006361 -0.006539 -0.00648)
        TransformAxis translation3: coordinates=knee_angle_l axis=(0 0 1)
          MultiplierFunction: scale=1.341368
            SimmSpline: x=(0 0.174533 0.349066 0.523599 0.698132 0.872665 1.0472 1.22173 1.39626 1.5708 1.74533 1.91986 2.0944)
                y=(0 -0.001055 -0.002061 -0.00289 -0.003447 -0.003676 -0.003559 -0.00311 -0.002373 -0.001418 -0.000329 0.000805 0.001898)
    CustomJoint patellofemoral_l: socket_parent_frame=femur_l_offset socket_child_frame=patella_l_offset
      Coordinate knee_angle_l_beta: default_value=4.877992e-5 range=(-99999.9 99999.9) clamped=false
      PhysicalOffsetFrame femur_l_offset: socket_parent=/bodyset/femur_l
          translation=(-0.01018099 -0.5035859 0.003688761)
      PhysicalOffsetFrame patella_l_offset: socket_parent=/bodyset/patella_l translation=(0 0 0)
      SpatialTransform: axes_held_at_zero=(rotation2 rotation3)
        TransformAxis rotation1: coordinates=knee_angle_l_beta axis=(0 0 1)
          SimmSpline: x=(0 0.174533 0.349066 0.523599 0.698132 0.872665 1.0472 1.22173 1.39626 1.5708 1.74533 1.91986 2.0944)
              y=(0.00113686 -0.00629212 -0.105582 -0.253683 -0.414245 -0.579047 -0.747244 -0.91799 -1.09044 -1.26379 -1.43763 -1.61186 -1.78634)
        TransformAxis translation1: coordinates=knee_angle_l_beta axis=(1 0 0)
          MultiplierFunction: scale=1.258466
            SimmSpline: x=(0 0.174533 0.349066 0.523599 0.698132 0.872665 1.0472 1.22173 1.39626 1.5708 1.74533 1.91986 2.0944)
                y=(0.0524 0.0488 0.0437 0.0371 0.0296 0.0216 0.0136 0.0057 -0.0019 -0.0088 -0.0148 -0.0196 -0.0227)
        TransformAxis translation2: coordinates=knee_angle_l_beta axis=(0 1 0)
          MultiplierFunction: scale=1.2344
            SimmSpline: x=(0 0.174533 0.349066 0.523599 0.698132 0.872665 1.0472 1.22173 1.39626 1.5708 1.74533 1.91986 2.0944)
                y=(-0.0108 -0.019 -0.0263 -0.0322 -0.0367 -0.0395 -0.0408 -0.0404 -0.0384 -0.0349 -0.0301 -0.0245 -0.0187)
        TransformAxis translation3: axis=(0 0 1) MultiplierFunction(scale=1.341368, Constant(value=-0.00275))
    PinJoint ankle_l: socket_parent_frame=tibia_l_offset socket_child_frame=talus_l_offset
      Coordinate ankle_angle_l: default_value=-0.2691675 range=(-0.6981317 0.5235988) clamped=true
      PhysicalOffsetFrame tibia_l_offset: socket_parent=/bodyset/tibia_l translation=(-0.009962712 -0.4530921 0)
          orientation=(-0.175895 0.105208 0.0186622)
      PhysicalOffsetFrame talus_l_offset: socket_parent=/bodyset/talus_l translation=(0 0 0)
          orientation=(-0.175895 0.105208 0.0186622)
    CustomJoint subtalar_l: socket_parent_frame=talus_l_offset socket_child_frame=calcn_l_offset
      Coordinate subtalar_angle_l: default_value=0 range=(-0.5235988 0.5235988) clamped=false
      PhysicalOffsetFrame talus_l_offset: socket_parent=/bodyset/talus_l
          translation=(-0.04488353 -0.03860698 -0.007288854)
      PhysicalOffsetFrame calcn_l_offset: socket_parent=/bodyset/calcn_l translation=(0 0 0)
      SpatialTransform: axes_held_at_zero=(rotation2 rotation3 translation1 translation2 translation3)
        TransformAxis rotation1: coordinates=subtalar_angle_l axis=(-0.7871796 -0.6047475 -0.1209495)
            LinearFunction(coefficients=1 0)
    PinJoint mtp_l: socket_parent_frame=calcn_l_offset socket_child_frame=toes_l_offset
      Coordinate mtp_angle_l: default_value=0 range=(-0.5235988 0.5235988) clamped=true
      PhysicalOffsetFrame calcn_l_offset: socket_parent=/bodyset/calcn_l
          translation=(0.1645518 -0.001840621 -0.0009939345)
      PhysicalOffsetFrame toes_l_offset: socket_parent=/bodyset/toes_l translation=(0 0 0)
    WeldJoint lumbar: socket_parent_frame=pelvis_offset socket_child_frame=torso_offset
      PhysicalOffsetFrame pelvis_offset: socket_parent=/bodyset/pelvis translation=(-0.08871133 0.06656028 0)
      PhysicalOffsetFrame torso_offset: socket_parent=/bodyset/torso translation=(0 0 0)
  ConstraintSet:
    RollingOnSurfaceConstraint foot_roll_r: socket_rolling_body=/bodyset/calcn_r socket_surface_body=/ground
        surface_normal=(0 1 0) surface_height=0 friction_coefficient=0.8 contact_radius=0.02
    RollingOnSurfaceConstraint foot_roll_l: socket_rolling_body=/bodyset/calcn_l socket_surface_body=/ground
        surface_normal=(0 1 0) surface_height=0 friction_coefficient=0.8 contact_radius=0.02
    RollingOnSurfaceConstraint foot_roll_r2: socket_rolling_body=/bodyset/toes_r socket_surface_body=/ground
        surface_normal=(0 1 0) surface_height=0 friction_coefficient=0.8 contact_radius=0.02
    RollingOnSurfaceConstraint foot2_roll_l: socket_rolling_body=/bodyset/toes_l socket_surface_body=/ground
        surface_normal=(0 1 0) surface_height=0 friction_coefficient=0.8 contact_radius=0.02
    CoordinateCouplerConstraint patellofemoral_knee_angle_r_con: independent_coordinate_names=knee_angle_r
        dependent_coordinate_name=knee_angle_r_beta scale_factor=1
        coupled_coordinates_function=LinearFunction(coefficients=1 0)
    CoordinateCouplerConstraint patellofemoral_knee_angle_l_con: independent_coordinate_names=knee_angle_l
        dependent_coordinate_name=knee_angle_l_beta scale_factor=1
        coupled_coordinates_function=LinearFunction(coefficients=1 0)
  ForceSet:
    SmoothSphereHalfSpaceForce [values shared by the 22 below unless stated]: socket_half_space=/contactgeometryset/floor
        stiffness=3600000 [N/m^2] dissipation=2 [s/m] static_friction=0.95 dynamic_friction=0.3 viscous_friction=0.3
        transition_velocity=0.001 [m/s]
    SmoothSphereHalfSpaceForce SmoothSphereHalfSpaceForce_heel_r: socket_sphere=/contactgeometryset/heel_r
    SmoothSphereHalfSpaceForce SmoothSphereHalfSpaceForce_mh1_r: socket_sphere=/contactgeometryset/mh1_r
    SmoothSphereHalfSpaceForce SmoothSphereHalfSpaceForce_mh3_r: socket_sphere=/contactgeometryset/mh3_r
    SmoothSphereHalfSpaceForce SmoothSphereHalfSpaceForce_mh5_r: socket_sphere=/contactgeometryset/mh5_r
    SmoothSphereHalfSpaceForce SmoothSphereHalfSpaceForce_hallux_r: socket_sphere=/contactgeometryset/hallux_r
    SmoothSphereHalfSpaceForce SmoothSphereHalfSpaceForce_othertoes_r: socket_sphere=/contactgeometryset/othertoes_r
    SmoothSphereHalfSpaceForce SmoothSphereHalfSpaceForce_latheel_r: socket_sphere=/contactgeometryset/latheel_r
    SmoothSphereHalfSpaceForce SmoothSphereHalfSpaceForce_medheel_r: socket_sphere=/contactgeometryset/medheel_r
    SmoothSphereHalfSpaceForce SmoothSphereHalfSpaceForce_mid_r: socket_sphere=/contactgeometryset/mid_r
    SmoothSphereHalfSpaceForce SmoothSphereHalfSpaceForce_latmid_r: socket_sphere=/contactgeometryset/latmid_r
    SmoothSphereHalfSpaceForce SmoothSphereHalfSpaceForce_latmid_l: socket_sphere=/contactgeometryset/latmid_l
    SmoothSphereHalfSpaceForce SmoothSphereHalfSpaceForce_medmid_r: socket_sphere=/contactgeometryset/medmid_r
    SmoothSphereHalfSpaceForce SmoothSphereHalfSpaceForce_medmid_l: socket_sphere=/contactgeometryset/medmid_l
    SmoothSphereHalfSpaceForce SmoothSphereHalfSpaceForce_heel_l: socket_sphere=/contactgeometryset/heel_l
    SmoothSphereHalfSpaceForce SmoothSphereHalfSpaceForce_mh1_l: socket_sphere=/contactgeometryset/mh1_l
    SmoothSphereHalfSpaceForce SmoothSphereHalfSpaceForce_mh3_l: socket_sphere=/contactgeometryset/mh3_l
    SmoothSphereHalfSpaceForce SmoothSphereHalfSpaceForce_mh5_l: socket_sphere=/contactgeometryset/mh5_l
    SmoothSphereHalfSpaceForce SmoothSphereHalfSpaceForce_hallux_l: socket_sphere=/contactgeometryset/hallux_l
    SmoothSphereHalfSpaceForce SmoothSphereHalfSpaceForce_othertoes_l: socket_sphere=/contactgeometryset/othertoes_l
    SmoothSphereHalfSpaceForce SmoothSphereHalfSpaceForce_latheel_l: socket_sphere=/contactgeometryset/latheel_l
    SmoothSphereHalfSpaceForce SmoothSphereHalfSpaceForce_medheel_l: socket_sphere=/contactgeometryset/medheel_l
    SmoothSphereHalfSpaceForce SmoothSphereHalfSpaceForce_mid_l: socket_sphere=/contactgeometryset/mid_l
    Millard2012EquilibriumMuscle [values shared by the 80 below unless stated]: fiber_damping=0.01
        default_activation=0.01 minimum_activation=0.01
      ActiveForceLengthCurve: min_norm_active_fiber_length=0.25 transition_norm_fiber_length=0.77
          max_norm_active_fiber_length=1.9 shallow_ascending_slope=0.75 minimum_value=0
      ForceVelocityCurve: concentric_slope_at_vmax=0 concentric_slope_near_vmax=0.25 isometric_slope=5
          eccentric_slope_at_vmax=0 eccentric_slope_near_vmax=0.15 max_eccentric_velocity_force_multiplier=1.4
      FiberForceLengthCurve: strain_at_zero_force=0 strain_at_one_norm_force=0.7
      TendonForceLengthCurve
    Millard2012EquilibriumMuscle addbrev_r: max_isometric_force=540.7705 optimal_fiber_length=0.1234076
        tendon_slack_length=0.04243293 pennation_angle_at_optimal=0.1147809 [radians] ignore_tendon_compliance=true
      PathPoint P1: pelvis (-0.01682608 -0.07676891 0.01673021)
      PathPoint P2: femur_r (-0.002507048 -0.141802 0.0332689)
      PathWrap: wrap_object=AB_at_femshaft_r method=hybrid
    Millard2012EquilibriumMuscle addlong_r: max_isometric_force=763.269 optimal_fiber_length=0.1299524
        tendon_slack_length=0.1582961 pennation_angle_at_optimal=0.1377704
      PathPoint P1: pelvis (-0.006677576 -0.07260378 0.0205108)
      PathPoint P2: femur_r (0.01411468 -0.2876538 0.02115047)
      PathWrap: wrap_object=AL_at_femshaft_r method=hybrid
    Millard2012EquilibriumMuscle addmagDist_r: max_isometric_force=467.4058 optimal_fiber_length=0.2269278
        tendon_slack_length=0.1119024 pennation_angle_at_optimal=0.194705 ignore_tendon_compliance=true
      PathPoint P1: pelvis (-0.06522529 -0.1042669 0.04325954)
      PathPoint P2: femur_r (0.01410214 -0.3154494 0.02578673)
      PathWrap: wrap_object=AMdist_at_femshaft_r method=hybrid
    Millard2012EquilibriumMuscle addmagIsch_r: max_isometric_force=472.4159 optimal_fiber_length=0.1962536
        tendon_slack_length=0.2718188 pennation_angle_at_optimal=0.1680443
      PathPoint P1: pelvis (-0.07895044 -0.1059738 0.04531279)
      PathPoint P2: femur_r (0.006029449 -0.4662282 -0.04373056)
      PathWrap: wrap_object=AMisch_at_condyles_r method=hybrid
    Millard2012EquilibriumMuscle addmagMid_r: max_isometric_force=473.8012 optimal_fiber_length=0.1782191
        tendon_slack_length=0.0603482 pennation_angle_at_optimal=0.2073076 ignore_tendon_compliance=true
      PathPoint P1: pelvis (-0.04639065 -0.09861538 0.03100521)
      PathPoint P2: femur_r (0.003033528 -0.195158 0.03904085)
      PathWrap: wrap_object=AMmid_at_femshaft_r method=hybrid
    Millard2012EquilibriumMuscle addmagProx_r: max_isometric_force=532.6991 optimal_fiber_length=0.1275975
        tendon_slack_length=0.048724 pennation_angle_at_optimal=0.3114833 ignore_tendon_compliance=true
      PathPoint P1: pelvis (-0.02729173 -0.08783506 0.01482905)
      PathPoint P2: femur_r (-0.01914131 -0.094767 0.04278193)
      PathWrap: wrap_object=AMprox_at_femshaft_r method=hybrid
    Millard2012EquilibriumMuscle bflh140_r: max_isometric_force=1064.548 optimal_fiber_length=0.1197037
        tendon_slack_length=0.4078022 pennation_angle_at_optimal=0.1759182
      PathPoint bflh_r-P1: pelvis (-0.09161845 -0.09726784 0.0636617)
      PathPoint bflh_r-P2: tibia_r (-0.03438703 -0.04167284 0.03458442)
      PathPoint bflh_r-P3: tibia_r (-0.02706127 -0.05720876 0.03322704)
    Millard2012EquilibriumMuscle bfsh140_r: max_isometric_force=464.7963 optimal_fiber_length=0.1314172
        tendon_slack_length=0.1260761 pennation_angle_at_optimal=0.2642232 ignore_tendon_compliance=true
      PathPoint bfsh_r-P1: femur_r (0.006267619 -0.2536814 0.03126474)
      PathPoint bfsh_r-P2: tibia_r (-0.02868254 -0.03751469 0.030627)
      PathWrap: wrap_object=BF140_at_gastroc_r method=hybrid
    Millard2012EquilibriumMuscle edl_r: max_isometric_force=561.4405 optimal_fiber_length=0.07420117
        tendon_slack_length=0.3949635 pennation_angle_at_optimal=0.2182582
      PathPoint P1: tibia_r (-0.01601258 -0.1321696 0.01959593)
      PathPoint P2: tibia_r (0.0164129 -0.4295227 0.01070607)
      PathPoint P3: calcn_r (0.08725371 0.05244397 0.001162246)
      PathPoint P4: calcn_r (0.1534298 0.008012274 0.0188865)
      PathPoint P5: toes_r (0.0002848326 0.006846852 0.02222795)
      PathPoint P6: toes_r (0.04206028 -0.0005827108 0.03632018)
    Millard2012EquilibriumMuscle ehl_r: max_isometric_force=267.0855 optimal_fiber_length=0.07963684
        tendon_slack_length=0.3479271 pennation_angle_at_optimal=0.1972681
      PathPoint P1: tibia_r (-0.01401101 -0.1770639 0.01806649)
      PathPoint P2: tibia_r (0.007105584 -0.3323089 0.01567674)
      PathPoint P3: tibia_r (0.02001573 -0.4218689 -0.002676517)
      PathPoint P4: calcn_r (0.09209586 0.05666863 -0.03065423)
      PathPoint P5: calcn_r (0.1227628 0.04501441 -0.03733715)
      PathPoint P6: calcn_r (0.1646332 0.0202492 -0.0406786)
      PathPoint P7: toes_r (0.02829337 0.005972786 -0.03559378)
      PathPoint P8: toes_r (0.05345358 0.004953042 -0.02702222)
    Millard2012EquilibriumMuscle fdl_r: max_isometric_force=389.3107 optimal_fiber_length=0.04819289
        tendon_slack_length=0.409286 pennation_angle_at_optimal=0.2248391
      PathPoint P1: tibia_r (-0.002301809 -0.2092781 -0.001720618)
      PathPoint P2: tibia_r (-0.01761384 -0.4163857 -0.01185315)
      PathPoint P3: calcn_r (0.04139567 0.04588848 -0.0406786)
      PathPoint P4: calcn_r (0.06722049 0.02563928 -0.03820883)
      PathPoint P5: calcn_r (0.1574175 -0.01179989 0.01685256)
      PathPoint P6: toes_r (-0.00180394 -0.01136286 0.02135627)
      PathPoint P7: toes_r (0.02705909 -0.01034312 0.03123536)
      PathPoint P8: toes_r (0.04187039 -0.008740662 0.03515794)
    Millard2012EquilibriumMuscle fhl_r: max_isometric_force=862.051 optimal_fiber_length=0.05506998
        tendon_slack_length=0.3702747 pennation_angle_at_optimal=0.2580255
      PathPoint P1: tibia_r (-0.03102438 -0.2470898 0.01911798)
      PathPoint P2: tibia_r (-0.02421903 -0.4193558 -0.007264831)
      PathPoint P3: calcn_r (0.03550913 0.04020705 -0.03501266)
      PathPoint P4: calcn_r (0.09855207 0.009906084 -0.03719187)
      PathPoint P5: calcn_r (0.1638737 -0.007720918 -0.03908052)
      PathPoint P6: toes_r (0.01471635 -0.009323373 -0.03849939)
      PathPoint P7: toes_r (0.05335863 -0.01485913 -0.02629581)
    Millard2012EquilibriumMuscle gaslat140_r: max_isometric_force=1407.207 optimal_fiber_length=0.07707841
        tendon_slack_length=0.4177873 pennation_angle_at_optimal=0.2102268
      PathPoint gaslat_r-P1: femur_r (0.002507048 -0.4578522 0.0275103)
      PathPoint gaslat_r-P2: calcn_r (0.004177544 0.04516009 -0.007699879)
      PathWrap: wrap_object=GasLat_at_shank_r method=hybrid
      PathWrap pathwrap_0: wrap_object=GasLat_at_condyles_r method=hybrid
    Millard2012EquilibriumMuscle gasmed_r: max_isometric_force=2787.029 optimal_fiber_length=0.06670215
        tendon_slack_length=0.4375209 pennation_angle_at_optimal=0.1656816
      PathPoint P1: femur_r (0.007521143 -0.4626591 -0.0293942)
      PathPoint P2: calcn_r (0.004177544 0.04516009 -0.007699879)
      PathWrap: wrap_object=GasMed_at_shank_r method=hybrid
      PathWrap pathwrap_0: wrap_object=GasMed_at_condyles_r method=hybrid
    Millard2012EquilibriumMuscle glmax1_r: max_isometric_force=1010.865 optimal_fiber_length=0.1444672
        tendon_slack_length=0.08579581 pennation_angle_at_optimal=0.3540118 ignore_tendon_compliance=true
      PathPoint P1: pelvis (-0.1084445 0.02817582 0.06116304)
      PathPoint P2: pelvis (-0.110735 -0.01976391 0.08462878)
      PathPoint P3: femur_r (-0.05565646 -0.03917581 0.04035023)
      PathPoint P4: femur_r (-0.03472261 -0.06801689 0.06279671)
      PathWrap: wrap_object=Gmax1_at_pelvis_r method=hybrid
    Millard2012EquilibriumMuscle glmax2_r: max_isometric_force=1365.393 optimal_fiber_length=0.1626579
        tendon_slack_length=0.1129281 pennation_angle_at_optimal=0.3673821 ignore_tendon_compliance=true
      PathPoint P1: pelvis (-0.1160207 0.007105207 0.05019063)
      PathPoint P2: pelvis (-0.1183992 -0.04973645 0.08832247)
      PathPoint P3: femur_r (-0.05640857 -0.07017998 0.03366973)
      PathPoint P4: femur_r (-0.01955497 -0.1220939 0.0559826)
      PathWrap: wrap_object=Gmax2_at_pelvis_r method=hybrid
    Millard2012EquilibriumMuscle glmax3_r: max_isometric_force=866.9087 optimal_fiber_length=0.1862803
        tendon_slack_length=0.1148915 pennation_angle_at_optimal=0.3824161 ignore_tendon_compliance=true
      PathPoint P1: pelvis (-0.1145231 -0.04287625 0.009777395)
      PathPoint P2: pelvis (-0.1121445 -0.103148 0.04725741)
      PathPoint P3: femur_r (-0.03522402 -0.1351926 0.01255934)
      PathPoint P4: femur_r (-0.007521143 -0.1705229 0.05491372)
      PathWrap: wrap_object=Gmax3_at_pelvis_r method=hybrid
    Millard2012EquilibriumMuscle glmed1_r: max_isometric_force=1197.586 optimal_fiber_length=0.06637084
        tendon_slack_length=0.05074808 pennation_angle_at_optimal=0.3165559 ignore_tendon_compliance=true
      PathPoint P1: pelvis (-0.03920213 0.02000892 0.1273234)
      PathPoint P2: femur_r (-0.02732682 -0.01406003 0.07415356)
    Millard2012EquilibriumMuscle glmed2_r: max_isometric_force=826.7039 optimal_fiber_length=0.07011908
        tendon_slack_length=0.06267379 pennation_angle_at_optimal=0.3165559 ignore_tendon_compliance=true
      PathPoint P1: pelvis (-0.07488047 0.02580742 0.07333046)
      PathPoint P2: femur_r (-0.03234091 -0.006969929 0.07041248)
    Millard2012EquilibriumMuscle glmed3_r: max_isometric_force=891.2439 optimal_fiber_length=0.07608036
        tendon_slack_length=0.04714152 pennation_angle_at_optimal=0.3165559 ignore_tendon_compliance=true
      PathPoint P1: pelvis (-0.1014851 -0.005961841 0.05714344)
      PathPoint P2: femur_r (-0.03873389 -0.005648046 0.06920999)
    Millard2012EquilibriumMuscle glmin1_r: max_isometric_force=384.9307 optimal_fiber_length=0.06764004
        tendon_slack_length=0.01605236 pennation_angle_at_optimal=0.1745329 ignore_tendon_compliance=true
      PathPoint P1: pelvis (-0.04087592 -0.01216869 0.1132005)
      PathPoint P2: femur_r (-0.009025371 -0.0124978 0.07482161)
    Millard2012EquilibriumMuscle glmin2_r: max_isometric_force=403.2276 optimal_fiber_length=0.0568546
        tendon_slack_length=0.02649734 pennation_angle_at_optimal=0 ignore_tendon_compliance=true
      PathPoint P1: pelvis (-0.05426631 -0.01159701 0.1054872)
      PathPoint P2: femur_r (-0.01203383 -0.0124978 0.07482161)
    Millard2012EquilibriumMuscle glmin3_r: max_isometric_force=449.0362 optimal_fiber_length=0.04002375
        tendon_slack_length=0.0535818 pennation_angle_at_optimal=0.01745329
      PathPoint P1: pelvis (-0.06950669 -0.0126587 0.0866929)
      PathPoint P2: femur_r (-0.01692257 -0.009974209 0.07348551)
    Millard2012EquilibriumMuscle grac_r: max_isometric_force=227.5228 optimal_fiber_length=0.2801866
        tendon_slack_length=0.2115714 pennation_angle_at_optimal=0.1720016 ignore_tendon_compliance=true
      PathPoint P1: pelvis (-0.04172163 -0.1056144 0.02668142)
      PathPoint P2: tibia_r (-0.01843449 -0.05431863 -0.02830417)
      PathPoint P3: tibia_r (0.0017814 -0.07953024 -0.01503629)
      PathWrap: wrap_object=GR_at_condyles_r method=hybrid
    Millard2012EquilibriumMuscle iliacus_r: max_isometric_force=1049.275 optimal_fiber_length=0.1016789
        tendon_slack_length=0.09168337 pennation_angle_at_optimal=0.279914 ignore_tendon_compliance=true
      PathPoint P1: pelvis (-0.05329727 0.02523574 0.0915816)
      PathPoint P2: pelvis (-0.01189278 -0.04548966 0.08213012)
      PathPoint P3: femur_r (-0.002883105 -0.06789672 0.01857179)
      PathPoint P4: femur_r (-0.01529299 -0.07654905 0.02618756)
      PathWrap: wrap_object=IL_at_brim_r method=hybrid range=(2 3)
    Millard2012EquilibriumMuscle perbrev_r: max_isometric_force=466.1674 optimal_fiber_length=0.05074853
        tendon_slack_length=0.1649076 pennation_angle_at_optimal=0.2052361
      PathPoint P1: tibia_r (-0.02431911 -0.2892424 0.02399306)
      PathPoint P2: tibia_r (-0.03392666 -0.4447159 0.02380188)
      PathPoint P3: tibia_r (-0.02852242 -0.457396 0.02437542)
      PathPoint P4: calcn_r (0.04471871 0.03933298 0.03385041)
      PathPoint P5: calcn_r (0.06427722 0.03190342 0.04983129)
    Millard2012EquilibriumMuscle perlong_r: max_isometric_force=974.0319 optimal_fiber_length=0.05802129
        tendon_slack_length=0.3794464 pennation_angle_at_optimal=0.2479525
      PathPoint P1: tibia_r (-0.02001573 -0.1568443 0.02695635)
      PathPoint P2: tibia_r (-0.03172493 -0.4455155 0.0226548)
      PathPoint P3: tibia_r (-0.02722139 -0.4585383 0.02294157)
      PathPoint P4: calcn_r (0.04158555 0.03350587 0.03210704)
      PathPoint P5: calcn_r (0.06465699 0.01544184 0.04125973)
      PathPoint P6: calcn_r (0.08089245 0.01005176 0.01714313)
      PathPoint P7: calcn_r (0.1142179 0.0123826 -0.02673165)
    Millard2012EquilibriumMuscle piri_r: max_isometric_force=1057.069 optimal_fiber_length=0.02738278
        tendon_slack_length=0.1210174 pennation_angle_at_optimal=0.1745329
      PathPoint P1: pelvis (-0.08968918 -0.005332989 0.01467696)
      PathPoint P2: pelvis (-0.08987418 -0.02503973 0.0661821)
      PathPoint P3: femur_r (-0.01855215 -0.004326163 0.05838758)
    Millard2012EquilibriumMuscle psoas_r: max_isometric_force=1506.369 optimal_fiber_length=0.1093708
        tendon_slack_length=0.0931319 pennation_angle_at_optimal=0.2155251 ignore_tendon_compliance=true
      PathPoint P1: pelvis (-0.05338537 0.05063481 0.04236871)
      PathPoint P2: pelvis (-0.01805941 -0.05341156 0.07126634)
      PathPoint P3: femur_r (-0.01654651 -0.05611995 0.006146061)
      PathPoint P4: femur_r (-0.02945781 -0.0629697 0.01175768)
      PathWrap: wrap_object=PS_at_brim_r method=hybrid range=(2 3)
    Millard2012EquilibriumMuscle recfem_r: max_isometric_force=1863.057 optimal_fiber_length=0.08907766
        tendon_slack_length=0.5285979 pennation_angle_at_optimal=0.2170149
      PathPoint P1: pelvis (-0.02114272 -0.03168759 0.101359)
      PathPoint P2: patella_r (0.01183603 0.05799654 0.000828522)
      PathPoint P3: patella_r (0.01432159 0.05172344 -0.001183603)
      PathPoint P4: patella_r (0.005918014 0.002923499 3.550808e-5)
      PathPoint P5: tibia_r (0.03262564 -0.07210498 -0.0004492725)
      PathWrap: wrap_object=KnExt_at_fem_r method=hybrid
    Millard2012EquilibriumMuscle sart_r: max_isometric_force=217.3487 optimal_fiber_length=0.45972
        tendon_slack_length=0.1414521 pennation_angle_at_optimal=0.02613542 ignore_tendon_compliance=true
      PathPoint P1: pelvis (-0.01717846 -0.01274037 0.1147214)
      PathPoint P2: femur_r (-0.003760571 -0.4287708 -0.05624982)
      PathPoint P3: tibia_r (-0.02511974 -0.04580814 -0.03489031)
      PathPoint P4: tibia_r (-0.01591251 -0.06842662 -0.02523573)
      PathPoint P5: tibia_r (0.0136107 -0.09253015 -0.002485337)
    Millard2012EquilibriumMuscle semimem_r: max_isometric_force=1786.277 optimal_fiber_length=0.1053753
        tendon_slack_length=0.4104735 pennation_angle_at_optimal=0.2545615
      PathPoint P1: pelvis (-0.08694943 -0.09310272 0.06670356)
      PathPoint P2: tibia_r (-0.02702124 -0.04683625 -0.01873562)
      PathWrap: wrap_object=SM_at_condyles_r method=hybrid
    Millard2012EquilibriumMuscle semiten_r: max_isometric_force=480.8976 optimal_fiber_length=0.2357908
        tendon_slack_length=0.3020065 pennation_angle_at_optimal=0.241295
      PathPoint P1: pelvis (-0.09144226 -0.1023313 0.05594843)
      PathPoint P2: tibia_r (-0.03122454 -0.05803125 -0.02189008)
      PathPoint P3: tibia_r (0.001901494 -0.08830346 -0.01118402)
      PathWrap: wrap_object=ST_at_condyles_r method=hybrid
    Millard2012EquilibriumMuscle soleus_r: max_isometric_force=5588.32 optimal_fiber_length=0.04877922
        tendon_slack_length=0.3119099 pennation_angle_at_optimal=0.3814289
      PathPoint P1: tibia_r (-0.007605978 -0.104639 0.009367809)
      PathPoint P2: calcn_r (0.004177544 0.04516009 -0.007699879)
    Millard2012EquilibriumMuscle tfl_r: max_isometric_force=361.2003 optimal_fiber_length=0.1077267
        tendon_slack_length=0.5097141 pennation_angle_at_optimal=0.05235988
      PathPoint P1: pelvis (-0.02739744 0.01747718 0.1348194)
      PathPoint P2: femur_r (0.0368536 -0.1195703 0.07976518)
      PathPoint P3: femur_r (0.0134127 -0.4866933 0.04328965)
      PathPoint P4: tibia_r (0.01080849 -0.04683625 0.0330741)
    Millard2012EquilibriumMuscle tibant_r: max_isometric_force=1101.876 optimal_fiber_length=0.07608127
        tendon_slack_length=0.2678562 pennation_angle_at_optimal=0.1951828
      PathPoint P1: tibia_r (0.01541211 -0.149876 0.01548556)
      PathPoint P2: tibia_r (0.02511974 -0.2177314 0.01223551)
      PathPoint P3: tibia_r (0.02331833 -0.417985 -0.01261786)
      PathPoint P4: calcn_r (0.1107049 0.02593063 -0.04431062)
    Millard2012EquilibriumMuscle tibpost_r: max_isometric_force=1560.732 optimal_fiber_length=0.04187619
        tendon_slack_length=0.3110577 pennation_angle_at_optimal=0.2264891
      PathPoint P1: tibia_r (-0.004103225 -0.1489621 0.009845758)
      PathPoint P2: tibia_r (-0.0164129 -0.417528 -0.01672823)
      PathPoint P3: calcn_r (0.03959173 0.04865635 -0.04155029)
      PathPoint P4: calcn_r (0.07329691 0.02316276 -0.04082389)
    Millard2012EquilibriumMuscle vasint_r: max_isometric_force=1413.935 optimal_fiber_length=0.1409801
        tendon_slack_length=0.2470163 pennation_angle_at_optimal=0.06309973
      PathPoint P1: femur_r (0.03635219 -0.2312094 0.04141911)
      PathPoint P2: femur_r (0.04199305 -0.2504368 0.03807886)
      PathPoint P3: patella_r (0.006864896 0.05681293 -0.0007101617)
      PathPoint P4: patella_r (0.005918014 0.002923499 -0.0004616051)
      PathPoint P5: tibia_r (0.03259562 -0.07219636 0.0004110365)
      PathWrap: wrap_object=KnExt_at_fem_r method=hybrid
    Millard2012EquilibriumMuscle vaslat140_r: max_isometric_force=4291.342 optimal_fiber_length=0.1413937
        tendon_slack_length=0.2670769 pennation_angle_at_optimal=0.2528673
      PathPoint vaslat_r-P1: femur_r (0.006016914 -0.2227974 0.0466299)
      PathPoint vaslat_r-P2: femur_r (0.03371979 -0.3113636 0.0546465)
      PathPoint vaslat_r-P3: patella_r (0.01219111 0.0500664 0.0166888)
      PathPoint vaslat_r-P4: patella_r (0.005918014 0.002923499 0.008675808)
      PathPoint vaslat_r-P5: tibia_r (0.03256559 -0.07240199 0.004884643)
      PathWrap: wrap_object=KnExtVL_at_fem_r method=hybrid
    Millard2012EquilibriumMuscle vasmed_r: max_isometric_force=2290.53 optimal_fiber_length=0.1326248
        tendon_slack_length=0.2507814 pennation_angle_at_optimal=0.4222225
      PathPoint P1: femur_r (0.01754933 -0.2522393 0.02511868)
      PathPoint P2: femur_r (0.04462545 -0.332754 0.00120249)
      PathPoint P3: patella_r (0.007456698 0.05267032 -0.02012125)
      PathPoint P4: patella_r (0.005918014 0.002923499 -0.01006062)
      PathPoint P5: tibia_r (0.03192509 -0.07261903 -0.006480994)
      PathWrap: wrap_object=KnExt_at_fem_r method=hybrid
    Millard2012EquilibriumMuscle addbrev_l: max_isometric_force=530.3194 optimal_fiber_length=0.1256694
        tendon_slack_length=0.04321064 pennation_angle_at_optimal=0.1147809 ignore_tendon_compliance=true
      PathPoint P1: pelvis (-0.01682608 -0.07676891 -0.01673021)
      PathPoint P2: femur_l (-0.002516932 -0.1456592 -0.03340006)
      PathWrap: wrap_object=AB_at_femshaft_l method=hybrid
    Millard2012EquilibriumMuscle addlong_l: max_isometric_force=744.0236 optimal_fiber_length=0.1332697
        tendon_slack_length=0.1623369 pennation_angle_at_optimal=0.1377704
      PathPoint P1: pelvis (-0.006677576 -0.07260378 -0.0205108)
      PathPoint P2: femur_l (0.01417032 -0.2954784 -0.02123385)
      PathWrap: wrap_object=AL_at_femshaft_l method=hybrid
    Millard2012EquilibriumMuscle addmagDist_l: max_isometric_force=453.9278 optimal_fiber_length=0.2335772
        tendon_slack_length=0.1151813 pennation_angle_at_optimal=0.194705 ignore_tendon_compliance=true
      PathPoint P1: pelvis (-0.06522529 -0.1042669 -0.04325954)
      PathPoint P2: femur_l (0.01415774 -0.3240301 -0.0258884)
      PathWrap: wrap_object=AMdist_at_femshaft_l method=hybrid
    Millard2012EquilibriumMuscle addmagIsch_l: max_isometric_force=458.7941 optimal_fiber_length=0.2020814
        tendon_slack_length=0.2798905 pennation_angle_at_optimal=0.1680443
      PathPoint P1: pelvis (-0.07895044 -0.1059738 -0.04531279)
      PathPoint P2: femur_l (0.00605322 -0.4789102 0.04390297)
      PathWrap: wrap_object=AMisch_at_condyles_l method=hybrid
    Millard2012EquilibriumMuscle addmagMid_l: max_isometric_force=461.4048 optimal_fiber_length=0.1827406
        tendon_slack_length=0.06187925 pennation_angle_at_optimal=0.2073076 ignore_tendon_compliance=true
      PathPoint P1: pelvis (-0.04639065 -0.09861538 -0.03100521)
      PathPoint P2: femur_l (0.003045487 -0.2004666 -0.03919476)
      PathWrap: wrap_object=AMmid_at_femshaft_l method=hybrid
    Millard2012EquilibriumMuscle addmagProx_l: max_isometric_force=526.2606 optimal_fiber_length=0.1289623
        tendon_slack_length=0.04924514 pennation_angle_at_optimal=0.3114833 ignore_tendon_compliance=true
      PathPoint P1: pelvis (-0.02729173 -0.08783506 -0.01482905)
      PathPoint P2: femur_l (-0.01921677 -0.0973448 -0.04295059)
      PathWrap: wrap_object=AMprox_at_femshaft_l method=hybrid
    Millard2012EquilibriumMuscle bflh140_l: max_isometric_force=1038.718 optimal_fiber_length=0.1226785
        tendon_slack_length=0.4179366 pennation_angle_at_optimal=0.1759182
      PathPoint bflh_l-P1: pelvis (-0.09161845 -0.09726784 -0.0636617)
      PathPoint bflh_l-P2: tibia_l (-0.03423188 -0.041322 -0.03442838)
      PathPoint bflh_l-P3: tibia_l (-0.02693917 -0.05672713 -0.03307713)
    Millard2012EquilibriumMuscle bfsh140_l: max_isometric_force=454.5792 optimal_fiber_length=0.1343722
        tendon_slack_length=0.1289111 pennation_angle_at_optimal=0.2642232 ignore_tendon_compliance=true
      PathPoint bfsh_l-P1: femur_l (0.006292329 -0.2605819 -0.031388)
      PathPoint bfsh_l-P2: tibia_l (-0.02855313 -0.03719886 -0.03048882)
      PathWrap: wrap_object=BF140_at_gastroc_l method=hybrid
    Millard2012EquilibriumMuscle edl_l: max_isometric_force=564.018 optimal_fiber_length=0.07386131
        tendon_slack_length=0.3931545 pennation_angle_at_optimal=0.2182582
      PathPoint P1: tibia_l (-0.01594034 -0.1310569 -0.01950751)
      PathPoint P2: tibia_l (0.01633885 -0.4259065 -0.01065776)
      PathPoint P3: calcn_l (0.08775013 0.05279215 -0.001170736)
      PathPoint P4: calcn_l (0.1543027 0.008065467 -0.01902446)
      PathPoint P5: toes_l (0.0002864531 0.006892308 -0.02239033)
      PathPoint P6: toes_l (0.04229957 -0.0005865794 -0.0365855)
    Millard2012EquilibriumMuscle ehl_l: max_isometric_force=268.0161 optimal_fiber_length=0.07935781
        tendon_slack_length=0.346708 pennation_angle_at_optimal=0.1972681
      PathPoint P1: tibia_l (-0.0139478 -0.1755732 -0.01798498)
      PathPoint P2: tibia_l (0.007073525 -0.3295112 -0.01560601)
      PathPoint P3: tibia_l (0.01992542 -0.4183172 0.002664441)
      PathPoint P4: calcn_l (0.09261983 0.05704485 0.03087817)
      PathPoint P5: calcn_l (0.1234613 0.04531326 0.0376099)
      PathPoint P6: calcn_l (0.1655699 0.02038363 0.04097577)
      PathPoint P7: toes_l (0.02845434 0.006012439 0.03585379)
      PathPoint P8: toes_l (0.0537577 0.004985925 0.02721962)
    Millard2012EquilibriumMuscle fdl_l: max_isometric_force=390.3847 optimal_fiber_length=0.04805878
        tendon_slack_length=0.4081471 pennation_angle_at_optimal=0.2248391
      PathPoint P1: tibia_l (-0.002291424 -0.2075162 0.001712855)
      PathPoint P2: tibia_l (-0.01753437 -0.4128801 0.01179967)
      PathPoint P3: calcn_l (0.04163118 0.04619313 0.04097577)
      PathPoint P4: calcn_l (0.06760293 0.02580949 0.03848795)
      PathPoint P5: calcn_l (0.1583131 -0.01187823 -0.01697567)
      PathPoint P6: toes_l (-0.001814203 -0.0114383 -0.02151228)
      PathPoint P7: toes_l (0.02721304 -0.01041178 -0.03146353)
      PathPoint P8: toes_l (0.0421086 -0.008798691 -0.03541477)
    Millard2012EquilibriumMuscle fhl_l: max_isometric_force=864.169 optimal_fiber_length=0.05493302
        tendon_slack_length=0.3693539 pennation_angle_at_optimal=0.2580255
      PathPoint P1: tibia_l (-0.03088441 -0.2450095 -0.01903172)
      PathPoint P2: tibia_l (-0.02410976 -0.4158252 0.007232054)
      PathPoint P3: calcn_l (0.03571115 0.04047398 0.03526843)
      PathPoint P4: calcn_l (0.09911277 0.00997185 0.03746356)
      PathPoint P5: calcn_l (0.164806 -0.007772177 0.039366)
      PathPoint P6: toes_l (0.01480008 -0.009385271 0.03878063)
      PathPoint P7: toes_l (0.05366221 -0.01495778 0.02648791)
    Millard2012EquilibriumMuscle gaslat140_l: max_isometric_force=1418.345 optimal_fiber_length=0.07647043
        tendon_slack_length=0.4144919 pennation_angle_at_optimal=0.2102268
      PathPoint gaslat_l-P1: femur_l (0.002516932 -0.4703065 -0.02761876)
      PathPoint gaslat_l-P2: calcn_l (0.004201312 0.04545991 0.007756127)
      PathWrap: wrap_object=GasLat_at_shank_l method=hybrid
      PathWrap pathwrap_0: wrap_object=GasLat_at_condyles_l method=hybrid
    Millard2012EquilibriumMuscle gasmed_l: max_isometric_force=2810.061 optimal_fiber_length=0.06618168
        tendon_slack_length=0.4341069 pennation_angle_at_optimal=0.1656816
      PathPoint P1: femur_l (0.007550795 -0.4752441 0.02951009)
      PathPoint P2: calcn_l (0.004201312 0.04545991 0.007756127)
      PathWrap: wrap_object=GasMed_at_shank_l method=hybrid
      PathWrap pathwrap_0: wrap_object=GasMed_at_condyles_l method=hybrid
    Millard2012EquilibriumMuscle glmax1_l: max_isometric_force=1002.019 optimal_fiber_length=0.1457303
        tendon_slack_length=0.08654597 pennation_angle_at_optimal=0.3540118 ignore_tendon_compliance=true
      PathPoint P1: pelvis (-0.1084445 0.02817582 -0.06116304)
      PathPoint P2: pelvis (-0.110735 -0.01976391 -0.08462878)
      PathPoint P3: femur_l (-0.05587588 -0.04024145 -0.04050931)
      PathPoint P4: femur_l (-0.0348595 -0.06986705 -0.06304428)
      PathWrap: wrap_object=Gmax1_at_pelvis_l method=hybrid
    Millard2012EquilibriumMuscle glmax2_l: max_isometric_force=1347.469 optimal_fiber_length=0.1648153
        tendon_slack_length=0.1144259 pennation_angle_at_optimal=0.3673821 ignore_tendon_compliance=true
      PathPoint P1: pelvis (-0.1160207 0.007105207 -0.05019063)
      PathPoint P2: pelvis (-0.1183992 -0.04973645 -0.08832247)
      PathPoint P3: femur_l (-0.05663096 -0.07208897 -0.03380247)
      PathPoint P4: femur_l (-0.01963207 -0.1254151 -0.05620331)
      PathWrap: wrap_object=Gmax2_at_pelvis_l method=hybrid
    Millard2012EquilibriumMuscle glmax3_l: max_isometric_force=852.9296 optimal_fiber_length=0.189251
        tendon_slack_length=0.1167237 pennation_angle_at_optimal=0.3824161 ignore_tendon_compliance=true
      PathPoint P1: pelvis (-0.1145231 -0.04287625 -0.009777395)
      PathPoint P2: pelvis (-0.1121445 -0.103148 -0.04725741)
      PathPoint P3: femur_l (-0.03536289 -0.13887 -0.01260886)
      PathPoint P4: femur_l (-0.007550795 -0.1751614 -0.05513021)
      PathWrap: wrap_object=Gmax3_at_pelvis_l method=hybrid
    Millard2012EquilibriumMuscle glmed1_l: max_isometric_force=1192.733 optimal_fiber_length=0.06665067
        tendon_slack_length=0.05096204 pennation_angle_at_optimal=0.3165559 ignore_tendon_compliance=true
      PathPoint P1: pelvis (-0.03920213 0.02000892 -0.1273234)
      PathPoint P2: femur_l (-0.02743455 -0.01444248 -0.07444591)
    Millard2012EquilibriumMuscle glmed2_l: max_isometric_force=824.6703 optimal_fiber_length=0.07030213
        tendon_slack_length=0.0628374 pennation_angle_at_optimal=0.3165559 ignore_tendon_compliance=true
      PathPoint P1: pelvis (-0.07488047 0.02580742 -0.07333046)
      PathPoint P2: femur_l (-0.03246842 -0.007159521 -0.07069008)
    Millard2012EquilibriumMuscle glmed3_l: max_isometric_force=889.1862 optimal_fiber_length=0.07627256
        tendon_slack_length=0.04726062 pennation_angle_at_optimal=0.3165559 ignore_tendon_compliance=true
      PathPoint P1: pelvis (-0.1014851 -0.005961841 -0.05714344)
      PathPoint P2: femur_l (-0.03888659 -0.005801681 -0.06948285)
    Millard2012EquilibriumMuscle glmin1_l: max_isometric_force=382.8755 optimal_fiber_length=0.06801207
        tendon_slack_length=0.01614065 pennation_angle_at_optimal=0.1745329 ignore_tendon_compliance=true
      PathPoint P1: pelvis (-0.04087592 -0.01216869 -0.1132005)
      PathPoint P2: femur_l (-0.009060953 -0.01283776 -0.07511659)
    Millard2012EquilibriumMuscle glmin2_l: max_isometric_force=401.0986 optimal_fiber_length=0.05715945
        tendon_slack_length=0.02663942 pennation_angle_at_optimal=0 ignore_tendon_compliance=true
      PathPoint P1: pelvis (-0.05426631 -0.01159701 -0.1054872)
      PathPoint P2: femur_l (-0.01208127 -0.01283776 -0.07511659)
    Millard2012EquilibriumMuscle glmin3_l: max_isometric_force=447.1746 optimal_fiber_length=0.04019215
        tendon_slack_length=0.05380725 pennation_angle_at_optimal=0.01745329
      PathPoint P1: pelvis (-0.06950669 -0.0126587 -0.0866929)
      PathPoint P2: femur_l (-0.01698929 -0.01024552 -0.07377522)
    Millard2012EquilibriumMuscle grac_l: max_isometric_force=222.3167 optimal_fiber_length=0.2867349
        tendon_slack_length=0.2165161 pennation_angle_at_optimal=0.1720016 ignore_tendon_compliance=true
      PathPoint P1: pelvis (-0.04172163 -0.1056144 -0.02668142)
      PathPoint P2: tibia_l (-0.01835131 -0.05386132 0.02817646)
      PathPoint P3: tibia_l (0.001773363 -0.07886067 0.01496845)
      PathWrap: wrap_object=GR_at_condyles_l method=hybrid
    Millard2012EquilibriumMuscle iliacus_l: max_isometric_force=1040.141 optimal_fiber_length=0.1025878
        tendon_slack_length=0.09250297 pennation_angle_at_optimal=0.279914 ignore_tendon_compliance=true
      PathPoint P1: pelvis (-0.05329727 0.02523574 -0.0915816)
      PathPoint P2: pelvis (-0.01189278 -0.04548966 -0.08213012)
      PathPoint P3: femur_l (-0.002894471 -0.06974361 -0.01864501)
      PathPoint P4: femur_l (-0.01535328 -0.07863129 -0.02629081)
      PathWrap: wrap_object=IL_at_brim_l method=hybrid range=(2 3)
    Millard2012EquilibriumMuscle perbrev_l: max_isometric_force=468.2474 optimal_fiber_length=0.05052301
        tendon_slack_length=0.1641748 pennation_angle_at_optimal=0.2052361
      PathPoint P1: tibia_l (-0.02420939 -0.2868073 -0.02388481)
      PathPoint P2: tibia_l (-0.03377359 -0.4409719 -0.02369449)
      PathPoint P3: tibia_l (-0.02839373 -0.4535452 -0.02426544)
      PathPoint P4: calcn_l (0.04497313 0.03959411 -0.03409769)
      PathPoint P5: calcn_l (0.06464291 0.03211522 -0.05019531)
    Millard2012EquilibriumMuscle perlong_l: max_isometric_force=977.8181 optimal_fiber_length=0.05779478
        tendon_slack_length=0.3779651 pennation_angle_at_optimal=0.2479525
      PathPoint P1: tibia_l (-0.01992542 -0.1555239 -0.02683473)
      PathPoint P2: tibia_l (-0.0315818 -0.4417648 -0.02255259)
      PathPoint P3: tibia_l (-0.02709858 -0.4546779 -0.02283806)
      PathPoint P4: calcn_l (0.04182215 0.03372832 -0.03234159)
      PathPoint P5: calcn_l (0.06502485 0.01554435 -0.04156113)
      PathPoint P6: calcn_l (0.08135268 0.0101185 -0.01726836)
      PathPoint P7: calcn_l (0.1148677 0.01246481 0.02692693)
    Millard2012EquilibriumMuscle piri_l: max_isometric_force=1055.498 optimal_fiber_length=0.02742667
        tendon_slack_length=0.1212114 pennation_angle_at_optimal=0.1745329
      PathPoint P1: pelvis (-0.08968918 -0.005332989 -0.01467696)
      PathPoint P2: pelvis (-0.08987418 -0.02503973 -0.0661821)
      PathPoint P3: femur_l (-0.01862529 -0.004443841 -0.05861777)
    Millard2012EquilibriumMuscle psoas_l: max_isometric_force=1496.961 optimal_fiber_length=0.1100604
        tendon_slack_length=0.09371905 pennation_angle_at_optimal=0.2155251 ignore_tendon_compliance=true
      PathPoint P1: pelvis (-0.05338537 0.05063481 -0.04236871)
      PathPoint P2: pelvis (-0.01805941 -0.05341156 -0.07126634)
      PathPoint P3: femur_l (-0.01661175 -0.05764649 -0.006170292)
      PathPoint P4: femur_l (-0.02957395 -0.06468257 -0.01180404)
      PathWrap: wrap_object=PS_at_brim_l method=hybrid range=(2 3)
    Millard2012EquilibriumMuscle recfem_l: max_isometric_force=1823.174 optimal_fiber_length=0.09102642
        tendon_slack_length=0.5401621 pennation_angle_at_optimal=0.2170149
      PathPoint P1: pelvis (-0.02114272 -0.03168759 -0.101359)
      PathPoint P2: patella_l (0.01215798 0.05957413 -0.0008510589)
      PathPoint P3: patella_l (0.01471116 0.05313039 0.001215798)
      PathPoint P4: patella_l (0.006078992 0.003003022 -3.647395e-5)
      PathPoint P5: tibia_l (0.03247844 -0.07149793 0.0004472454)
      PathWrap: wrap_object=KnExt_at_fem_l method=hybrid
    Millard2012EquilibriumMuscle sart_l: max_isometric_force=213.3781 optimal_fiber_length=0.4682636
        tendon_slack_length=0.1440809 pennation_angle_at_optimal=0.02613542 ignore_tendon_compliance=true
      PathPoint P1: pelvis (-0.01717846 -0.01274037 -0.1147214)
      PathPoint P2: femur_l (-0.003775397 -0.440434 0.05647158)
      PathPoint P3: tibia_l (-0.02500641 -0.04542248 0.03473289)
      PathPoint P4: tibia_l (-0.01584071 -0.06785054 0.02512187)
      PathPoint P5: tibia_l (0.01354929 -0.09175114 0.002474124)
    Millard2012EquilibriumMuscle semimem_l: max_isometric_force=1741.42 optimal_fiber_length=0.1080869
        tendon_slack_length=0.4210364 pennation_angle_at_optimal=0.2545615
      PathPoint P1: pelvis (-0.08694943 -0.09310272 -0.06670356)
      PathPoint P2: tibia_l (-0.02689932 -0.04644194 0.01865109)
      PathWrap: wrap_object=SM_at_condyles_l method=hybrid
    Millard2012EquilibriumMuscle semiten_l: max_isometric_force=470.2443 optimal_fiber_length=0.24113
        tendon_slack_length=0.308845 pennation_angle_at_optimal=0.241295
      PathPoint P1: pelvis (-0.09144226 -0.1023313 -0.05594843)
      PathPoint P2: tibia_l (-0.03108366 -0.05754269 0.02179132)
      PathPoint P3: tibia_l (0.001892915 -0.08756004 0.01113356)
      PathWrap: wrap_object=ST_at_condyles_l method=hybrid
    Millard2012EquilibriumMuscle soleus_l: max_isometric_force=5646.255 optimal_fiber_length=0.04827919
        tendon_slack_length=0.3087125 pennation_angle_at_optimal=0.3814289
      PathPoint P1: tibia_l (-0.007571661 -0.1037581 -0.009325543)
      PathPoint P2: calcn_l (0.004201312 0.04545991 0.007756127)
    Millard2012EquilibriumMuscle tfl_l: max_isometric_force=353.7879 optimal_fiber_length=0.109988
        tendon_slack_length=0.5204137 pennation_angle_at_optimal=0.05235988
      PathPoint P1: pelvis (-0.02739744 0.01747718 -0.1348194)
      PathPoint P2: femur_l (0.03699889 -0.1228228 -0.08007965)
      PathPoint P3: femur_l (0.01346558 -0.4999321 -0.04346031)
      PathPoint P4: tibia_l (0.01075973 -0.04644194 -0.03292488)
    Millard2012EquilibriumMuscle tibant_l: max_isometric_force=1110.016 optimal_fiber_length=0.07552343
        tendon_slack_length=0.2658923 pennation_angle_at_optimal=0.1951828
      PathPoint P1: tibia_l (0.01534258 -0.1486142 -0.01541569)
      PathPoint P2: tibia_l (0.02500641 -0.2158984 -0.0121803)
      PathPoint P3: tibia_l (0.02321312 -0.414466 0.01256094)
      PathPoint P4: calcn_l (0.1113348 0.02610278 0.04463432)
    Millard2012EquilibriumMuscle tibpost_l: max_isometric_force=1573.393 optimal_fiber_length=0.04154013
        tendon_slack_length=0.3085614 pennation_angle_at_optimal=0.2264891
      PathPoint P1: tibia_l (-0.004084712 -0.147708 -0.009801336)
      PathPoint P2: tibia_l (-0.01633885 -0.4140129 0.01665276)
      PathPoint P3: calcn_l (0.03981698 0.04897938 0.04185382)
      PathPoint P4: calcn_l (0.07371393 0.02331653 0.04112211)
    Millard2012EquilibriumMuscle vasint_l: max_isometric_force=1386.376 optimal_fiber_length=0.143772
        tendon_slack_length=0.2519081 pennation_angle_at_optimal=0.06309973
      PathPoint P1: femur_l (0.03649551 -0.2374986 -0.0415824)
      PathPoint P2: femur_l (0.0421586 -0.257249 -0.03822898)
      PathPoint P3: patella_l (0.007051631 0.05835833 0.0007294791)
      PathPoint P4: patella_l (0.006078992 0.003003022 0.0004741614)
      PathPoint P5: tibia_l (0.03244855 -0.07158855 -0.000409182)
      PathWrap: wrap_object=KnExt_at_fem_l method=hybrid
    Millard2012EquilibriumMuscle vaslat140_l: max_isometric_force=4209.863 optimal_fiber_length=0.1440961
        tendon_slack_length=0.2721814 pennation_angle_at_optimal=0.2528673
      PathPoint vaslat_l-P1: femur_l (0.006040636 -0.2288578 -0.04681373)
      PathPoint vaslat_l-P2: femur_l (0.03385273 -0.3198331 -0.05486194)
      PathPoint vaslat_l-P3: patella_l (0.01252272 0.05142828 -0.01714276)
      PathPoint vaslat_l-P4: patella_l (0.006078992 0.003003022 -0.008911803)
      PathPoint vaslat_l-P5: tibia_l (0.03241866 -0.07179244 -0.004862605)
      PathWrap: wrap_object=KnExtVL_at_fem_l method=hybrid
    Millard2012EquilibriumMuscle vasmed_l: max_isometric_force=2247.469 optimal_fiber_length=0.1351519
        tendon_slack_length=0.2555599 pennation_angle_at_optimal=0.4222225
      PathPoint P1: femur_l (0.01761852 -0.2591006 -0.02521771)
      PathPoint P2: femur_l (0.04480138 -0.3418054 -0.001207231)
      PathPoint P3: patella_l (0.00765953 0.05410303 0.02066857)
      PathPoint P4: patella_l (0.006078992 0.003003022 0.01033429)
      PathPoint P5: tibia_l (0.03178105 -0.07200766 0.006451753)
      PathWrap: wrap_object=KnExt_at_fem_l method=hybrid
    ObjectGroup right_leg: members=(addbrev_r addlong_r addmagDist_r addmagIsch_r addmagMid_r addmagProx_r edl_r ehl_r fdl_r fhl_r gasmed_r glmax1_r glmax2_r glmax3_r glmed1_r glmed2_r glmed3_r glmin1_r glmin2_r glmin3_r grac_r iliacus_r perbrev_r perlong_r piri_r psoas_r recfem_r sart_r semimem_r semiten_r soleus_r tfl_r tibant_r tibpost_r vasint_r vasmed_r)
    ObjectGroup left_leg: members=(addbrev_l addlong_l addmagDist_l addmagIsch_l addmagMid_l addmagProx_l edl_l ehl_l fdl_l fhl_l gasmed_l glmax1_l glmax2_l glmax3_l glmed1_l glmed2_l glmed3_l glmin1_l glmin2_l glmin3_l grac_l iliacus_l perbrev_l perlong_l piri_l psoas_l recfem_l sart_l semimem_l semiten_l soleus_l tfl_l tibant_l tibpost_l vasint_l vasmed_l)
    ObjectGroup hip_add_r: members=(addbrev_r addlong_r addmagDist_r addmagIsch_r addmagMid_r addmagProx_r grac_r semimem_r semiten_r)
    ObjectGroup hip_abd_r: members=(glmax1_r glmed1_r glmed2_r glmed3_r glmin1_r glmin2_r glmin3_r piri_r sart_r tfl_r)
    ObjectGroup hip_flex_r: members=(addbrev_r addlong_r glmin1_r grac_r iliacus_r psoas_r recfem_r sart_r tfl_r)
    ObjectGroup hip_ext_r: members=(addlong_r addmagDist_r addmagIsch_r addmagMid_r addmagProx_r glmax1_r glmax2_r glmax3_r glmed1_r glmed2_r glmed3_r glmin3_r semimem_r semiten_r)
    ObjectGroup hip_inrot_r: members=(glmed1_r glmed2_r glmed3_r glmin1_r iliacus_r psoas_r tfl_r)
    ObjectGroup hip_exrot_r: members=(glmin3_r piri_r)
    ObjectGroup knee_flex_r: members=(gasmed_r grac_r sart_r semimem_r semiten_r)
    ObjectGroup knee_ext_r: members=(recfem_r vasint_r vasmed_r)
    ObjectGroup ankle_df_r: members=(edl_r ehl_r tibant_r)
    ObjectGroup ankle_pf_r: members=(fdl_r fhl_r gasmed_r perbrev_r perlong_r soleus_r tibpost_r)
    ObjectGroup everter_r: members=(edl_r perbrev_r perlong_r)
    ObjectGroup inverter_r: members=(ehl_r fdl_r fhl_r tibant_r tibpost_r)
    ObjectGroup hip_add_l: members=(addbrev_l addlong_l addmagDist_l addmagIsch_l addmagMid_l addmagProx_l grac_l semimem_l semiten_l)
    ObjectGroup hip_abd_l: members=(glmax1_l glmed1_l glmed2_l glmed3_l glmin1_l glmin2_l glmin3_l sart_l tfl_l)
    ObjectGroup hip_flex_l: members=(addbrev_l addlong_l glmin1_l grac_l iliacus_l psoas_l recfem_l sart_l tfl_l)
    ObjectGroup hip_ext_l: members=(addlong_l addmagDist_l addmagIsch_l addmagMid_l addmagProx_l glmax1_l glmax2_l glmax3_l glmed1_l glmed2_l glmed3_l glmin3_l semimem_l semiten_l)
    ObjectGroup hip_exrot_l: members=glmin3_l
    ObjectGroup hip_inrot_l: members=(glmed1_l glmed2_l glmed3_l glmin1_l iliacus_l psoas_l tfl_l)
    ObjectGroup knee_flex_l: members=(gasmed_l grac_l sart_l semimem_l semiten_l)
    ObjectGroup knee_ext_l: members=(recfem_l vasint_l vasmed_l)
    ObjectGroup ankle_df_l: members=(edl_l ehl_l tibant_l)
    ObjectGroup ankle_pf_l: members=(fdl_l fhl_l gasmed_l perbrev_l perlong_l soleus_l tibpost_l)
    ObjectGroup everter_l: members=(edl_l perbrev_l perlong_l)
    ObjectGroup inverter_l: members=(ehl_l fdl_l fhl_l tibant_l tibpost_l)
  MarkerSet:
    Marker C7: torso (-0.07771026 0.4563852 -8.216948e-9) fixed=true
    Marker R_GTROC: femur_r (-0.02578562 -0.0174126 0.09702716) fixed=true
    Marker L_GTROC: femur_l (-0.02578562 -0.0174126 -0.09702716) fixed=true
    Marker R_LAT_FEM_EPI: femur_r (0.01246018 -0.4720758 0.07143893) fixed=true
    Marker L_LAT_FEM_EPI: femur_l (0.0125093 -0.4849168 -0.07172052) fixed=true
    Marker R_PSIS: pelvis (-0.1501265 0.03202603 0.04906036) fixed=true
    Marker L_PSIS: pelvis (-0.1418712 0.03312954 -0.05115403) fixed=true
    Marker R_ACROMION: torso (-0.05893143 0.3742018 0.1738057)
    Marker L_ACROMION: torso (-0.06751764 0.3766019 -0.1923266)
    Marker R_ASIS: pelvis (0.002973565 -0.01452445 0.1549759) fixed=true
    Marker L_ASIS: pelvis (0.008776194 -0.001585289 -0.1505439) fixed=true
    Marker R_MED_FEM_EPI: femur_r (-0.009157885 -0.474463 -0.06845214) fixed=true
    Marker R_MED_MAL: tibia_r (0.00504953 -0.4455822 -0.04522765) fixed=true
    Marker R_CALC: calcn_r (-0.0140647 0.01151658 -0.02245347) fixed=true
    Marker R_5TH: toes_r (-0.04458185 0.004188674 0.063592) fixed=true
    Marker R_1ST: toes_r (-0.007692156 0.02159516 -0.04248051) fixed=true
    Marker L_MED_FEM_EPI: femur_l (0.00591577 -0.4789161 0.06228994) fixed=true
    Marker L_LAT_MAL: tibia_l (-0.005956124 -0.4633163 -0.03463718) fixed=true
    Marker R_LAT_MAL: tibia_r (-0.01777328 -0.4622399 0.03817993) fixed=true
    Marker L_CALC: calcn_l (-0.001645751 0.01801778 0.02128242) fixed=true
    Marker L_1ST: toes_l (-0.00326483 0.02350748 0.05456677) fixed=true
    Marker R_DORSAL: calcn_r (0.1963778 0.02425533 0.0240358) fixed=true
    Marker L_DORSAL: calcn_l (0.2087879 0.02810884 -0.00955133) fixed=true
    Marker L_5TH: toes_l (-0.03285924 0.008332788 -0.05341501) fixed=true
    Marker L_MED_MAL: tibia_l (0.01419042 -0.4373513 0.04633948) fixed=true
    Marker heel_r: calcn_r (0.001241421 -0.0002 0)
    Marker latheel_r: calcn_r (0.02023026 -0.0002 0.03632018)
    Marker medheel_r: calcn_r (0.02023026 -0.0002 -0.03632018)
    Marker mid_r: calcn_r (0.07932944 -0.0002 0.008135721)
    Marker latmid_r: calcn_r (0.0685058 -0.0002 0.04503703)
    Marker medmid_r: calcn_r (0.08701992 -0.0002 -0.03341457)
    Marker mh1_r: calcn_r (0.1727984 -0.0002 -0.03341457)
    Marker mh3_r: calcn_r (0.1574175 -0.0002 0.01685256)
    Marker mh5_r: calcn_r (0.1357702 -0.0002 0.05375387)
    Marker hallux_r: toes_r (0.05335863 -0.0102 -0.02629581)
    Marker othertoes_r: toes_r (0.04187039 -0.0002 0.03515794)
    Marker heel_l: calcn_l (0.001248484 -0.0002 0)
    Marker latheel_l: calcn_l (0.02034536 -0.0002 -0.0365855)
    Marker medheel_l: calcn_l (0.02034536 -0.0002 0.0365855)
    Marker mid_l: calcn_l (0.07978077 -0.0002 -0.008195153)
    Marker latmid_l: calcn_l (0.06889556 -0.0002 -0.04536603)
    Marker medmid_l: calcn_l (0.08751501 -0.0002 0.03365866)
    Marker mh1_l: calcn_l (0.1737815 -0.0002 0.03365866)
    Marker mh3_l: calcn_l (0.1583131 -0.0002 -0.01697567)
    Marker mh5_l: calcn_l (0.1365426 -0.0002 -0.05414655)
    Marker hallux_l: toes_l (0.05366221 -0.0102 0.02648791)
    Marker othertoes_l: toes_l (0.0421086 -0.0002 -0.03541477)
  ContactGeometrySet:
    ContactHalfSpace floor: socket_frame=/ground location=(0 0 0) orientation=(0 0 -1.570796)
    ContactSphere heel_r: socket_frame=/bodyset/calcn_r location=(0.001241421 -0.0002 0) radius=0.02
    ContactSphere latheel_r: socket_frame=/bodyset/calcn_r location=(0.02023026 -0.0002 0.03632018) radius=0.02
    ContactSphere medheel_r: socket_frame=/bodyset/calcn_r location=(0.02023026 -0.0002 -0.03632018) radius=0.02
    ContactSphere mid_r: socket_frame=/bodyset/calcn_r location=(0.07932944 -0.0002 0.008135721) radius=0.02
    ContactSphere latmid_r: socket_frame=/bodyset/calcn_r location=(0.0685058 -0.0002 0.04503703) radius=0.02
    ContactSphere medmid_r: socket_frame=/bodyset/calcn_r location=(0.08701992 -0.0002 -0.03341457) radius=0.02
    ContactSphere mh1_r: socket_frame=/bodyset/calcn_r location=(0.1727984 -0.0002 -0.03341457) radius=0.02
    ContactSphere mh3_r: socket_frame=/bodyset/calcn_r location=(0.1574175 -0.0002 0.01685256) radius=0.02
    ContactSphere mh5_r: socket_frame=/bodyset/calcn_r location=(0.1357702 -0.0002 0.05375387) radius=0.02
    ContactSphere hallux_r: socket_frame=/bodyset/toes_r location=(0.05335863 -0.0102 -0.02629581) radius=0.02
    ContactSphere othertoes_r: socket_frame=/bodyset/toes_r location=(0.04187039 -0.0002 0.03515794) radius=0.02
    ContactSphere heel_l: socket_frame=/bodyset/calcn_l location=(0.001248484 -0.0002 0) radius=0.02
    ContactSphere latheel_l: socket_frame=/bodyset/calcn_l location=(0.02034536 -0.0002 -0.0365855) radius=0.02
    ContactSphere medheel_l: socket_frame=/bodyset/calcn_l location=(0.02034536 -0.0002 0.0365855) radius=0.02
    ContactSphere mid_l: socket_frame=/bodyset/calcn_l location=(0.07978077 -0.0002 -0.008195153) radius=0.02
    ContactSphere latmid_l: socket_frame=/bodyset/calcn_l location=(0.06889556 -0.0002 -0.04536603) radius=0.02
    ContactSphere medmid_l: socket_frame=/bodyset/calcn_l location=(0.08751501 -0.0002 0.03365866) radius=0.02
    ContactSphere mh1_l: socket_frame=/bodyset/calcn_l location=(0.1737815 -0.0002 0.03365866) radius=0.02
    ContactSphere mh3_l: socket_frame=/bodyset/calcn_l location=(0.1583131 -0.0002 -0.01697567) radius=0.02
    ContactSphere mh5_l: socket_frame=/bodyset/calcn_l location=(0.1365426 -0.0002 -0.05414655) radius=0.02
    ContactSphere hallux_l: socket_frame=/bodyset/toes_l location=(0.05366221 -0.0102 0.02648791) radius=0.02
    ContactSphere othertoes_l: socket_frame=/bodyset/toes_l location=(0.0421086 -0.0002 -0.03541477) radius=0.02
  ComponentSet:
    IMU torso_imu_offset_imu: socket_frame=/bodyset/torso/torso_imu_offset
    IMU pelvis_imu_offset_imu: socket_frame=/bodyset/pelvis/pelvis_imu_offset
    IMU femur_r_imu_offset_imu: socket_frame=/bodyset/femur_r/femur_r_imu_offset
    IMU tibia_r_imu_offset_imu: socket_frame=/bodyset/tibia_r/tibia_r_imu_offset
    IMU toes_r_imu_offset_imu: socket_frame=/bodyset/toes_r/toes_r_imu_offset
    IMU femur_l_imu_offset_imu: socket_frame=/bodyset/femur_l/femur_l_imu_offset
    IMU tibia_l_imu_offset_imu: socket_frame=/bodyset/tibia_l/tibia_l_imu_offset
    IMU toes_l_imu_offset_imu: socket_frame=/bodyset/toes_l/toes_l_imu_offset
